Simulations: Version=130
  DataStore Database
    ExcelInput ObsAllData: FileNames=[..\ProcessedObserved\20191031_aboveground_swc.xlsx]; SheetNames=[Observed]
    PredictedObserved: PredictedTableName=DailyReport; ObservedTableName=Observed; FieldNameUsedForMatch=Clock.Today; AllColumns=false
      Tests: POName=PredictedObserved
        AcceptedStats:
          {Name=SWC, n=629, Slope=1.02239, Intercept=20.8517, SEslope=0.017062, SEintercept=9.86768, R2=0.851339, RMSE=68.8462, NSE=0.760593, ME=33.4097, MAE=51.5843, RSR=0.488903}
        AcceptedStatsName=Name n Slope Intercept SEslope SEintercept R2 RMSE NSE ME MAE RSR
  Replacements
    Plant Lucerne: PlantType=Lucerne; IsAlive=false; IsEnding=false; DaysAfterEnding=0
      Memo Memo1
        ## References

        ### **Ayaz S, McKenzie BA, McNeil DL, Hill GD.2004**. Light interception and utilization of four grain legumes sown at different plant populations and depths. _Journal of Agricultural Science,_**142**: 297-308.
         **Ayaz S, McKenzie BA, Hill GD, McNeil DL.2004**. Variability in yield of four grain legume species in a subhumid temperate environment. II. Yield components. _Journal of Agricultural Science,_**142**: 21-28.
         **Ayaz S, McKenzie BA, Hill GD, McNeil DL.2004**. Nitrogen distribution in four grain legumes. _Journal of Agricultural Science,_**142**: 309-317.
         **Wilson DR, Robertson MJ.1996.**Pea phenology responses to temperature and photoperiod. _Australian Agronomy Society_.
      OrganArbitrator Arbitrator
        BiomassTypeArbitrator DMArbitration
          Folder PotentialPartitioningMethods
            ReallocationMethod
            AllocateFixationMethod
            RetranslocationMethod
            SendPotentialDMAllocationsMethod
          Folder AllocationMethods
            NutrientConstrainedAllocationMethod
            DryMatterAllocationsMethod
          RelativeAllocation ArbitrationMethod
        BiomassTypeArbitrator NArbitration
          Folder PotentialPartitioningMethods
            ReallocationMethod
          Folder ActualPartitioningMethods
            AllocateFixationMethod
            RetranslocationMethod
          Folder AllocationMethods
            NitrogenAllocationsMethod
          RelativeAllocation ArbitrationMethod
          AllocateUptakesMethod
        WaterUptakeMethod
        NitrogenUptakeMethod
      Phenology
        HourlyInterpolation ThermalTime: agregationMethod=0
          XYPairs Response: X=[1, 15, 30, 40]; Y=[0, 10, 25, 0]
          ThreeHourSin InterpolationMethod
        PhotoperiodFunction Photoperiod: Twilight=-6; DayLength=0
        PhotoperiodDeltaFunction DeltaPhotoperiod: Twilight=-6
        GerminatingPhase Germinating: Start=Sowing; End=Germination
        EmergingPhase Emerging: ShootLag=15; ShootRate=10; Start=Germination; End=Emergence; TTForTimeStep=0
          VariableReference Progression: VariableName=[Phenology].ThermalTime
        GenericPhase Juvenile: Start=Emergence; End=EndJuvenile
          SubtractFunction Progression
            VariableReference Allocated: VariableName=[TapRoot].Allocated.Wt
            VariableReference Removed: VariableName=[TapRoot].Removed.Wt
            VariableReference Senesced: VariableName=[TapRoot].Senesced.Wt
          Constant Target: FixedValue=500; Units=g/m^2
        GenericPhase Inductive: Start=EndJuvenile; End=FloralInitiation
          VariableReference Progression: VariableName=[Phenology].ThermalTime
          LinearInterpolationFunction Target
            XYPairs: X=[10, 12, 14, 16, 18]; Y=[889, 389, 289, 269, 269]
            VariableReference XValue: VariableName=[Phenology].Photoperiod
        GenericPhase Induced: Start=FloralInitiation; End=StartFlowering
          Constant Target: FixedValue=330
          VariableReference Progression: VariableName=[Phenology].ThermalTime
        GenericPhase Flowering: Start=StartFlowering; End=StartPodfill
          VariableReference Progression: VariableName=[Phenology].ThermalTime
          Constant Target: FixedValue=1000
        GenericPhase Podfilling: Start=StartPodfill; End=Maturity
          Constant Target: FixedValue=1000
          VariableReference Progression: VariableName=[Phenology].ThermalTime
        GenericPhase Ripening: Start=Maturity; End=HarvestRipe
          Constant Target: FixedValue=100
          VariableReference Progression: VariableName=[Phenology].ThermalTime
        EndPhase ReadyForHarvesting: Start=HarvestRipe; End=Unused
          VariableReference Progression: VariableName=[Phenology].ThermalTime
        AccumulateFunction DaysAfterCutting: StartStageName=Emergence; EndStageName=HarvestRipe; FractionRemovedOnCut=1; FractionRemovedOnHarvest=1; FractionRemovedOnGraze=1; FractionRemovedOnPrune=1
          Constant: FixedValue=1
        OnEventFunction FloweringDaysAfterCutting: SetEvent=StartFlowering; ReSetEvent=Harvesting
          Constant PreEventValue: FixedValue=0
          VariableReference PostEventValue: VariableName=[Phenology].DaysAfterCutting
        AccumulateFunction ThermalTimeAfterCutting: StartStageName=Emergence; EndStageName=Maturity; FractionRemovedOnCut=1; FractionRemovedOnHarvest=1; FractionRemovedOnGraze=1; FractionRemovedOnPrune=1
          VariableReference ThermalTime: VariableName=[Phenology].ThermalTime
        OnEventFunction BudsVisableDaysAfterCutting: SetEvent=FloralInitiation; ReSetEvent=Harvesting
          Constant PreEventValue: FixedValue=0
          VariableReference PostEventValue: VariableName=[Phenology].DaysAfterCutting
        AccumulateFunction ThermalTimeAfterFlowering: StartStageName=StartFlowering; EndStageName=Maturity; FractionRemovedOnCut=1; FractionRemovedOnHarvest=1; FractionRemovedOnGraze=1; FractionRemovedOnPrune=1
          VariableReference ThermalTime: VariableName=[Phenology].ThermalTime
      Root: GrowthRespiration=0; MaintenanceRespiration=0
        RootShapeCylindre RootShape
        LinearInterpolationFunction KLModifier
          XYPairs: X=[0, 3]; Y=[1, 1]
          VariableReference XValue: VariableName=[Leaf].LAI
        HourlyInterpolation TemperatureEffect: agregationMethod=0
          XYPairs Response: X=[0, 26, 35]; Y=[1, 1, 1]
          ThreeHourSin InterpolationMethod
        Constant MaxDailyNUptake: FixedValue=6
        Constant SenescenceRate: FixedValue=0
        Constant MaximumRootDepth: FixedValue=1000000
        PhaseLookup RootFrontVelocity
          PhaseLookupValue PreEmergence: Start=Germination; End=Emergence
            Constant Function: FixedValue=3
          PhaseLookupValue early: Start=Emergence; End=StartFlowering
            Constant Function: FixedValue=15
          PhaseLookupValue late: Start=StartFlowering; End=Maturity
            Constant Function: FixedValue=17
        Constant MaximumNConc: FixedValue=0.01
        Constant MinimumNConc: FixedValue=0.005
        PhaseLookupValue NitrogenDemandSwitch: Start=Emergence; End=Maturity
          Constant: FixedValue=1
        LinearInterpolationFunction KNO3
          XYPairs: X=[0, 0.003]; Y=[0.02, 0.02]
          VariableReference XValue: VariableName=[Root].LengthDensity
        LinearInterpolationFunction KNH4
          XYPairs: X=[0, 0.003]; Y=[0, 0]
          VariableReference XValue: VariableName=[Root].LengthDensity
        BiomassRemoval BiomassRemovalDefaults
          OrganBiomassRemovalType Harvest: FractionLiveToRemove=0.3; FractionDeadToRemove=0; FractionLiveToResidue=0.3; FractionDeadToResidue=0
          OrganBiomassRemovalType Cut: FractionLiveToRemove=0; FractionDeadToRemove=0; FractionLiveToResidue=0; FractionDeadToResidue=0
          OrganBiomassRemovalType Prune: FractionLiveToRemove=0; FractionDeadToRemove=0; FractionLiveToResidue=0.6; FractionDeadToResidue=0
          OrganBiomassRemovalType Graze: FractionLiveToRemove=0.6; FractionDeadToRemove=0; FractionLiveToResidue=0.1; FractionDeadToResidue=0
        LinearInterpolationFunction NUptakeSWFactor
          XYPairs: X=[0, 1]; Y=[0, 1]
          VariableReference XValue: VariableName=[Root].RWC
        Constant SpecificRootLength: FixedValue=40; Units=m/g
        PartitionFractionDemandFunction DMDemandFunction
          PhaseLookup PartitionFraction
            PhaseLookupValue Early: Start=Emergence; End=StartFlowering
              Constant Function: FixedValue=0.1
            PhaseLookupValue Middle: Start=StartFlowering; End=StartPodfill
              Constant Function: FixedValue=0.2
            PhaseLookupValue Late: Start=StartPodfill; End=Maturity
              Constant Function: FixedValue=0
        Constant DMConversionEfficiency: FixedValue=1
        Constant MaintenanceRespirationFunction: FixedValue=1
        Constant RemobilisationCost: FixedValue=0
        Constant CarbonConcentration: FixedValue=0.4
        BiomassDemand DMDemands
          PartitionFractionDemandFunction Structural: same as Replacements.Lucerne.Root.DMDemandFunction
          Constant Storage: FixedValue=0
          Constant Metabolic: FixedValue=0
        BiomassDemand NDemands
          MultiplyFunction Structural
            VariableReference MinNconc: VariableName=[Root].minimumNconc
            VariableReference PotentialDMAllocation: VariableName=[Root].potentialDMAllocation.Structural
          MultiplyFunction Metabolic
            SubtractFunction MetabolicNconc
              VariableReference CritNconc: VariableName=[Root].criticalNConc
              VariableReference MinNconc: VariableName=[Root].minimumNconc
            VariableReference PotentialDMAllocation: VariableName=[Root].potentialDMAllocation.Structural
          StorageNDemandFunction Storage
            VariableReference NitrogenDemandSwitch: VariableName=[Root].nitrogenDemandSwitch
            VariableReference MaxNconc: VariableName=[Root].maximumNconc
        VariableReference CriticalNConc: VariableName=[Root].MinimumNConc
        BiomassDemand InitialWt
          Constant Structural: FixedValue=0.2; Units=g/plant
          Constant Metabolic: FixedValue=0
          Constant Storage: FixedValue=0
        Constant RootDepthStressFactor: FixedValue=1
      Nodule
        Constant FixationMetabolicCost: FixedValue=0
        Constant DMDemandFunction: FixedValue=0.01
        Constant MaximumNConc: FixedValue=0.02
        Constant MinimumNConc: FixedValue=0.01
        Constant SenescenceRate: FixedValue=0
        Constant NReallocationFactor: FixedValue=0
        PhaseLookupValue NitrogenDemandSwitch: Start=Emergence; End=Maturity
          Constant: FixedValue=1
        BiomassRemoval BiomassRemovalDefaults
          OrganBiomassRemovalType Harvest: FractionLiveToRemove=0.5; FractionDeadToRemove=0; FractionLiveToResidue=0.1; FractionDeadToResidue=0
          OrganBiomassRemovalType Cut: FractionLiveToRemove=0; FractionDeadToRemove=0; FractionLiveToResidue=0; FractionDeadToResidue=0
          OrganBiomassRemovalType Prune: FractionLiveToRemove=0; FractionDeadToRemove=0; FractionLiveToResidue=0.6; FractionDeadToResidue=0
          OrganBiomassRemovalType Graze: FractionLiveToRemove=0.6; FractionDeadToRemove=0; FractionLiveToResidue=0.2; FractionDeadToResidue=0
        Constant StructuralFraction: FixedValue=1; Units=g/g
        Constant InitialWtFunction: FixedValue=0; Units=g/m^2
        Constant DetachmentRateFunction: FixedValue=0; Units=/d
        Constant MaintenanceRespirationFunction: FixedValue=0; Units=0-1
        Constant DMConversionEfficiency: FixedValue=1; Units=0-1
        MultiplyFunction FixationRate
          Constant FixationCoefficiency: FixedValue=0.024; Units=g/m^2/d
          VariableReference: VariableName=[Leaf].Photosynthesis
        MultiplyFunction FixationRate2
          Constant MaximumFixationRate: FixedValue=0.5; Units=g/m^2/d
          ExponentialFunction TemperatureResponse: A=0; B=1; C=1
            DivideFunction
              SubtractFunction
                SoilTemperatureDepthFunction: Depth=100
                Constant: FixedValue=20
              Constant: FixedValue=10
        Constant NRetranslocationFactor: FixedValue=0
        Constant DMReallocationFactor: FixedValue=0
        Constant DMRetranslocationFactor: FixedValue=0
        VariableReference CriticalNConc: VariableName=[Nodule].MinimumNConc
        Constant RemobilisationCost: FixedValue=0
        Constant CarbonConcentration: FixedValue=0.4
        BiomassDemand DMDemands
          Constant Structural: FixedValue=0.01
          Constant Storage: FixedValue=0
          Constant Metabolic: FixedValue=0
        BiomassDemand NDemands
          MultiplyFunction Structural
            VariableReference MinNconc: VariableName=[Nodule].minimumNconc
            VariableReference PotentialDMAllocation: VariableName=[Nodule].potentialDMAllocation.Structural
          MultiplyFunction Metabolic
            SubtractFunction MetabolicNconc
              VariableReference CritNconc: VariableName=[Nodule].criticalNConc
              VariableReference MinNconc: VariableName=[Nodule].minimumNconc
            VariableReference PotentialDMAllocation: VariableName=[Nodule].potentialDMAllocation.Structural
          StorageNDemandFunction Storage
            VariableReference NitrogenDemandSwitch: VariableName=[Nodule].nitrogenDemandSwitch
            VariableReference MaxNconc: VariableName=[Nodule].maximumNconc
      SimpleLeaf Leaf: Albedo=0.18; Gsmax350=0.006; R50=100; LeafInitialisationStage=Emergence; Height=0; BaseHeight=0; Width=0; FRGR=0; PotentialEP=0; WaterDemand=0; KDead=0; LAIDead=0
        Memo Description
          Stover represents any part of the crop that is not removed at harvest (i.e not part of the product).
        RUEModel Photosynthesis
          Constant RUE: FixedValue=1.11
          WeightedTemperatureFunction FT: MaximumTemperatureWeighting=0.5
            XYPairs: X=[0, 18, 30, 40]; Y=[0, 1, 1, 0]
          LinearInterpolationFunction FW
            XYPairs: X=[0, 1, 1.5]; Y=[1, 1, 1]
            VariableReference XValue: VariableName=[Leaf].Fw
          RUECO2Function FCO2: PhotosyntheticPathway=C3
          VariableReference RadnInt: VariableName=[Leaf].RadiationIntercepted
          Constant FVPD: FixedValue=1
          Constant FN: FixedValue=1
        AccumulateFunction NodeNumber: StartStageName=Emergence; EndStageName=Maturity; FractionRemovedOnCut=1; FractionRemovedOnHarvest=1; FractionRemovedOnGraze=1; FractionRemovedOnPrune=0
          DivideFunction DeltaNode
            VariableReference ThermalTime: VariableName=[Phenology].ThermalTime
            PhaseLookup Phyllochron
              PhaseLookupValue Juvenile: Start=Emergence; End=EndJuvenile
                Constant: FixedValue=52
              PhaseLookupValue Vegetative: Start=EndJuvenile; End=StartFlowering
                LinearInterpolationFunction Phyllochron
                  XYPairs: X=[10, 16.5]; Y=[51, 28]
                  VariableReference XValue: VariableName=[Phenology].Photoperiod
              PhaseLookupValue Reproductive: Start=StartFlowering; End=Maturity
                LinearInterpolationFunction Phyllochron
                  XYPairs: X=[12, 16]; Y=[61, 61]
                  VariableReference XValue: VariableName=[Phenology].Photoperiod
          MultiplyFunction FrostDeath
            VariableReference NodeNumber: VariableName=[Leaf].NodeNumber
            VariableReference FrostFraction: VariableName=[Leaf].FrostFraction
            Constant: FixedValue=-1
        AccumulateFunction Area: StartStageName=Emergence; EndStageName=Maturity; FractionRemovedOnCut=1; FractionRemovedOnHarvest=1; FractionRemovedOnGraze=1; FractionRemovedOnPrune=1
          MultiplyFunction DeltaLAI
            PhaseLookup LAER
              PhaseLookupValue Juvenile: Start=Emergence; End=EndJuvenile
                Constant: FixedValue=0.002
              PhaseLookupValue Vegetative: Start=EndJuvenile; End=StartFlowering
                LessThanFunction LAER
                  VariableReference DeltaPhotoperiod: VariableName=[Phenology].DeltaPhotoperiod
                  Constant Zero: FixedValue=0
                  LinearInterpolationFunction Decreasing
                    XYPairs: X=[8, 10, 12.55, 16]; Y=[0, 0.0068, 0.015, 0.015]
                    VariableReference XValue: VariableName=[Phenology].Photoperiod
                  LinearInterpolationFunction Increasing
                    XYPairs: X=[8, 11, 11.5, 16]; Y=[0, 0, 0.019, 0.019]
                    VariableReference XValue: VariableName=[Phenology].Photoperiod
              PhaseLookupValue Reproductive: Start=StartFlowering; End=Maturity
                Constant: FixedValue=0.005
            VariableReference ThermalTime: VariableName=[Phenology].ThermalTime
            LinearInterpolationFunction PopulationFactor
              XYPairs: X=[0, 120]; Y=[0, 1]
              VariableReference XValue: VariableName=[Lucerne].Population
            LinearInterpolationFunction EarlyLag
              XYPairs: X=[0, 250]; Y=[0.5, 1]
              VariableReference XValue: VariableName=[Phenology].ThermalTimeAfterCutting
          MultiplyFunction FrostDeath
            VariableReference LAI: VariableName=[Leaf].LAI
            VariableReference FrostFraction: VariableName=[Leaf].FrostFraction
            Constant: FixedValue=-1
        LessThanFunction FrostFraction
          VariableReference DeltaPhotoperiod: VariableName=[Phenology].DeltaPhotoperiod
          Constant Zero: FixedValue=0
          LinearInterpolationFunction Decreasing
            XYPairs: X=[-15, -5]; Y=[1, 0]
            VariableReference XValue: VariableName=[Weather].MinT
          LinearInterpolationFunction Increasing
            XYPairs: X=[-10, -5]; Y=[1, 0]
            VariableReference XValue: VariableName=[Weather].MinT
        MinimumFunction FRGR
          HourlyInterpolation FRGRFunctionTemp: agregationMethod=0
            XYPairs Response: X=[0, 10, 25, 40]; Y=[0, 1, 1, 0]
            ThreeHourSin InterpolationMethod
        PhaseLookup ExtinctionCoefficient
          PhaseLookupValue Juvenile: Start=Emergence; End=EndJuvenile
            Constant: FixedValue=0.8
          PhaseLookupValue Vegetative: Start=EndJuvenile; End=StartFlowering
            Constant: FixedValue=0.81
          PhaseLookupValue Reproductive: Start=StartFlowering; End=Maturity
            Constant: FixedValue=0.78
          Memo Description
            The extinction coefficient is used to calculate a LAI value (needed by MicroClimate) from the canopy cover
        AccumulateFunction Tallness: StartStageName=Emergence; EndStageName=StartPodfill; FractionRemovedOnCut=1; FractionRemovedOnHarvest=1; FractionRemovedOnGraze=1; FractionRemovedOnPrune=1
          DivideFunction DeltaHeight
            VariableReference ThermalTime: VariableName=[Phenology].ThermalTime
            PhaseLookup Heightchron
              PhaseLookupValue Juvenile: Start=Emergence; End=EndJuvenile
                Constant: FixedValue=3
              PhaseLookupValue Vegetative: Start=EndJuvenile; End=StartFlowering
                LinearInterpolationFunction Heightchron
                  XYPairs
                    X=[10, 10.5, 11, 11.5, 12, 12.5, 13, 13.5, 14, 15, 15.5, 16, 16.5]
                    Y=[4, 3.234, 2.5, 2.3, 2, 1.59, 1.083, 0.938, 0.822, 0.675, 0.644, 0.642, 0.63775]
                  VariableReference XValue: VariableName=[Phenology].Photoperiod
              PhaseLookupValue Reproductive: Start=StartFlowering; End=Maturity
                LinearInterpolationFunction Heightchron
                  XYPairs: X=[12, 16]; Y=[2.2, 1.8]
                  VariableReference XValue: VariableName=[Phenology].Photoperiod
          MultiplyFunction FrostDeath
            VariableReference Height: VariableName=[Leaf].Height
            VariableReference FrostFraction: VariableName=[Leaf].FrostFraction
            Constant: FixedValue=-1
        Constant NReallocationFactor: FixedValue=0
        Constant SenescenceRate: FixedValue=0
        Constant DetachmentRate: FixedValue=0; Units=/d
        Constant StructuralFraction: FixedValue=1; Units=0-1
        Constant InitialWt: FixedValue=0.1
        Constant LaiDead: FixedValue=0; Units=m^2/m^2
        Constant MaximumNConc: FixedValue=0.06
        Constant MinimumNConc: FixedValue=0.045
        Constant NitrogenDemandSwitch: FixedValue=0
        Constant MaintenanceRespiration: FixedValue=0; Units=0-1
        Constant DMConversionEfficiency: FixedValue=1; Units=0-1
        BiomassRemoval BiomassRemovalDefaults
          OrganBiomassRemovalType Harvest: FractionLiveToRemove=0; FractionDeadToRemove=0; FractionLiveToResidue=0.3; FractionDeadToResidue=0
          OrganBiomassRemovalType Cut: FractionLiveToRemove=0.95; FractionDeadToRemove=0; FractionLiveToResidue=0; FractionDeadToResidue=0
          OrganBiomassRemovalType Prune: FractionLiveToRemove=0; FractionDeadToRemove=0; FractionLiveToResidue=0.6; FractionDeadToResidue=0
          OrganBiomassRemovalType Graze: FractionLiveToRemove=0.6; FractionDeadToRemove=0; FractionLiveToResidue=0.1; FractionDeadToResidue=0
        Constant NRetranslocationFactor: FixedValue=0
        Constant DMReallocationFactor: FixedValue=0
        Constant DMRetranslocationFactor: FixedValue=0
        Constant RemobilisationCost: FixedValue=0
        LinearInterpolationFunction CriticalNConc
          XYPairs: X=[0, 200, 450, 600]; Y=[0.055, 0.055, 0.045, 0.045]
          VariableReference XValue: VariableName=[Phenology].ThermalTimeAfterCutting
        Constant CarbonConcentration: FixedValue=0.4
        BiomassDemand DMDemands
          MultiplyFunction Structural
            VariableReference DeltaLAI: VariableName=[Leaf].Area.DeltaLAI
            PhaseLookup SLA
              PhaseLookupValue Juvenile: Start=Emergence; End=EndJuvenile
                Constant: FixedValue=50
              PhaseLookupValue Vegetative: Start=EndJuvenile; End=StartFlowering
                LessThanFunction SLA
                  VariableReference DeltaPhotoperiod: VariableName=[Phenology].DeltaPhotoperiod
                  Constant Zero: FixedValue=0
                  HourlyInterpolation Decreasing: agregationMethod=0
                    XYPairs Response: X=[10, 18]; Y=[17, 41]
                    ThreeHourSin InterpolationMethod
                  HourlyInterpolation Increasing: agregationMethod=0
                    XYPairs Response: X=[8, 15]; Y=[48, 30]
                    ThreeHourSin InterpolationMethod
              PhaseLookupValue Reproductive: Start=StartFlowering; End=Maturity
                Constant: FixedValue=30
              Memo Description
                The extinction coefficient is used to calculate a LAI value (needed by MicroClimate) from the canopy cover
          Constant Storage: FixedValue=0
          Constant Metabolic: FixedValue=0
        BiomassDemand NDemands
          MultiplyFunction Structural
            VariableReference MinNconc: VariableName=[Leaf].minimumNconc
            VariableReference PotentialDMAllocation: VariableName=[Leaf].potentialDMAllocation.Structural
          MultiplyFunction Metabolic
            SubtractFunction MetabolicNconc
              VariableReference CritNconc: VariableName=[Leaf].criticalNConc
              VariableReference MinNconc: VariableName=[Leaf].minimumNconc
            VariableReference PotentialDMAllocation: VariableName=[Leaf].potentialDMAllocation.Structural
          StorageNDemandFunction Storage
            VariableReference NitrogenDemandSwitch: VariableName=[Leaf].nitrogenDemandSwitch
            VariableReference MaxNconc: VariableName=[Leaf].maximumNconc
        Constant StomatalConductanceCO2Modifier: FixedValue=1
      GenericOrgan Stem: IsAboveGround=true
        Constant NReallocationFactor: FixedValue=0
        Constant NRetranslocationFactor: FixedValue=0
        Constant DMRetranslocationFactor: FixedValue=0.1
        LinearInterpolationFunction MaximumNConc
          XYPairs: X=[0, 30, 31]; Y=[0.05, 0.05, 0.015]
          VariableReference XValue: VariableName=[Stem].Live.Wt
        MultiplyFunction MinimumNConc
          Constant: FixedValue=0.75
          VariableReference MaximumNConc: VariableName=[Stem].MaximumNConc
        PhaseLookupValue NitrogenDemandSwitch: Start=Emergence; End=Maturity
          Constant: FixedValue=1
        Constant StructuralFraction: FixedValue=1
        BiomassRemoval BiomassRemovalDefaults
          OrganBiomassRemovalType Harvest: FractionLiveToRemove=0.5; FractionDeadToRemove=0; FractionLiveToResidue=0.1; FractionDeadToResidue=0
          OrganBiomassRemovalType Cut: FractionLiveToRemove=0.95; FractionDeadToRemove=0; FractionLiveToResidue=0; FractionDeadToResidue=0
          OrganBiomassRemovalType Prune: FractionLiveToRemove=0; FractionDeadToRemove=0; FractionLiveToResidue=0.6; FractionDeadToResidue=0
          OrganBiomassRemovalType Graze: FractionLiveToRemove=0.6; FractionDeadToRemove=0; FractionLiveToResidue=0.2; FractionDeadToResidue=0
        Constant SenescenceRate: FixedValue=0; Units=/d
        Constant DetachmentRateFunction: FixedValue=0; Units=/d
        Constant MaintenanceRespirationFunction: FixedValue=0; Units=0-1
        Constant DMConversionEfficiency: FixedValue=1; Units=0-1
        AllometricDemandFunction DMDemandFunction: Const=0.1452028; Power=1.23213787
          VariableReference XValue: VariableName=[AboveGround].Wt
          VariableReference YValue: VariableName=[Stem].Live.Wt
        Constant Phyollchorn: FixedValue=0
        Constant DMReallocationFactor: FixedValue=0
        VariableReference CriticalNConc: VariableName=[Stem].MinimumNConc
        Constant RemobilisationCost: FixedValue=0
        Constant CarbonConcentration: FixedValue=0.4
        BiomassDemand DMDemands
          AllometricDemandFunction Structural: Const=0.1452028; Power=1.23213787
            VariableReference XValue: VariableName=[AboveGround].Wt
            VariableReference YValue: VariableName=[Stem].Live.Wt
          Constant Storage: FixedValue=0
          Constant Metabolic: FixedValue=0
        BiomassDemand NDemands
          MultiplyFunction Structural
            VariableReference MinNconc: VariableName=[Stem].minimumNconc
            VariableReference PotentialDMAllocation: VariableName=[Stem].potentialDMAllocation.Structural
          MultiplyFunction Metabolic
            SubtractFunction MetabolicNconc
              VariableReference CritNconc: VariableName=[Stem].criticalNConc
              VariableReference MinNconc: VariableName=[Stem].minimumNconc
            VariableReference PotentialDMAllocation: VariableName=[Stem].potentialDMAllocation.Structural
          StorageNDemandFunction Storage
            VariableReference NitrogenDemandSwitch: VariableName=[Stem].nitrogenDemandSwitch
            VariableReference MaxNconc: VariableName=[Stem].maximumNconc
        RetranslocateNonStructural RetranslocateNitrogen
        BiomassDemand InitialWt
          Constant Structural: FixedValue=0; Units=g/m^2
          Constant Metabolic: FixedValue=0
          Constant Storage: FixedValue=0
        Constant Photosynthesis: FixedValue=0
        VariableReference initialNConcFunction: VariableName=[Stem].MinimumNConc
        BiomassDemand dmDemandPriorityFactors
          Constant Structural: FixedValue=1
          Constant Metabolic: FixedValue=1
          Constant Storage: FixedValue=1
      GenericOrgan Shell: IsAboveGround=true
        Constant NReallocationFactor: FixedValue=0
        Constant NRetranslocationFactor: FixedValue=0.1
        Constant DMRetranslocationFactor: FixedValue=0.1
        Constant MaximumNConc: FixedValue=0.03
        Constant MinimumNConc: FixedValue=0.01
        PhaseLookupValue NitrogenDemandSwitch: Start=Emergence; End=Maturity
          Constant: FixedValue=1
        Constant StructuralFraction: FixedValue=1
        BiomassRemoval BiomassRemovalDefaults
          OrganBiomassRemovalType Harvest: FractionLiveToRemove=0.5; FractionDeadToRemove=0; FractionLiveToResidue=0.1; FractionDeadToResidue=0
          OrganBiomassRemovalType Cut: FractionLiveToRemove=0.8; FractionDeadToRemove=0; FractionLiveToResidue=0; FractionDeadToResidue=0
          OrganBiomassRemovalType Prune: FractionLiveToRemove=0; FractionDeadToRemove=0; FractionLiveToResidue=0.6; FractionDeadToResidue=0
          OrganBiomassRemovalType Graze: FractionLiveToRemove=0.6; FractionDeadToRemove=0; FractionLiveToResidue=0.2; FractionDeadToResidue=0
        Constant SenescenceRate: FixedValue=0; Units=/d
        Constant DetachmentRateFunction: FixedValue=0; Units=/d
        Constant MaintenanceRespirationFunction: FixedValue=0; Units=0-1
        Constant DMConversionEfficiency: FixedValue=1; Units=0-1
        PartitionFractionDemandFunction DMDemandFunction
          PhaseLookup PartitionFraction
            PhaseLookupValue: Start=StartPodfill; End=Maturity
              Constant: FixedValue=0.2
        Constant DMReallocationFactor: FixedValue=0
        VariableReference CriticalNConc: VariableName=[Shell].MinimumNConc
        Constant RemobilisationCost: FixedValue=0
        Constant CarbonConcentration: FixedValue=0.4
        BiomassDemand DMDemands
          PartitionFractionDemandFunction Structural: same as Replacements.Lucerne.Shell.DMDemandFunction
          Constant Storage: FixedValue=0
          Constant Metabolic: FixedValue=0
        BiomassDemand NDemands
          MultiplyFunction Structural
            VariableReference MinNconc: VariableName=[Shell].minimumNconc
            VariableReference PotentialDMAllocation: VariableName=[Shell].potentialDMAllocation.Structural
          MultiplyFunction Metabolic
            SubtractFunction MetabolicNconc
              VariableReference CritNconc: VariableName=[Shell].criticalNConc
              VariableReference MinNconc: VariableName=[Shell].minimumNconc
            VariableReference PotentialDMAllocation: VariableName=[Shell].potentialDMAllocation.Structural
          StorageNDemandFunction Storage
            VariableReference NitrogenDemandSwitch: VariableName=[Shell].nitrogenDemandSwitch
            VariableReference MaxNconc: VariableName=[Shell].maximumNconc
        RetranslocateNonStructural RetranslocateNitrogen
        BiomassDemand InitialWt
          Constant Structural: FixedValue=0; Units=g/m^2
          Constant Metabolic: FixedValue=0
          Constant Storage: FixedValue=0
        Constant Photosynthesis: FixedValue=0
        VariableReference initialNConcFunction: VariableName=[Shell].MinimumNConc
        BiomassDemand dmDemandPriorityFactors
          Constant Structural: FixedValue=1
          Constant Metabolic: FixedValue=1
          Constant Storage: FixedValue=1
      GenericOrgan Grain: IsAboveGround=true
        Constant NReallocationFactor: FixedValue=0
        Constant NRetranslocationFactor: FixedValue=0.1
        Constant DMRetranslocationFactor: FixedValue=0.1
        Constant MaximumNConc: FixedValue=0.03
        Constant MinimumNConc: FixedValue=0.01
        PhaseLookupValue NitrogenDemandSwitch: Start=Emergence; End=Maturity
          Constant: FixedValue=1
        Constant StructuralFraction: FixedValue=1
        BiomassRemoval BiomassRemovalDefaults: same as Replacements.Lucerne.Shell.BiomassRemovalDefaults
        Constant SenescenceRate: FixedValue=0; Units=/d
        Constant DetachmentRateFunction: FixedValue=0; Units=/d
        Constant MaintenanceRespirationFunction: FixedValue=0; Units=0-1
        Constant DMConversionEfficiency: FixedValue=1; Units=0-1
        PartitionFractionDemandFunction DMDemandFunction: same as Replacements.Lucerne.Shell.DMDemandFunction
        Constant DMReallocationFactor: FixedValue=0
        VariableReference CriticalNConc: VariableName=[Grain].MinimumNConc
        Constant RemobilisationCost: FixedValue=0
        Constant CarbonConcentration: FixedValue=0.4
        BiomassDemand DMDemands: same as Replacements.Lucerne.Shell.DMDemands
        BiomassDemand NDemands
          MultiplyFunction Structural
            VariableReference MinNconc: VariableName=[Grain].minimumNconc
            VariableReference PotentialDMAllocation: VariableName=[Grain].potentialDMAllocation.Structural
          MultiplyFunction Metabolic
            SubtractFunction MetabolicNconc
              VariableReference CritNconc: VariableName=[Grain].criticalNConc
              VariableReference MinNconc: VariableName=[Grain].minimumNconc
            VariableReference PotentialDMAllocation: VariableName=[Grain].potentialDMAllocation.Structural
          StorageNDemandFunction Storage
            VariableReference NitrogenDemandSwitch: VariableName=[Grain].nitrogenDemandSwitch
            VariableReference MaxNconc: VariableName=[Grain].maximumNconc
        RetranslocateNonStructural RetranslocateNitrogen
        BiomassDemand InitialWt
          Constant Structural: FixedValue=0; Units=g/m^2
          Constant Metabolic: FixedValue=0
          Constant Storage: FixedValue=0
        Constant Photosynthesis: FixedValue=0
        VariableReference initialNConcFunction: VariableName=[Grain].MinimumNConc
        BiomassDemand dmDemandPriorityFactors
          Constant Structural: FixedValue=1
          Constant Metabolic: FixedValue=1
          Constant Storage: FixedValue=1
      GenericOrgan TapRoot: IsAboveGround=true
        Constant NReallocationFactor: FixedValue=1
        PhaseLookup NRetranslocationFactor
          PhaseLookupValue Juvenile: Start=Emergence; End=EndJuvenile
            Constant: FixedValue=0
          PhaseLookupValue Vegetative: Start=EndJuvenile; End=StartFlowering
            MultiplyFunction
              LessThanFunction AnnualEffect
                VariableReference DeltaPhotoperiod: VariableName=[Phenology].DeltaPhotoperiod
                Constant Zero: FixedValue=-0.02
                Constant Decreasing: FixedValue=0.005
                Constant Increasing: FixedValue=0.02
              LinearInterpolationFunction RegrowthEffect
                XYPairs: X=[0, 250, 300]; Y=[1.3, 1.3, 0]
                VariableReference XValue: VariableName=[Phenology].ThermalTimeAfterCutting
          PhaseLookupValue Reproductive: Start=StartFlowering; End=Maturity
            Constant: FixedValue=0
          Memo Description
            The extinction coefficient is used to calculate a LAI value (needed by MicroClimate) from the canopy cover
        PhaseLookup DMRetranslocationFactor
          PhaseLookupValue Juvenile: Start=Emergence; End=EndJuvenile
            Constant: FixedValue=0
          PhaseLookupValue Vegetative: Start=EndJuvenile; End=StartFlowering
            MultiplyFunction
              LessThanFunction AnnualEffect
                VariableReference DeltaPhotoperiod: VariableName=[Phenology].DeltaPhotoperiod
                Constant Zero: FixedValue=-0.02
                Constant Decreasing: FixedValue=0.005
                Constant Increasing: FixedValue=0.025
              LinearInterpolationFunction RegrowthEffect
                XYPairs: X=[0, 250, 300]; Y=[1.3, 1.3, 0]
                VariableReference XValue: VariableName=[Phenology].ThermalTimeAfterCutting
          PhaseLookupValue Reproductive: Start=StartFlowering; End=Maturity
            Constant: FixedValue=0
          Memo Description
            The extinction coefficient is used to calculate a LAI value (needed by MicroClimate) from the canopy cover
        Constant MaximumNConc: FixedValue=0.016
        Constant MinimumNConc: FixedValue=0.007
        PhaseLookupValue NitrogenDemandSwitch: Start=Emergence; End=Maturity
          LinearInterpolationFunction
            XYPairs: X=[10.5, 12.5]; Y=[51, 34]
            VariableReference XValue: VariableName=[Phenology].Photoperiod
          Constant: FixedValue=1
        Constant StructuralFraction: FixedValue=0.4
        BiomassRemoval BiomassRemovalDefaults
          OrganBiomassRemovalType Harvest: FractionLiveToRemove=0; FractionDeadToRemove=0; FractionLiveToResidue=0; FractionDeadToResidue=0
          OrganBiomassRemovalType Cut: FractionLiveToRemove=0; FractionDeadToRemove=0; FractionLiveToResidue=0; FractionDeadToResidue=0
          OrganBiomassRemovalType Prune: FractionLiveToRemove=0; FractionDeadToRemove=0; FractionLiveToResidue=0; FractionDeadToResidue=0
          OrganBiomassRemovalType Graze: FractionLiveToRemove=0; FractionDeadToRemove=0; FractionLiveToResidue=0; FractionDeadToResidue=0
        MultiplyFunction MaintenanceRespirationFunction
          Constant: FixedValue=1
          ExponentialFunction: same as Replacements.Lucerne.Nodule.FixationRate2.TemperatureResponse
          PhaseLookup RespirationCoefficient
            PhaseLookupValue Juvenile: Start=Emergence; End=EndJuvenile
              Constant: FixedValue=0
            PhaseLookupValue Vegetative: Start=EndJuvenile; End=StartFlowering
              Constant: FixedValue=0.001
            PhaseLookupValue Reproductive: Start=StartFlowering; End=Maturity
              Constant: FixedValue=0.001
            Memo Description
              The extinction coefficient is used to calculate a LAI value (needed by MicroClimate) from the canopy cover
        Constant SenescenceRate: FixedValue=0; Units=/d
        Constant DetachmentRateFunction: FixedValue=0; Units=/d
        Constant DMConversionEfficiency: FixedValue=1; Units=0-1
        Constant DMReallocationFactor: FixedValue=0
        Constant CriticalNConc: FixedValue=0.01
        Constant RemobilisationCost: FixedValue=0
        Constant CarbonConcentration: FixedValue=0.4
        BiomassDemand DMDemands
          MultiplyFunction Structural
            SubtractFunction Structural
              MultiplyFunction MaximumTapRootStructuralDM
                Constant: FixedValue=250
              VariableReference TapRootStructuralDM: VariableName=[TapRoot].Live.StructuralWt
            Constant multiplier: FixedValue=0.01
          MultiplyFunction Storage
            SubtractFunction Capacity
              Constant Maxium: FixedValue=460
              VariableReference Current: VariableName=[TapRoot].Live.StorageWt
            MultiplyFunction
              LessThanFunction Photoperiod
                VariableReference DeltaPhotoperiod: VariableName=[Phenology].DeltaPhotoperiod
                Constant Zero: FixedValue=-0.02
                Constant Decreasing: FixedValue=1
                Constant Increasing: FixedValue=0
              LinearInterpolationFunction RegrowthEffect
                XYPairs: X=[0, 150, 200]; Y=[0, 0, 1.3]
                VariableReference XValue: VariableName=[Phenology].ThermalTimeAfterCutting
          Constant Metabolic: FixedValue=0
        BiomassDemand NDemands
          MultiplyFunction Structural
            VariableReference MinNconc: VariableName=[TapRoot].minimumNconc
            VariableReference PotentialDMAllocation: VariableName=[TapRoot].potentialDMAllocation.Structural
          MultiplyFunction Metabolic
            SubtractFunction MetabolicNconc
              VariableReference CritNconc: VariableName=[TapRoot].criticalNConc
              VariableReference MinNconc: VariableName=[TapRoot].minimumNconc
            VariableReference PotentialDMAllocation: VariableName=[TapRoot].potentialDMAllocation.Structural
          StorageNDemandFunction Storage
            VariableReference NitrogenDemandSwitch: VariableName=[TapRoot].nitrogenDemandSwitch
            VariableReference MaxNconc: VariableName=[TapRoot].maximumNconc
        RetranslocateNonStructural RetranslocateNitrogen
        BiomassDemand InitialWt
          Constant Structural: FixedValue=0; Units=g/m^2
          Constant Metabolic: FixedValue=0
          Constant Storage: FixedValue=0
        Constant Photosynthesis: FixedValue=0
        VariableReference initialNConcFunction: VariableName=[TapRoot].MinimumNConc
        BiomassDemand dmDemandPriorityFactors
          Constant Structural: FixedValue=1
          Constant Metabolic: FixedValue=1
          Constant Storage: FixedValue=1
      CompositeBiomass AboveGround: DMDOfStructural=0.6
        Propertys=[[Leaf].Live, [Leaf].Dead, [Stem].Live, [Stem].Dead, [Grain].Live, [Grain].Dead, [Shell].Live, [Shell].Dead]
      CompositeBiomass BelowGround: DMDOfStructural=0.6
        Propertys=[[Root].Live, [Root].Dead, [Nodule].Live, [Nodule].Dead, [TapRoot].Live, [TapRoot].Dead]
      CompositeBiomass Total: DMDOfStructural=0.6
        Propertys=[[Leaf].Live, [Leaf].Dead, [Stem].Live, [Stem].Dead, [Grain].Live, [Grain].Dead, [Shell].Live, [Shell].Dead, [Root].Live, [Root].Dead, [Nodule].Live, [Nodule].Dead, [TapRoot].Live, [TapRoot].Dead]
      CompositeBiomass TotalLive: DMDOfStructural=0.6
        Propertys=[[Leaf].Live, [Stem].Live, [Grain].Live, [Shell].Live, [Root].Live, [Nodule].Live, [TapRoot].Live]
      CompositeBiomass TotalDead: DMDOfStructural=0.6
        Propertys=[[Leaf].Dead, [Stem].Dead, [Grain].Dead, [Shell].Dead, [Root].Dead, [Nodule].Dead, [TapRoot].Dead]
      CompositeBiomass Pod: Propertys=[[Shell].Live, [Shell].Dead, [Grain].Live, [Grain].Dead]; DMDOfStructural=0.6
      Memo
        ## References

        ### **Ayaz S, McKenzie BA, McNeil DL, Hill GD.** **2004**. Light interception and utilization of four grain legumes sown at different plant populations and depths. _Journal of Agricultural Science,_ **142**: 297-308.
         **Ayaz S, McKenzie BA, Hill GD, McNeil DL.** **2004**. Variability in yield of four grain legume species in a subhumid temperate environment. II. Yield components. _Journal of Agricultural Science,_ **142**: 21-28.
         **Ayaz S, McKenzie BA, Hill GD, McNeil DL.** **2004**. Nitrogen distribution in four grain legumes. _Journal of Agricultural Science,_ **142**: 309-317.
         **Wilson DR, Robertson MJ.** **1996.** Pea phenology responses to temperature and photoperiod. _Australian Agronomy Society_.
      CultivarFolder
        Cultivar Kaituna
        Cultivar Trifecta
        Cultivar HunterRiver
        Cultivar Sceptre
        Cultivar SuperMonarca
        Cultivar WL611
        Cultivar southern_special
        Cultivar WL6112
        Cultivar WL6113
        Cultivar WL6114
        Cultivar FD2
        Cultivar FD10
        Cultivar FD5
      Constant MortalityRate: FixedValue=0
    Manager Mower
      Year = 0
      Rotation = 0
      HarvestFlag = False
      YearTransation = 1-Jun
      BudsDays = 0
      FloDays = 0
```csharp
using Models.PMF.Phen;
using System;
using System.Collections.Generic;
using Models.Core;
using Models.PMF;
using Models.PMF.Interfaces;
using System.Xml.Serialization;
using APSIM.Shared.Utilities;

namespace Models
{
    [Serializable] 
    [System.Xml.Serialization.XmlInclude(typeof(Model))]
    public class Script : Model
    {
        [Link] private Plant Lucerne;
        [Link] private Clock clock;
        [Link] private Zone zone;
        [Link(Type = LinkType.Path, Path = "[Lucerne].Phenology")]
        private Phenology phenology;
        [XmlIgnore] private RemovalFractions Remove { get; set; }
    public double Year { get;set;}
    public double Rotation { get;set;}
    bool YearPassed { get;set;}
    public bool HarvestFlag { get;set;}
    [Description("Change to the next growth year")]
    public string YearTransation { get;set;}
    public double BudsDays { get;set;}
    public double FloDays { get;set;}
        [EventSubscribe("StartOfSimulation")]
        private void OnSimulationCommencing(object sender, EventArgs e)
        {   Year = 1;
            Rotation =1;
            HarvestFlag=false;
            YearPassed= false;
            Remove = new RemovalFractions();
        }
        [EventSubscribe("EndOfDay")]
        private void OnEndOfDay(object sender, EventArgs e)
        {
        if (DateUtilities.WithinDates(YearTransation, clock.Today, YearTransation))
         YearPassed= true;
         HarvestFlag= false;
         BudsDays= (double)zone.Get("Lucerne.Phenology.BudsVisableDaysAfterCutting.Value()");
         FloDays= (double)zone.Get("Lucerne.Phenology.FloweringDaysAfterCutting.Value()");
        }
        public void Cut()
        {   /*double TtFlo=(double)zone.Get("Lucerne.Phenology.ThermalTimeAfterFlowering.Value()");
            double LeafWt= (double)zone.Get("Lucerne.Leaf.Wt");
            double NewLeaf= Math.Min(5,TtFlo*0.025);
            double LeafRemove= (LeafWt-NewLeaf)/LeafWt;
            double StemWt= (double)zone.Get("Lucerne.Stem.Wt");
            double NewStem= Math.Min(3,TtFlo*0.015);
            double StemRemove= (StemWt-NewStem)/StemWt;
            Remove.SetFractionToRemove("Leaf",LeafRemove*0.9);
            Remove.SetFractionToResidue("Leaf", LeafRemove*0.1);
            Remove.SetFractionToRemove("Stem", StemRemove*0.5);
            Remove.SetFractionToResidue("Stem",StemRemove*0.5);
            object LAIRemove= 1-Math.Min(0.1,TtFlo*0.0005);
            zone.Set("Lucerne.Leaf.Area.FractionRemovedOnCut",LAIRemove);*/
            Remove.SetPhenologyStage = 4;  
            Lucerne.RemoveBiomass("Cut", Remove);
            Rotation+=1;
            HarvestFlag= true;
            if (YearPassed)
            {Year+=1;
            Rotation=1;
            YearPassed=false;}

        }
    }
}
```
    Report InitialReport: EventNames=[Lucerne].Sowing
      VariableNames:
        [Clock].Today
        [Weather].Latitude
        [Weather].Longitude
        [Weather].FileName
        [Weather].CO2
        [Soil].Physical.Depth
        [Soil].Physical.Thickness
        [Soil].Physical.LucerneSoil.LL
        [Soil].Physical.LucerneSoil.KL
        [Soil].Physical.LucerneSoil.XF
        [Soil].Physical.LucerneSoil.DUL
        [Soil].Chemical.NO3N
        [Soil].Chemical.NH4N
        [Soil].Organic.FOM
        [Soil].Organic.Carbon
        [Soil].Organic.SoilCNRatio
    Report DailyReport: EventNames=[Clock].DoReport
      VariableNames:
        [Clock].Today
        [Soil].OutputLayers.SW
        [Soil].OutputLayers.SWmm
        [Soil].SoilWater.Eo
        [Soil].SoilWater.Es
        [Soil].SoilWater.SWmm as SW
        [Soil].SoilWater.WaterTable
        SUM([Soil].SoilWater.SWmm) as SWC
        [DiagnosticsVariables].Script.SWC
        [Weather].Rain
        [Weather].MinT
        [Weather].MaxT
        [Weather].Radn
        [Weather].VPD
        [Weather].Wind
        [Weather].Qmax
        [Weather].DaysSinceWinterSolstice
        ([Lucerne].Leaf.Transpiration + [Soil].SoilWater.Es) as ET
        [Lucerne].AboveGround.N
        [Lucerne].AboveGround.Wt
        [Lucerne].AboveGround.Wt *10 as ShootWt
        [Lucerne].Grain.Live.N
        [Lucerne].Grain.Live.Wt
        [Lucerne].Leaf.CoverDead
        [Lucerne].Leaf.CoverGreen
        [Lucerne].Leaf.CoverTotal
        [Lucerne].Leaf.Fn
        [Lucerne].Leaf.Fw
        [Lucerne].Leaf.Height as Height
        [Lucerne].Leaf.LAI as LAI
        [Lucerne].Leaf.Live.N
        [Lucerne].Leaf.Live.NConc*100 as LeafN
        [Lucerne].Leaf.Live.Wt *10 as LeafWt
        [Lucerne].Leaf.NodeNumber as NodeNumber
        [Lucerne].Leaf.SenLAI
        [Lucerne].Leaf.WaterDemand
        [Lucerne].Phenology.CurrentPhase.Name
        [Lucerne].Phenology.CurrentStageName
        [Lucerne].Phenology.DaysAfterCutting
        [Lucerne].Phenology.DaysAfterCutting
        [Lucerne].Phenology.Stage
        [Lucerne].Phenology.ThermalTimeAfterCutting
        [Lucerne].Population as PlantPopulation
        [Lucerne].Root.Depth
        [Lucerne].Root.LengthDensity
        [Lucerne].Root.Live.Wt
        [Lucerne].Root.Allocated
        [Lucerne].Root.WaterSupply
        [Lucerne].Root.WaterUptake
        [Lucerne].Root.Removed.Wt
        [Lucerne].Root.Senesced.Wt
        [Lucerne].Stem.Live.Wt
        [Lucerne].Stem.Live.Wt *10 as StemWt
        [Lucerne].TapRoot.Live.StorageWt as StorageWt
        [Lucerne].TapRoot.Live.StructuralWt as StructuralWt
        [Lucerne].TapRoot.Live.Wt*10 as RootWt
        [Lucerne].TapRoot.MaintenanceRespiration
        [lucerne].TapRoot.Senesced.Wt
        [Lucerne].TapRoot.Total.Wt*10 as RootTotal
        [Mower].Script.BudsDays as BudsDays
        [Mower].Script.FloDays as FloDays
        [Mower].Script.HarvestFlag
        [Mower].Script.Rotation as Rotation
        [Mower].Script.Year as GrowthSeason
    Report HarvestReport: EventNames=[Lucerne].Sowing
      VariableNames:
        [Clock].Today
        [Lucerne].Phenology.DaysAfterCutting
        [PlantandHarvest].Script.FinalTag
        [PlantandHarvest].Script.CultivarName as Cultivar
        [PlantandHarvest].Script.PlantingDate as PlantingDate
        [PlantandHarvest].Script.HarvestDate as HarvestDate
        [Summarizara].Script.IrrigApplied as IrrigApplied
        [Summarizara].Script.NFertApplied as NFertApplied
        [Summarizara].Script.CumRain as CumRain
        [Summarizara].Script.CumEo as CumEo
        [Weather].Latitude
        [Weather].Longitude
        [Weather].FileName
        [Weather].CO2
  Folder New Zealand
    Experiment Iversen_8
      Factors
        Factor Water
          CompositeFactor dry: Specifications=[IrrigationEvents]
            Operations IrrigationEvents
              1998-09-11  [Irrigation].Apply(30)
              1998-09-12  [Irrigation].Apply(30)
              1998-09-14  [Irrigation].Apply(30)
              1998-09-16  [Irrigation].Apply(30)
              1998-09-18  [Irrigation].Apply(30)
              1999-09-11  [Irrigation].Apply(30)
              1999-09-12  [Irrigation].Apply(30)
              1999-09-14  [Irrigation].Apply(30)
              1999-09-13  [Irrigation].Apply(50)
              2000-09-11  [Irrigation].Apply(30)
              2000-09-12  [Irrigation].Apply(30)
              2000-09-14  [Irrigation].Apply(30)
              2000-09-13  [Irrigation].Apply(30)
          CompositeFactor irr: Specifications=[IrrigationEvents]
            Operations IrrigationEvents
              1997-10-31  [Irrigation].Apply(30);
              1997-12-01  [Irrigation].Apply(24);
              1997-12-06  [Irrigation].Apply(32);
              1997-12-16  [Irrigation].Apply(41);
              1997-12-22  [Irrigation].Apply(45);
              1998-01-07  [Irrigation].Apply(14);
              1998-01-15  [Irrigation].Apply(30);
              1998-01-23  [Irrigation].Apply(26);
              1998-01-31  [Irrigation].Apply(23);
              1998-02-18  [Irrigation].Apply(62);
              1998-03-06  [Irrigation].Apply(23);
              1998-03-30  [Irrigation].Apply(31);
              1998-09-09  [Irrigation].Apply(30);
              1998-09-10  [Irrigation].Apply(30);
              1998-09-11  [Irrigation].Apply(30);
              1998-09-13  [Irrigation].Apply(30);
              1998-09-14  [Irrigation].Apply(30);
              1998-11-12  [Irrigation].Apply(20);
              1998-11-13  [Irrigation].Apply(20);
              1998-11-14  [Irrigation].Apply(20);
              1998-12-23  [Irrigation].Apply(20);
              1998-12-24  [Irrigation].Apply(20);
              1998-12-25  [Irrigation].Apply(20);
              1998-12-26  [Irrigation].Apply(15);
              1998-12-27  [Irrigation].Apply(15);
              1999-01-20  [Irrigation].Apply(20);
              1999-01-21  [Irrigation].Apply(20);
              1999-01-22  [Irrigation].Apply(20);
              1999-01-23  [Irrigation].Apply(20);
              1999-01-24  [Irrigation].Apply(20);
              1999-01-25  [Irrigation].Apply(27);
              1999-02-25  [Irrigation].Apply(10);
              1999-02-26  [Irrigation].Apply(10);
              1999-02-27  [Irrigation].Apply(10);
              1999-02-28  [Irrigation].Apply(20);
              1999-03-01  [Irrigation].Apply(20);
              1999-12-12  [Irrigation].Apply(30);
              2000-01-22  [Irrigation].Apply(50);
              2000-12-27  [Irrigation].Apply(30);
              2000-12-28  [Irrigation].Apply(30);
              2000-12-29  [Irrigation].Apply(15);
              2001-02-01  [Irrigation].Apply(35);
              2001-02-02  [Irrigation].Apply(30);
              2001-02-03  [Irrigation].Apply(30);
              2001-03-20  [Irrigation].Apply(25);
              2001-03-21  [Irrigation].Apply(25);
              2001-03-22  [Irrigation].Apply(15);
              2001-04-26  [Irrigation].Apply(25);
              2001-04-27  [Irrigation].Apply(20);
              2001-12-21  [Irrigation].Apply(20);
              2001-12-22  [Irrigation].Apply(25);
              2001-12-23  [Irrigation].Apply(20);
      Simulation Iversen_8LL
        Clock: Start=1996-10-31; End=2002-01-06
        Summary summaryfile
        Weather: FileName=C:\Data\Master\Data\ClimateAndObserved\lincoln.met
        SoilArbitrator Soil Arbitrator
        Zone paddock: Area=1; Slope=0; AspectAngle=0; Altitude=50
          MicroClimate: a_interception=0; b_interception=1; c_interception=0; d_interception=0; soil_albedo=0.23; SoilHeatFluxFraction=0.4; MinimumHeightDiffForNewLayer=0; NightInterceptionFraction=0.5; ReferenceHeight=2
          Irrigation
          Fertiliser
          Manager DiagnosticsVariables
```csharp
using Models.Climate;
using APSIM.Shared.Utilities;
using System.Xml.Serialization;
using Models;
using Models.PMF;
using Models.Soils;
using System.Text;
using System.Collections.Generic;
using Models.Core;
using System;
using Models.Interfaces;
using Models.Soils.Nutrients;
using Models.PMF.Organs;
namespace Models
{
    [Serializable] 
    public class Script : Model
    {
        [Link] private Clock Clock;
        [Link] private Weather Met;
        [Link] private Fertiliser Fert;
        [Link] private Irrigation Irrig;
        [Link] private Plant Lucerne;
        [Link] private Zone zone;
        [Link(ByName = true)]
        private ISolute Urea;
        [Link(ByName = true)]
        private ISolute NO3;
        [Link(ByName = true)]
        private ISolute NH4;
        [Link(ByName = true)]
        private SoilNitrogen SoilNitrogen;
        [Link] private Soils.Soil Soil;
        [Link] private Models.Surface.SurfaceOrganicMatter SOM;
        [Link(Type = LinkType.Path, Path = "[Lucerne].Root")]
        private Root root;
        [Link]
        private IPhysical soilPhysical;
        [Link]
        private ISoilWater waterBalance;
                    
        [XmlIgnore] public bool InitialDay { get; set; }
        
        [XmlIgnore] public double AccumPlantN { get; set; }
        [XmlIgnore] public double AccumMineralisation { get; set; }
        [XmlIgnore] public double AccumDenit { get; set; }
        [XmlIgnore] public double AccumFert { get; set; }
        [XmlIgnore] public double AccumLeach { get; set; }
        [XmlIgnore] public double AccumDetach { get; set; }
        [XmlIgnore] public double DeltaSoilOMN { get; set; }
        [XmlIgnore] public double DeltaSurfaceOMN { get; set; }
        [XmlIgnore] public double DeltaSoilMineralN { get; set; }
        [XmlIgnore] public double SoilNitrogenContent { get; set; }
        
        [XmlIgnore] public double AccumEO { get; set; }
        [XmlIgnore] public double AccumEP { get; set; }
        [XmlIgnore] public double AccumES { get; set; }
        [XmlIgnore] public double AccumDrainage { get; set; }
        [XmlIgnore] public double AccumRunoff { get; set; }
        [XmlIgnore] public double AccumOutflowLat { get; set; }
        [XmlIgnore] public double AccumIrrigation { get; set; }
        [XmlIgnore] public double AccumRainfall { get; set; }
        [XmlIgnore] public double SoilWaterDeficit { get; set; }
    
        [XmlIgnore] public double  InitialSoilOMN { get; set; }
        [XmlIgnore] public double  InitialSurfaceOMN { get; set; }
        [XmlIgnore] public double  InitialMineralN { get; set; }
        
        [XmlIgnore] public double SWC { get; set; }
        [XmlIgnore] public double DUL { get; set; }
        [XmlIgnore] public double OutFlowLat { get; set; }

        [XmlIgnore] public double FomN { get; set; }
        [XmlIgnore] public double BiomN { get; set; }
        [XmlIgnore] public double HumN { get; set; }
        [XmlIgnore] public double OrganicN { get; set; }
        [XmlIgnore] public double NO3N { get; set; }
        [XmlIgnore] public double NH4N { get; set; }
        [XmlIgnore] public double UreaN { get; set; }
        [XmlIgnore] public double MineralN { get; set; }
        [XmlIgnore] public double DltNMinRes { get; set; }
        [XmlIgnore] public double DltNMinTot { get; set; }
        
        [EventSubscribe("StartOfSimulation")]
        private void OnSimulationCommencing(object sender, EventArgs e)
        {
            InitialDay = true;
        }
        
        [EventSubscribe("DoManagement")]
        private void OnDoManagement(object sender, EventArgs e)
        {
            //!!!!!! Nitrogen balance components !!!!!!
            //!!!!!!^^^^^^^^^^^^^^^^^^^^^^^^^^^^^!!!!!!
            FomN = MathUtilities.Sum(SoilNitrogen.FOMN);
            HumN = MathUtilities.Sum(SoilNitrogen.HumicN);
            BiomN = MathUtilities.Sum(SoilNitrogen.MicrobialN);
            OrganicN = FomN + HumN + BiomN;
            NO3N = MathUtilities.Sum(NO3.kgha);
            NH4N = MathUtilities.Sum(NH4.kgha);
            UreaN = MathUtilities.Sum(Urea.kgha);
            MineralN = NO3N + NH4N + UreaN; 
            DltNMinRes = MathUtilities.Sum(SoilNitrogen.dlt_n_min_res);
            DltNMinTot = MathUtilities.Sum(SoilNitrogen.MineralisedN);
            int layers = soilPhysical.Thickness.Length;
            if (InitialDay == true)
            {
                InitialSurfaceOMN = SOM.N;
                InitialSoilOMN = OrganicN;
                InitialMineralN = MineralN;
                InitialDay = false;
            }
            AccumFert += Fert.NitrogenApplied;
            DeltaSurfaceOMN = SOM.N - InitialSurfaceOMN;
            AccumLeach = AccumLeach - waterBalance.LeachNH4 - waterBalance.LeachNO3 - waterBalance.LeachUrea; //Fails
            AccumMineralisation += MathUtilities.Sum(SoilNitrogen.MineralisedN);
            AccumDenit -= MathUtilities.Sum(SoilNitrogen.Denitrification);
            AccumPlantN -= (double)zone.Get("Lucerne.Root.NUptake");
            DeltaSoilOMN = OrganicN - InitialSoilOMN;
            DeltaSoilMineralN = MineralN - InitialMineralN;
            SoilNitrogenContent = MineralN;
            
            //!!!!!! Water balance components !!!!!!
            //!!!!!!^^^^^^^^^^^^^^^^^^^^^^^^^^!!!!!!

            AccumIrrigation += Irrig.IrrigationApplied;
            AccumRainfall += Met.Rain;
            //AccumEP -= (double)zone.Get("[Lucerne].Leaf.Transpiration");
            AccumEP -= (double)zone.Get("Lucerne.Root.WaterUptake");
            SoilWaterDeficit = (SWC - DUL);
            double OutFlowLat = MathUtilities.Sum(waterBalance.LateralOutflow);
            AccumOutflowLat -= OutFlowLat;
        }
        
        [EventSubscribe("DoManagementCalculations")]
        private void OnDoManagementCalculations(object sender, EventArgs e)
        {
            FomN = MathUtilities.Sum(SoilNitrogen.FOMN);
            HumN = MathUtilities.Sum(SoilNitrogen.HumicN);
            BiomN = MathUtilities.Sum(SoilNitrogen.MicrobialN);
            
            
            AccumEO -= waterBalance.Eo;
            AccumES -= waterBalance.Es; 
            AccumDrainage -= waterBalance.Drainage;
            AccumRunoff -= waterBalance.Runoff;
            SWC = MathUtilities.Sum(waterBalance.SWmm);
            DUL = MathUtilities.Sum(soilPhysical.DULmm);
        }
    }
}
```
          SurfaceOrganicMatter surface organic matter: InitialResidueName=wheat; InitialResidueType=wheat; InitialResidueMass=0; InitialStandingFraction=0; InitialCPR=0; InitialCNR=80
          Manager LucerneSowingRule
            RowSpacing = 150
            SowingDepth = 20
            SowingRate = 120
            CultivarName = Kaituna
            SowingDate = 11/02/1996 00:00:00
```csharp
using APSIM.Shared.Utilities;
using Models.PMF;
using Models.Core;
using System;
        
namespace Models
{
    [Serializable] 
    [System.Xml.Serialization.XmlInclude(typeof(Model))]
    public class Script : Model
    {
        [Link] Plant Lucerne;
        [Link] Clock Clock;

        [Description("Spacing (mm) between rows")]
        public double RowSpacing { get; set; }
        [Description("Depth (mm) Grains are planted")]
        public double SowingDepth { get; set; }
        [Description("Seeds sown (/m2)")]
        public double SowingRate { get; set; }
        [Description("Cultivar")]
        [Display(Type=DisplayType.CultivarName)]
        public string CultivarName { get; set; }
        [Description("Sowing Date")]
        public DateTime SowingDate { get; set; }

        [EventSubscribe("DoManagement")]
        private void OnDoManagement(object sender, EventArgs e)
        {
            if (Clock.Today.Date == SowingDate)
                Lucerne.Sow(population: SowingRate, cultivar: CultivarName, depth: SowingDepth, rowSpacing: RowSpacing, budNumber: 1);
            //Lucerne.Sow(... Contains the following arguements:
            //Population  double  Required  Seeds sowing/m2
            //Cultivar    string  Required  "NameOfCultivar"
            //Depth       double  Optional  Depth (mm) seed sown.   Default is 100mm 
            //MaxCover    double  Optional  Proportion (0-1) of the ground row crop will cover.   Default is 1.0
            //BudNumber   double  Optional  Number of mainstems per seed sown.  Default is 1.0
            //RowSpacing  double  Optional  Spaceing (mm) between drill rows when crop is sown.  Default is 150mm
            //CropClass   string  Optional  Crop class to instantiate when crop is sown.  Default is "Plant"
        }
    }
}
```
          Operations IrrigationEvents
          Plant Lucerne
          Manager Mower
            Year = 0
            Rotation = 0
            YearTransation = 01-Aug
```csharp
using APSIM.Shared.Utilities;
using System.Xml.Serialization;
using Models.PMF.Interfaces;
using Models.PMF;
using Models.Core;
using System.Collections.Generic;
using System;

namespace Models
{
    [Serializable] 
    [System.Xml.Serialization.XmlInclude(typeof(Model))]
    public class Script : Model
    {
        [Link] Plant Lucerne;
        [Link] Clock clock;
        [XmlIgnore] private RemovalFractions Remove { get; set; }
    public double Year { get;set;}
    public double Rotation { get;set;}
    bool YearPassed { get;set;}
    [Description("Change to the next growth year")]
    public string YearTransation { get;set;}
        [EventSubscribe("StartOfSimulation")]
        private void OnSimulationCommencing(object sender, EventArgs e)
        {   Year = 1;
            Rotation =1;
            YearPassed= false;
            Remove = new RemovalFractions();
        }
        [EventSubscribe("StartOfDay")]
         private void OnStartOfDay(object sender, EventArgs e)
        {
         if (DateUtilities.WithinDates(YearTransation, clock.Today, YearTransation))
         YearPassed= true;
        }
        public void Cut()
        {   
            Remove.SetPhenologyStage = 4;
            Lucerne.RemoveBiomass("Cut", Remove);
            Rotation+=1;
            if (YearPassed)
            {Year+=1;
            Rotation=1;
            YearPassed=false;}

        }
    }
}
```
          Operations Cutting
            1997-01-22  [Mower].Script.Cut();
            1997-03-02  [Mower].Script.Cut();
            1997-06-06  [Mower].Script.Cut();
            1997-10-07  [Mower].Script.Cut();
            1997-11-20  [Mower].Script.Cut();
            1997-12-24  [Mower].Script.Cut();
            1998-02-04  [Mower].Script.Cut();
            1998-03-14  [Mower].Script.Cut();
            1998-05-30  [Mower].Script.Cut();
            1998-07-01  [Mower].Script.Cut();
            1998-09-30  [Mower].Script.Cut();
            1998-11-12  [Mower].Script.Cut();
            1998-12-16  [Mower].Script.Cut();
            1999-01-14  [Mower].Script.Cut();
            1999-02-18  [Mower].Script.Cut();
            1999-04-15  [Mower].Script.Cut();
            1999-06-24  [Mower].Script.Cut();
            1999-09-30  [Mower].Script.Cut();
            1999-11-11  [Mower].Script.Cut();
            1999-12-21  [Mower].Script.Cut();
            2000-01-27  [Mower].Script.Cut();
            2000-03-15  [Mower].Script.Cut();
            2000-05-26  [Mower].Script.Cut();
            2000-09-23  [Mower].Script.Cut();
            2000-11-11  [Mower].Script.Cut();
            2000-12-22  [Mower].Script.Cut();
            2001-01-25  [Mower].Script.Cut();
            2001-03-15  [Mower].Script.Cut();
            2001-05-03  [Mower].Script.Cut();
            2001-07-02  [Mower].Script.Cut();
            2001-10-06  [Mower].Script.Cut();
            2001-11-21  [Mower].Script.Cut();
            2001-12-24  [Mower].Script.Cut();
          Soil: Latitude=0; Longitude=0
            Chemical
              Thickness  NO3N     NH4N  PH
              100        172.222  0     6.6
              200        11.9048  0     6.2
              300        1.15741  0     5.7
              300        1.06157  0     5.5
              300        0        0     5.5
              300        0        0     5.5
            InitialWater Initial water: PercentMethod=1; FractionFull=0.998443
            Physical
              Thickness  BD    AirDry  LL15   DUL   SAT
              100        1.26  0.05    0.075  0.35  0.38
              100        1.26  0.06    0.078  0.35  0.38
              100        1.26  0.07    0.07   0.32  0.39
              100        1.44  0.07    0.07   0.29  0.32
              100        1.44  0.069   0.07   0.27  0.3
              100        1.44  0.07    0.07   0.31  0.297
              100        1.57  0.07    0.07   0.33  0.32
              100        1.57  0.07    0.07   0.35  0.34
              100        1.57  0.07    0.07   0.34  0.35
              100        1.58  0.07    0.07   0.34  0.35
              100        1.58  0.07    0.07   0.34  0.35
              100        1.58  0.07    0.07   0.34  0.35
              100        1.58  0.08    0.08   0.34  0.35
              100        1.59  0.078   0.08   0.33  0.35
              100        1.59  0.08    0.08   0.33  0.35
              100        1.59  0.087   0.09   0.32  0.34
              100        1.59  0.09    0.09   0.3   0.33
              100        1.59  0.09    0.09   0.3   0.33
              100        1.59  0.09    0.09   0.3   0.33
              100        1.59  0.08    0.08   0.31  0.33
              100        1.59  0.09    0.09   0.31  0.33
              100        1.59  0.09    0.09   0.32  0.34
              100        1.59  0.09    0.09   0.35  0.4
              SoilCrop LucerneSoil
                LL=[0.1, 0.13, 0.12, 0.12, 0.11, 0.08, 0.08, 0.08, 0.09, 0.11, 0.12, 0.15, 0.15, 0.15, 0.16, 0.2, 0.25, 0.25, 0.25, 0.25, 0.23, 0.15, 0.15]
                KL=[0.06, 0.06, 0.03, 0.03, 0.03, 0.03, 0.03, 0.03, 0.03, 0.03, 0.03, 0.03, 0.03, 0.03, 0.03, 0.03, 0.03, 0.03, 0.03, 0.03, 0.03, 0.03, 0.03]
                XF=[1, 1, 1, 1, 1, 1, 1, 1, 1, 1, 1, 1, 1, 1, 1, 1, 1, 1, 1, 1, 1, 1, 1]
            WaterBalance SoilWater: SummerDate=1-Oct; SummerU=6; SummerCona=3; WinterDate=1-Mar; WinterU=5; WinterCona=2.5; DiffusConst=189; DiffusSlope=21; Salb=0.13; CN2Bare=0; CNRed=0; CNCov=0.8; Thickness=[100, 200, 300, 300, 300, 300]; SWCON=[0.55, 0.55, 0.55, 0.55, 0.55, 0.55]
            SoilNitrogen: fom_types=[default, manure, mucuna, lablab, shemp, stable]; fract_carb=[0.2, 0.3, 0.54, 0.57, 0.45, 0]; fract_cell=[0.7, 0.3, 0.37, 0.37, 0.47, 0.1]; fract_lign=[0.1, 0.4, 0.09, 0.06, 0.08, 0.9]; NPartitionApproach=0
              SoilNitrogenNO3 NO3
              SoilNitrogenNH4 NH4
              SoilNitrogenUrea Urea
              SoilNitrogenPlantAvailableNO3 PlantAvailableNO3
              SoilNitrogenPlantAvailableNH4 PlantAvailableNH4
            Organic: FOMCNRatio=30
              Thickness  Carbon  SoilCNRatio  FBiom  FInert  FOM
              100        1.82    11.5         0.025  0.3     1243.93
              200        1.47    11.5         0.025  0.4     833.832
              300        1.2     11.5         0.015  0.75    457.617
              300        1.03    11.5         0.01   0.9     251.145
              300        0.47    11.5         0.01   0.96    137.831
              300        0.47    11.5         0.01   0.96    75.6435
            CERESSoilTemperature Temperature
          Manager PopulationSet
            SetDate = 01/01/2000 00:00:00
            Pop = 100
```csharp
using Models.Soils;
using APSIM.Shared.Utilities;
using Models.PMF;
using Models.Core;
using System;
        
namespace Models
{
    [Serializable] 
    [System.Xml.Serialization.XmlInclude(typeof(Model))]
    public class Script : Model
    {
        [Link] Plant Lucerne;
        [Link] Clock Clock;
         [Link] Zone zone;

        [Description("PopulationSet Date")]
        public DateTime SetDate { get; set; }
        [Description("New Population")]
        public double Pop{ get; set; }
        [EventSubscribe("DoManagement")]
        private void OnDoManagement(object sender, EventArgs e)
        {
            if (Clock.Today.Date == SetDate)
            {
                object NewPop = Pop;
                zone.Set("Lucerne.Population",NewPop);
            }
        }
    }
}
```
          Report DailyReport: EventNames=[Clock].DoReport
            VariableNames:
              [Clock].Today
              [Soil].OutputLayers.SW
              [Soil].OutputLayers.SWmm
              [Soil].SoilWater.Eo
              [Soil].SoilWater.Es
              [Soil].SoilWater.SWmm as SW
              [Soil].SoilWater.WaterTable
              SUM([Soil].SoilWater.SWmm) as TotalSWC
              [DiagnosticsVariables].Script.SWC
              [Weather].Rain
              [Weather].MinT
              [Weather].MaxT
              [Weather].Radn
              [Weather].VPD
              [Weather].Wind
              [Weather].Qmax
              [Weather].DaysSinceWinterSolstice
              ([Lucerne].Leaf.Transpiration + [Soil].SoilWater.Es) as ET
              [Lucerne].AboveGround.N
              [Lucerne].AboveGround.Wt
              [Lucerne].AboveGround.Wt *10 as ShootWt
              [Lucerne].Grain.Live.N
              [Lucerne].Grain.Live.Wt
              [Lucerne].Leaf.CoverDead
              [Lucerne].Leaf.CoverGreen
              [Lucerne].Leaf.CoverTotal
              [Lucerne].Leaf.Fn
              [Lucerne].Leaf.Fw
              [Lucerne].Leaf.Height as Height
              [Lucerne].Leaf.LAI as LAI
              [Lucerne].Leaf.Live.N
              [Lucerne].Leaf.Live.NConc*100 as LeafN
              [Lucerne].Leaf.Live.Wt *10 as LeafWt
              [Lucerne].Leaf.NodeNumber as NodeNumber
              [Lucerne].Leaf.SenLAI
              [Lucerne].Leaf.WaterDemand
              [Lucerne].Phenology.CurrentPhase.Name
              [Lucerne].Phenology.CurrentStageName
              [Lucerne].Phenology.DaysAfterCutting
              [Lucerne].Phenology.DaysAfterCutting
              [Lucerne].Phenology.Stage
              [Lucerne].Phenology.ThermalTimeAfterCutting
              [Lucerne].Population as PlantPopulation
              [Lucerne].Root.Depth
              [Lucerne].Root.LengthDensity
              [Lucerne].Root.Live.NConc
              [Lucerne].Root.NSupply
              [Lucerne].Root.WaterSupply
              [Lucerne].Root.WaterUptake
              [Lucerne].Stem.Live.N
              [Lucerne].Stem.Live.NConc*100 as StemN
              [Lucerne].Stem.Live.Wt
              [Lucerne].Stem.Live.Wt *10 as StemWt
              [Lucerne].TapRoot.Live.StorageWt as StorageWt
              [Lucerne].TapRoot.Live.StructuralWt as StructuralWt
              [Lucerne].TapRoot.Live.Wt*10 as RootWt
              [Lucerne].TapRoot.MaintenanceRespiration
              [lucerne].TapRoot.Senesced.Wt
              [Lucerne].TapRoot.Total.Wt*10 as RootTotal
              [Mower].Script.BudsDays as BudsDays
              [Mower].Script.FloDays as FloDays
              [Mower].Script.HarvestFlag
              [Mower].Script.Rotation as Rotation
              [Mower].Script.Year as GrowthSeason
          Report InitialReport: EventNames=[Lucerne].Sowing
            VariableNames:
              [Clock].Today
              [Weather].Latitude
              [Weather].Longitude
              [Weather].FileName
              [Weather].CO2
              [Soil].Physical.Depth
              [Soil].Physical.Thickness
              [Soil].Physical.LucerneSoil.LL
              [Soil].Physical.LucerneSoil.KL
              [Soil].Physical.LucerneSoil.XF
              [Soil].Physical.LucerneSoil.DUL
          Report HarvestReport: same as Replacements.HarvestReport
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