Simulations: Version=126
  Memo Issues
    Issues to be tackled in this prototype:

    - Node number estimates were unrealistically high - action: temporarily set BasalBudFactor to 0. Needs revision if used.
    - Thresholds in NSE tests are low as model is not yet stable (raising them as fits improve)
    - Taproot maintenence respiration is negligible at the moment. Reason is that DMRetraslocation is doing nearly all of taproot seasonality - may need an optimisation of multiple parameters all together (RUEt, resp,retr)
    - Senescence of fine-roots (Root) is only partially implemented based on literature - no data available
    - Leaf N% estimates have too narrow range (4-5%) compared to observed (3 to 6%)- no action so far
    - Stem N% estimates have too narrow range, particularly not capturing low values <1% - no action so far
  DataStore Database
    ExcelInput ObsAllData: SheetNames=[ObsAllData]
      FileNames=[C:\Data\ApsimX\ApsimXLatest\Prototypes\Lucerne\ObsAllData.xlsx]
    PredictedObserved: PredictedTableName=Report; ObservedTableName=ObsAllData; FieldNameUsedForMatch=Clock.Today; AllColumns=false
  Replacements
    Plant Lucerne: PlantType=Lucerne; IsAlive=false; IsEnding=false; DaysAfterEnding=0
      Memo References
        Under development
      OrganArbitrator Arbitrator
        BiomassTypeArbitrator DMArbitration
          Folder PotentialPartitioningMethods
            ReallocationMethod
            AllocateFixationMethod
            RetranslocationMethod
            SendPotentialDMAllocationsMethod
          Folder AllocationMethods
            NutrientConstrainedAllocationMethod
            DryMatterAllocationsMethod
          RelativeAllocation ArbitrationMethod
        BiomassTypeArbitrator NArbitration
          Folder PotentialPartitioningMethods
            ReallocationMethod
          Folder ActualPartitioningMethods
            AllocateFixationMethod
            RetranslocationMethod
          Folder AllocationMethods
            NitrogenAllocationsMethod
          RelativeAllocation ArbitrationMethod
          AllocateUptakesMethod
        WaterUptakeMethod
        NitrogenUptakeMethod
      Phenology
        HourlyInterpolation ThermalTime: agregationMethod=0
          XYPairs Response: X=[1, 15, 30, 40]; Y=[0, 10, 25, 0]
          ThreeHourSin InterpolationMethod
        HourlyInterpolation ThermalTime1: agregationMethod=0
          XYPairs Response: X=[2, 15, 30, 40]; Y=[0, 10, 25, 0]
          ThreeHourSin InterpolationMethod
        PhotoperiodFunction Photoperiod: Twilight=-6; DayLength=0
        PhotoperiodDeltaFunction DeltaPhotoperiod: Twilight=-6
        GerminatingPhase Germinating: Start=Sowing; End=Germination
        EmergingPhase Emerging: ShootLag=15; ShootRate=10; Start=Germination; End=Emergence; TTForTimeStep=0
          VariableReference Progression: VariableName=[Phenology].ThermalTime
        GenericPhase Juvenile: Start=Emergence; End=EndJuvenile
          VariableReference Progression: VariableName=[Phenology].ThermalTime
          LinearInterpolationFunction Target
            XYPairs: X=[10, 14, 18]; Y=[521, 521, 90]
            VariableReference XValue: VariableName=[Phenology].Photoperiod
        GenericPhase Inductive: Start=EndJuvenile; End=FloralInitiation
          VariableReference Progression: VariableName=[Phenology].ThermalTime
          LinearInterpolationFunction Target
            XYPairs: X=[10, 14, 18]; Y=[646, 265, 265]
            VariableReference XValue: VariableName=[Phenology].Photoperiod
        GenericPhase Induced: Start=FloralInitiation; End=StartFlowering
          Constant Target: FixedValue=310
          VariableReference Progression: VariableName=[Phenology].ThermalTime
        GenericPhase Flowering: Start=StartFlowering; End=StartPodfill
          VariableReference Progression: VariableName=[Phenology].ThermalTime
          Constant Target: FixedValue=1500
        GenericPhase Podfilling: Start=StartPodfill; End=Maturity
          Constant Target: FixedValue=1500
          VariableReference Progression: VariableName=[Phenology].ThermalTime
        GenericPhase Ripening: Start=Maturity; End=HarvestRipe
          Constant Target: FixedValue=1500
          VariableReference Progression: VariableName=[Phenology].ThermalTime
        EndPhase ReadyForHarvesting: Start=HarvestRipe; End=Unused
          VariableReference Progression: VariableName=[Phenology].ThermalTime
        AccumulateFunction DaysAfterCutting: StartStageName=Emergence; EndStageName=HarvestRipe; FractionRemovedOnCut=1; FractionRemovedOnHarvest=1; FractionRemovedOnGraze=1; FractionRemovedOnPrune=1
          Constant: FixedValue=1
        OnEventFunction FloweringDaysAfterCutting: SetEvent=StartFlowering; ReSetEvent=Harvesting
          Constant PreEventValue: FixedValue=0
          VariableReference PostEventValue: VariableName=[Phenology].DaysAfterCutting
        AccumulateFunction ThermalTimeAfterCutting: StartStageName=Emergence; EndStageName=Maturity; FractionRemovedOnCut=1; FractionRemovedOnHarvest=1; FractionRemovedOnGraze=1; FractionRemovedOnPrune=1
          VariableReference ThermalTime: VariableName=[Phenology].ThermalTime
        OnEventFunction BudsVisableDaysAfterCutting: SetEvent=FloralInitiation; ReSetEvent=Harvesting
          Constant PreEventValue: FixedValue=0
          VariableReference PostEventValue: VariableName=[Phenology].DaysAfterCutting
        AccumulateFunction ThermalTimeAfterFlowering: StartStageName=StartFlowering; EndStageName=Maturity; FractionRemovedOnCut=1; FractionRemovedOnHarvest=1; FractionRemovedOnGraze=1; FractionRemovedOnPrune=1
          VariableReference ThermalTime: VariableName=[Phenology].ThermalTime
        AccumulateResetAtStage ThermalTimeAfterBudsVisible: ResetStageName=FloralInitiation
          VariableReference ThermalTime: VariableName=[Phenology].ThermalTime
      LinearInterpolationFunction StemPopulation
        XYPairs: X=[100, 200, 300]; Y=[500, 800, 1500]
        VariableReference XValue: VariableName=[Lucerne].Population
      Root: GrowthRespiration=0; MaintenanceRespiration=0
        RootShapeCylindre RootShape
        LinearInterpolationFunction KLModifier
          XYPairs: X=[0, 3]; Y=[1, 1]
          VariableReference XValue: VariableName=[Leaf].LAI
        HourlyInterpolation TemperatureEffect: agregationMethod=0
          XYPairs Response: X=[0, 26, 35]; Y=[1, 1, 1]
          ThreeHourSin InterpolationMethod
        Constant MaxDailyNUptake: FixedValue=6
        Constant MaximumRootDepth: FixedValue=1000000
        PhaseLookup RootFrontVelocity
          PhaseLookupValue PreEmergence: Start=Germination; End=Emergence
            Constant Function: FixedValue=3
          PhaseLookupValue early: Start=Emergence; End=StartFlowering
            Constant Function: FixedValue=15
          PhaseLookupValue late: Start=StartFlowering; End=Maturity
            Constant Function: FixedValue=17
        Constant MaximumNConc: FixedValue=0.01
        Constant MinimumNConc: FixedValue=0.005
        PhaseLookupValue NitrogenDemandSwitch: Start=Emergence; End=Maturity
          Constant: FixedValue=1
        LinearInterpolationFunction KNO3
          XYPairs: X=[0, 0.003]; Y=[0.02, 0.02]
          VariableReference XValue: VariableName=[Root].LengthDensity
        LinearInterpolationFunction KNH4
          XYPairs: X=[0, 0.003]; Y=[0, 0]
          VariableReference XValue: VariableName=[Root].LengthDensity
        BiomassRemoval BiomassRemovalDefaults
          OrganBiomassRemovalType Harvest: FractionLiveToRemove=0.3; FractionDeadToRemove=0; FractionLiveToResidue=0.3; FractionDeadToResidue=0
          OrganBiomassRemovalType Cut: FractionLiveToRemove=0; FractionDeadToRemove=0; FractionLiveToResidue=0; FractionDeadToResidue=0
          OrganBiomassRemovalType Prune: FractionLiveToRemove=0; FractionDeadToRemove=0; FractionLiveToResidue=0.6; FractionDeadToResidue=0
          OrganBiomassRemovalType Graze: FractionLiveToRemove=0.6; FractionDeadToRemove=0; FractionLiveToResidue=0.1; FractionDeadToResidue=0
        LinearInterpolationFunction NUptakeSWFactor
          XYPairs: X=[0, 1]; Y=[0, 1]
          VariableReference XValue: VariableName=[Root].RWC
        Constant SpecificRootLength: FixedValue=40; Units=m/g
        PartitionFractionDemandFunction DMDemandFunction
          PhaseLookup PartitionFraction
            PhaseLookupValue Early: Start=Emergence; End=StartFlowering
              Constant Function: FixedValue=0.1
            PhaseLookupValue Middle: Start=StartFlowering; End=StartPodfill
              Constant Function: FixedValue=0.2
            PhaseLookupValue Late: Start=StartPodfill; End=Maturity
              Constant Function: FixedValue=0
        Constant DMConversionEfficiency: FixedValue=1
        Constant RemobilisationCost: FixedValue=0
        Constant CarbonConcentration: FixedValue=0.4
        BiomassDemand DMDemands
          PartitionFractionDemandFunction Structural: same as Replacements.Lucerne.Root.DMDemandFunction
          Constant Storage: FixedValue=0
          Constant Metabolic: FixedValue=0
        BiomassDemand NDemands
          MultiplyFunction Structural
            VariableReference MinNconc: VariableName=[Root].minimumNconc
            VariableReference PotentialDMAllocation: VariableName=[Root].potentialDMAllocation.Structural
          MultiplyFunction Metabolic
            SubtractFunction MetabolicNconc
              VariableReference CritNconc: VariableName=[Root].criticalNConc
              VariableReference MinNconc: VariableName=[Root].minimumNconc
            VariableReference PotentialDMAllocation: VariableName=[Root].potentialDMAllocation.Structural
          StorageNDemandFunction Storage
            VariableReference NitrogenDemandSwitch: VariableName=[Root].nitrogenDemandSwitch
            VariableReference MaxNconc: VariableName=[Root].maximumNconc
        XYPairs: X=[500, 600]; Y=[0.8, 1]
        VariableReference CriticalNConc: VariableName=[Root].MinimumNConc
        BiomassDemand InitialWt
          Constant Structural: FixedValue=0.2; Units=g/plant
          Constant Metabolic: FixedValue=0
          Constant Storage: FixedValue=0
        Constant RootDepthStressFactor: FixedValue=1
        MultiplyFunction SenescenceRate
          Constant Switch: FixedValue=1
          Constant MaxSenescRate: FixedValue=0.028; Units=/day
          LinearInterpolationFunction TempEff_root
            SoilTemperatureDepthFunction: Depth=100
            XYPairs: X=[0, 20, 30, 45, 50]; Y=[0, 0.25, 0.5, 1, 0.2]
            VariableReference XValue
              VariableName=[Root].SenescenceRate.TempEff_root.SoilTemperatureDepthFunction
          LinearInterpolationFunction ChoEff_root
            XYPairs: X=[0, 0.04, 0.2, 0.3]; Y=[1, 1, 1, 1]
            DivideFunction XValue
              VariableReference STG: VariableName=[Root].Live.StorageWt
              VariableReference LIVE: VariableName=[Root].Live.Wt
          Memo
            ## Reference

            Note: First attempt to have some seasonnal dynamics of fine-roots, no data available for testing so based only in Luo et al 1995 at this initial stage.

            https://www.sciencedirect.com/science/article/pii/037842909400090Y

            Y.Luo; P.A.Meyerhoff; R.S.Loomis (1995) Seasonal patterns and vertical distributions of fine roots of alfalfa (Medicago sativa L.).Field Crops Research
            Volume 40, Issue 2, February 1995, Pages 119-127

            0.0012/h (page 122) converts into 0.028/day of MaxSenescRate

            Temp_Eff_root is effect of temperature from Figure 2 panel D

            ChoEff_root is effect of soluble CHOs from Figure 2 Panel C - This is not functional yet.

            Some sensible patterns checked:

            - Temperature adjusted turnover rates were assumed sensible if around 1%/day
            - Seasonality with lowest amounts in summer
            - Total amounts (1.5 m depth) from 1 to 3 t DM/ha

            based on Reid, J., Gray, R., Springett, J. and Crush, J. (2015), Root turnover in pasture species: chicory, lucerne, perennial ryegrass and white clover. Ann Appl Biol, 167: 327-342. doi:10.1111/aab.12228

            https://onlinelibrary.wiley.com/doi/abs/10.1111/aab.12228

            FIXME: Need data and suggested that parameters are estimated by optmising [RUEtot + Resp + Translocation] in relation to [Shoot + Root]
        MultiplyFunction MaintenanceRespirationFunction
          Constant Switch: FixedValue=0
          LinearInterpolationFunction BaseRespirationCoefficient
            XYPairs: X=[10.5, 16.5]; Y=[0.005, 0.005]
            VariableReference XValue: VariableName=[Phenology].Photoperiod
          ExpressionFunction Q10TempAdj: Expression=Q10^ExpTempAdj
            Constant Q10: FixedValue=1.8
            DivideFunction ExpTempAdj
              SubtractFunction
                SoilTemperatureDepthFunction: Depth=100
                Constant: FixedValue=20
              Constant: FixedValue=10
          Memo Description
            Indexes from Xiumei Yang PhD Lincoln University 2021: Base resp coeff is assumed "zero" here as senescence is doing nearly all seasonality of taproots as per Xiumei's 2021 approach.

            The Q10 part is at:Modelling respiration of vegetation: evidence for a general temperature-dependent Q10. Global Change Biology (2001) 7, 223-230. https://onlinelibrary.wiley.com/doi/epdf/10.1046/j.1365-2486.2001.00397.x

            FIXME: Suggested that parameters are estimated by optmising [RUEtot + Resp + Translocation] in relation to [Shoot + Root]
      Constant MortalityRate: FixedValue=0
      Nodule
        Constant FixationMetabolicCost: FixedValue=0
        Constant DMDemandFunction: FixedValue=0.01
        Constant MaximumNConc: FixedValue=0.02
        Constant MinimumNConc: FixedValue=0.01
        Constant SenescenceRate: FixedValue=0
        Constant NReallocationFactor: FixedValue=0
        PhaseLookupValue NitrogenDemandSwitch: Start=Emergence; End=Maturity
          Constant: FixedValue=1
        BiomassRemoval BiomassRemovalDefaults
          OrganBiomassRemovalType Harvest: FractionLiveToRemove=0.5; FractionDeadToRemove=0; FractionLiveToResidue=0.1; FractionDeadToResidue=0
          OrganBiomassRemovalType Cut: FractionLiveToRemove=0; FractionDeadToRemove=0; FractionLiveToResidue=0; FractionDeadToResidue=0
          OrganBiomassRemovalType Prune: FractionLiveToRemove=0; FractionDeadToRemove=0; FractionLiveToResidue=0.6; FractionDeadToResidue=0
          OrganBiomassRemovalType Graze: FractionLiveToRemove=0.6; FractionDeadToRemove=0; FractionLiveToResidue=0.2; FractionDeadToResidue=0
        Constant StructuralFraction: FixedValue=1; Units=g/g
        Constant InitialWtFunction: FixedValue=0; Units=g/m^2
        Constant DetachmentRateFunction: FixedValue=0; Units=/d
        Constant MaintenanceRespirationFunction: FixedValue=0; Units=0-1
        Constant DMConversionEfficiency: FixedValue=1; Units=0-1
        MultiplyFunction FixationRate
          Constant FixationCoefficiency: FixedValue=0.025; Units=g/m^2/d
          VariableReference: VariableName=[Leaf].Photosynthesis
        Constant NRetranslocationFactor: FixedValue=0
        Constant DMReallocationFactor: FixedValue=0
        Constant DMRetranslocationFactor: FixedValue=0
        VariableReference CriticalNConc: VariableName=[Nodule].MinimumNConc
        Constant RemobilisationCost: FixedValue=0
        Constant CarbonConcentration: FixedValue=0.4
        BiomassDemand DMDemands
          Constant Structural: FixedValue=0.01
          Constant Storage: FixedValue=0
          Constant Metabolic: FixedValue=0
        BiomassDemand NDemands
          MultiplyFunction Structural
            VariableReference MinNconc: VariableName=[Nodule].minimumNconc
            VariableReference PotentialDMAllocation: VariableName=[Nodule].potentialDMAllocation.Structural
          MultiplyFunction Metabolic
            SubtractFunction MetabolicNconc
              VariableReference CritNconc: VariableName=[Nodule].criticalNConc
              VariableReference MinNconc: VariableName=[Nodule].minimumNconc
            VariableReference PotentialDMAllocation: VariableName=[Nodule].potentialDMAllocation.Structural
          StorageNDemandFunction Storage
            VariableReference NitrogenDemandSwitch: VariableName=[Nodule].nitrogenDemandSwitch
            VariableReference MaxNconc: VariableName=[Nodule].maximumNconc
      SimpleLeaf Leaf: Albedo=0.18; Gsmax350=0.006; R50=100; LeafInitialisationStage=Emergence; Height=0; BaseHeight=0; Width=0; FRGR=0; PotentialEP=0; WaterDemand=0; KDead=0; LAIDead=0
        Memo Description
          Stover represents any part of the crop that is not removed at harvest (i.e not part of the product).

          RUE and LEAR have water stress effects now from Sim 2014 PhD thesis
        RUEModel Photosynthesis
          Constant RUE: FixedValue=1.1
          WeightedTemperatureFunction FT: MaximumTemperatureWeighting=0.5
            XYPairs: X=[0, 18, 30, 40]; Y=[0, 1, 1, 0]
          LinearInterpolationFunction FW
            XYPairs: X=[0, 0.15, 0.75, 0.9, 1]; Y=[0, 0.4, 0.75, 1, 1]
            VariableReference XValue: VariableName=[Leaf].Fw
          RUECO2Function FCO2: PhotosyntheticPathway=C3
          VariableReference RadnInt: VariableName=[Leaf].RadiationIntercepted
          Constant FVPD: FixedValue=1
          Constant FN: FixedValue=1
          Memo
            Coefficients from Brown et al 2006. European Journal of Agronomy Volume 25, Issue 4, November 2006, Pages 319-327
        AccumulateFunction NodeNumber: StartStageName=Emergence; EndStageName=Maturity; FractionRemovedOnCut=1; FractionRemovedOnHarvest=1; FractionRemovedOnGraze=1; FractionRemovedOnPrune=0
          VariableReference BasalBudNode: VariableName=[BasalBuds].NodeNumber
          DivideFunction DeltaNode
            VariableReference ThermalTime: VariableName=[Phenology].ThermalTime
            PhaseLookup Phyllochron
              PhaseLookupValue Juvenile: Start=Emergence; End=EndJuvenile
                Constant: FixedValue=50
              PhaseLookupValue Vegetative: Start=EndJuvenile; End=StartFlowering
                LessThanFunction Phyllochron
                  VariableReference DeltaPhotoperiod: VariableName=[Phenology].DeltaPhotoperiod
                  Constant Zero: FixedValue=0
                  LinearInterpolationFunction Decreasing
                    XYPairs: X=[10, 16.5]; Y=[49, 35]
                    VariableReference XValue: VariableName=[Phenology].Photoperiod
                  LinearInterpolationFunction Increasing
                    XYPairs: X=[10, 12, 16.5]; Y=[49, 31, 31]
                    VariableReference XValue: VariableName=[Phenology].Photoperiod
              PhaseLookupValue Reproductive: Start=StartFlowering; End=Maturity
                LinearInterpolationFunction Phyllochron
                  XYPairs: X=[12, 16]; Y=[69, 69]
                  VariableReference XValue: VariableName=[Phenology].Photoperiod
              LinearInterpolationFunction WaterStressImpact
                XYPairs: X=[0, 0.5, 0.6, 0.7, 1]; Y=[2, 2, 1.8, 1.1, 1]
                VariableReference XValue: VariableName=[Lucerne].Leaf.Fw
          MultiplyFunction FrostDeath
            VariableReference NodeNumber: VariableName=[Leaf].NodeNumber
            VariableReference FrostFraction: VariableName=[Leaf].FrostFraction
            Constant: FixedValue=-1
        BasialBuds BasalBuds: ResetStageName=FloralInitiation; NodeNumber=0; LAI=0
          PhaseLookup DeltaLAI
            PhaseLookupValue: Start=FloralInitiation; End=Maturity
              MultiplyFunction
                VariableReference DeltaLAI: VariableName=[Leaf].Area.LeafArea.DeltaLAI
                Constant BasalBudFactor: FixedValue=0
          PhaseLookup DeltaNodeNumber
            PhaseLookupValue: Start=StartFlowering; End=Maturity
              MultiplyFunction
                VariableReference: VariableName=[Leaf].NodeNumber.DeltaNode
                Constant BasalBudFactor: FixedValue=0
          Memo Description
            FIXME: Note, opted to set both "BasalBudFactor" coefficients to zero (i.e. turned off) as these were causing unrealistically high estimates of node number. Needs revision of logic + refs if opted to be used.
        MaximumFunction Area
          AccumulateFunction LeafArea: StartStageName=Emergence; EndStageName=Maturity; FractionRemovedOnCut=1; FractionRemovedOnHarvest=1; FractionRemovedOnGraze=1; FractionRemovedOnPrune=1
            LessThanFunction BasalBudLAI
              VariableReference DaysAfterCutting: VariableName=[Phenology].DaysAfterCutting
              Constant Two: FixedValue=2
              VariableReference BasalBudLAIAtCutting: VariableName=[BasalBuds].LAI
              Constant Zero: FixedValue=0
            MultiplyFunction DeltaLAI
              PhaseLookup LAER
                PhaseLookupValue Juvenile: Start=Emergence; End=EndJuvenile
                  Constant: FixedValue=0.002
                PhaseLookupValue Vegetative: Start=EndJuvenile; End=StartFlowering
                  LessThanFunction LAER
                    VariableReference DeltaPhotoperiod: VariableName=[Phenology].DeltaPhotoperiod
                    Constant Zero: FixedValue=0
                    LinearInterpolationFunction Decreasing
                      XYPairs: X=[8, 10, 16.5]; Y=[0, 0.0056, 0.015]
                      VariableReference XValue: VariableName=[Phenology].Photoperiod
                    LinearInterpolationFunction Increasing
                      XYPairs: X=[8, 11.5, 12, 16.5]; Y=[0, 0, 0.018, 0.02]
                      VariableReference XValue: VariableName=[Phenology].Photoperiod
                PhaseLookupValue Reproductive: Start=StartFlowering; End=Maturity
                  Constant: FixedValue=0
              VariableReference ThermalTime: VariableName=[Phenology].ThermalTime1
              LinearInterpolationFunction Seedling
                XYPairs: X=[1, 367]; Y=[0.98, 1]
                VariableReference XValue: VariableName=[Lucerne].DaysAfterSowing
              LessThanFunction Earlylag
                VariableReference DeltaPhotoperiod: VariableName=[Phenology].DeltaPhotoperiod
                Constant Zero: FixedValue=0
                LinearInterpolationFunction Decreasing
                  XYPairs: X=[0, 150, 200]; Y=[0, 1, 1]
                  VariableReference XValue: VariableName=[Phenology].ThermalTimeAfterCutting
                LinearInterpolationFunction Increasing
                  XYPairs: X=[0, 150, 200]; Y=[0, 0.5, 1]
                  VariableReference XValue: VariableName=[Phenology].ThermalTimeAfterCutting
              LinearInterpolationFunction WaterStressImpact
                XYPairs: X=[0, 0.5, 0.9, 1]; Y=[0.1, 0.1, 0.9, 1]
                VariableReference XValue: VariableName=[Lucerne].Leaf.Fw
            MultiplyFunction FrostDeath
              VariableReference LAI: VariableName=[Leaf].LAI
              VariableReference FrostFraction: VariableName=[Leaf].FrostFraction
              Constant: FixedValue=-1
            MultiplyFunction Senescence
              Memo Description
                Red clover has, similar to otehr clovers, a relatively high rate of leaf senescence, with leaf area estabilising when LAI reaches about 5.0 m2/m2 ([Brougham1958_LeafDev]; [JoggiEtAl1983_RedClover]; [MurrayThesis2012]).  Generic relationships to enviromental factors, such as temperature and soil moisture, are assumed based on other plant models.
              Constant ReferenceRate: FixedValue=-0.2; Units=/day
              LinearInterpolationFunction StageFactor
                XYPairs: X=[3, 4, 5, 6, 7, 8]; Y=[0, 0, 0.3, 0.5, 0.6, 1]
                VariableReference XValue: VariableName=[Phenology].Stage
              LinearInterpolationFunction CoverFactor
                XYPairs: X=[0, 2, 4, 5, 7]; Y=[0, 0, 0.5, 0.5, 1.5]
                VariableReference XValue: VariableName=[Leaf].LAI
              WeightedTemperatureFunction TemperatureFactor: MaximumTemperatureWeighting=0.5
                XYPairs: X=[-20, -5, 0, 5, 17, 28, 37.5]; Y=[1.5, 0.25, 0.1, 0.1, 1, 1, 1.5]
              LinearInterpolationFunction SoilMoistureFactor
                XYPairs: X=[0, 0.5, 1]; Y=[1, 1, 1]
                VariableReference XValue: VariableName=[Leaf].Fw
          Constant: FixedValue=0; Units=m^2/m^2
        MaximumFunction SenescenceRate
          DivideFunction SenescenceRate
            MultiplyFunction SenescenceLeafArea
              VariableReference SenescenceRate: VariableName=[Leaf].Area.LeafArea.Senescence
              Constant SLW: FixedValue=-1
            VariableReference LeafLive: VariableName=[Leaf].Live.Wt
          Constant: FixedValue=0
        LessThanFunction FrostFraction
          VariableReference DeltaPhotoperiod: VariableName=[Phenology].DeltaPhotoperiod
          Constant Zero: FixedValue=0
          LinearInterpolationFunction Decreasing
            XYPairs: X=[-15, -5]; Y=[1, 0]
            VariableReference XValue: VariableName=[Weather].MinT
          LinearInterpolationFunction Increasing
            XYPairs: X=[-10, -5]; Y=[1, 0]
            VariableReference XValue: VariableName=[Weather].MinT
        MinimumFunction FRGR
          HourlyInterpolation FRGRFunctionTemp: agregationMethod=0
            XYPairs Response: X=[0, 10, 25, 40]; Y=[0, 1, 1, 0]
            ThreeHourSin InterpolationMethod
        PhaseLookup ExtinctionCoefficient
          PhaseLookupValue Juvenile: Start=Emergence; End=EndJuvenile
            Constant: FixedValue=0.81
          PhaseLookupValue Vegetative: Start=EndJuvenile; End=StartFlowering
            Constant: FixedValue=0.81
          PhaseLookupValue Reproductive: Start=StartFlowering; End=Maturity
            Constant: FixedValue=0.81
          Memo Description
            The extinction coefficient is used to calculate a LAI value (needed by MicroClimate) from the canopy cover
        MultiplyFunction Tallness
          AccumulateFunction Tallness: StartStageName=Emergence; EndStageName=StartPodfill; FractionRemovedOnCut=1; FractionRemovedOnHarvest=1; FractionRemovedOnGraze=1; FractionRemovedOnPrune=1
            DivideFunction DeltaHeight
              VariableReference ThermalTime: VariableName=[Phenology].ThermalTime1
              PhaseLookup Heightchron
                PhaseLookupValue Juvenile: Start=Emergence; End=EndJuvenile
                  Constant: FixedValue=3
                PhaseLookupValue Vegetative: Start=EndJuvenile; End=StartFlowering
                  MultiplyFunction Heightchron
                    ExponentialFunction Heightchron: A=0.62; B=97660; C=-1
                      VariableReference XValue: VariableName=[Phenology].Photoperiod
                    LinearInterpolationFunction NFactor
                      XYPairs: X=[0, 1.5]; Y=[1.7, 1]
                      VariableReference XValue: VariableName=[Lucerne].TapRoot.Live.StorageN
                PhaseLookupValue Reproductive: Start=StartFlowering; End=Maturity
                  LinearInterpolationFunction Heightchron
                    XYPairs: X=[12, 16]; Y=[2.2, 1.8]
                    VariableReference XValue: VariableName=[Phenology].Photoperiod
            MultiplyFunction FrostDeath
              VariableReference Height: VariableName=[Leaf].Height
              VariableReference FrostFraction: VariableName=[Leaf].FrostFraction
              Constant: FixedValue=-1
        Constant NReallocationFactor: FixedValue=1
        Constant DetachmentRate: FixedValue=0; Units=/d
        Constant StructuralFraction: FixedValue=1; Units=0-1
        Constant MaintenanceRespiration: FixedValue=0; Units=0-1
        Constant InitialWt: FixedValue=0.1
        Constant LaiDead: FixedValue=0; Units=m^2/m^2
        LessThanFunction MaximumNConc
          VariableReference DeltaPhotoperiod: VariableName=[Phenology].DeltaPhotoperiod
          Constant Zero: FixedValue=0
          LinearInterpolationFunction Decreasing
            XYPairs: X=[0, 300]; Y=[0.068, 0.04]
            VariableReference XValue: VariableName=[Leaf].Live.Wt
          LinearInterpolationFunction Increasing
            XYPairs: X=[0, 300]; Y=[0.06, 0.04]
            VariableReference XValue: VariableName=[Leaf].Live.Wt
        VariableReference CriticalNConc: VariableName=[Leaf].MinimumNConc
        LessThanFunction MinimumNConc
          VariableReference DeltaPhotoperiod: VariableName=[Phenology].DeltaPhotoperiod
          Constant Zero: FixedValue=0
          LinearInterpolationFunction Decreasing
            XYPairs: X=[0, 300]; Y=[0.055, 0.035]
            VariableReference XValue: VariableName=[Leaf].Live.Wt
          LinearInterpolationFunction Increasing
            XYPairs: X=[0, 300]; Y=[0.052, 0.035]
            VariableReference XValue: VariableName=[Leaf].Live.Wt
        Constant NitrogenDemandSwitch: FixedValue=0
        MultiplyFunction CrudeProteinConc
          VariableReference LeafLiveNConc: VariableName=[Leaf].Live.NConc
          Constant: FixedValue=6.25
          Constant UniteConvert: FixedValue=100
        MultiplyFunction MEConc
          LinearInterpolationFunction MEContent
            XYPairs: X=[0, 200, 400]; Y=[12.5, 11, 11]
            VariableReference XValue: VariableName=[Leaf].Live.Wt
        Constant DMConversionEfficiency: FixedValue=1; Units=0-1
        BiomassRemoval BiomassRemovalDefaults
          OrganBiomassRemovalType Harvest: FractionLiveToRemove=0; FractionDeadToRemove=0; FractionLiveToResidue=0.3; FractionDeadToResidue=0
          OrganBiomassRemovalType Cut: FractionLiveToRemove=0.95; FractionDeadToRemove=0.45; FractionLiveToResidue=0; FractionDeadToResidue=0.5
          OrganBiomassRemovalType Prune: FractionLiveToRemove=0; FractionDeadToRemove=0; FractionLiveToResidue=0.6; FractionDeadToResidue=0
          OrganBiomassRemovalType Graze: FractionLiveToRemove=0.6; FractionDeadToRemove=0; FractionLiveToResidue=0.1; FractionDeadToResidue=0
        Constant NRetranslocationFactor: FixedValue=0
        Constant DMReallocationFactor: FixedValue=1
        Constant DMRetranslocationFactor: FixedValue=0
        Constant RemobilisationCost: FixedValue=0
        Constant CarbonConcentration: FixedValue=0.4
        BiomassDemand DMDemands
          AllometricDemandFunction Structural: Const=39.4; Power=0.85
            VariableReference XValue: VariableName=[Leaf].LAI
            VariableReference YValue: VariableName=[Leaf].Live.Wt
          Constant Storage: FixedValue=0
          Constant Metabolic: FixedValue=0
        BiomassDemand NDemands
          MultiplyFunction Structural
            VariableReference MinNconc: VariableName=[Leaf].minimumNconc
            VariableReference PotentialDMAllocation: VariableName=[Leaf].potentialDMAllocation.Structural
          MultiplyFunction Metabolic
            SubtractFunction MetabolicNconc
              VariableReference CritNconc: VariableName=[Leaf].criticalNConc
              VariableReference MinNconc: VariableName=[Leaf].minimumNconc
            VariableReference PotentialDMAllocation: VariableName=[Leaf].potentialDMAllocation.Structural
          StorageNDemandFunction Storage
            VariableReference NitrogenDemandSwitch: VariableName=[Leaf].nitrogenDemandSwitch
            VariableReference MaxNconc: VariableName=[Leaf].maximumNconc
        Constant StomatalConductanceCO2Modifier: FixedValue=1
      GenericOrgan Stem: IsAboveGround=true
        Constant NReallocationFactor: FixedValue=0
        Constant NRetranslocationFactor: FixedValue=0
        Constant DMRetranslocationFactor: FixedValue=0.1
        LinearInterpolationFunction MaximumNConc
          XYPairs: X=[25, 40, 100, 200]; Y=[0.05, 0.038, 0.025, 0.017]
          VariableReference XValue: VariableName=[Stem].Live.Wt
        MultiplyFunction MinimumNConc
          Constant: FixedValue=0.54
          VariableReference MaximumNConc: VariableName=[Stem].MaximumNConc
        PhaseLookupValue NitrogenDemandSwitch: Start=Emergence; End=Maturity
          Constant: FixedValue=1
        MultiplyFunction CrudeProteinConc
          VariableReference StemLiveNConc: VariableName=[Stem].Live.NConc
          Constant CPContent: FixedValue=6.25
          Constant UniteConvert: FixedValue=100
        MultiplyFunction MEConc
          LinearInterpolationFunction MEContent
            XYPairs: X=[0, 260, 600]; Y=[10.5, 5.7, 5.7]
            VariableReference XValue: VariableName=[Stem].Live.Wt
        Constant StructuralFraction: FixedValue=1
        BiomassRemoval BiomassRemovalDefaults
          OrganBiomassRemovalType Harvest: FractionLiveToRemove=0.5; FractionDeadToRemove=0; FractionLiveToResidue=0.1; FractionDeadToResidue=0
          OrganBiomassRemovalType Cut: FractionLiveToRemove=0.95; FractionDeadToRemove=0; FractionLiveToResidue=0; FractionDeadToResidue=0
          OrganBiomassRemovalType Prune: FractionLiveToRemove=0; FractionDeadToRemove=0; FractionLiveToResidue=0.6; FractionDeadToResidue=0
          OrganBiomassRemovalType Graze: FractionLiveToRemove=0.6; FractionDeadToRemove=0; FractionLiveToResidue=0.2; FractionDeadToResidue=0
        Constant SenescenceRate: FixedValue=0; Units=/d
        Constant DetachmentRateFunction: FixedValue=0; Units=/d
        Constant MaintenanceRespirationFunction: FixedValue=0; Units=0-1
        Constant DMConversionEfficiency: FixedValue=1; Units=0-1
        AllometricDemandFunction DMDemandFunction: Const=0.1452028; Power=1.23213787
          VariableReference XValue: VariableName=[AboveGround].Wt
          VariableReference YValue: VariableName=[Stem].Live.Wt
        Constant Phyollchorn: FixedValue=0
        Constant DMReallocationFactor: FixedValue=0
        VariableReference CriticalNConc: VariableName=[Stem].MinimumNConc
        Constant RemobilisationCost: FixedValue=0
        Constant CarbonConcentration: FixedValue=0.4
        BiomassDemand DMDemands
          AllometricDemandFunction Structural: Const=0.14; Power=1.24
            VariableReference XValue: VariableName=[AboveGround].Wt
            VariableReference YValue: VariableName=[Stem].Live.Wt
          Constant Storage: FixedValue=0
          Constant Metabolic: FixedValue=0
        BiomassDemand NDemands
          MultiplyFunction Structural
            VariableReference MinNconc: VariableName=[Stem].minimumNconc
            VariableReference PotentialDMAllocation: VariableName=[Stem].potentialDMAllocation.Structural
          MultiplyFunction Metabolic
            SubtractFunction MetabolicNconc
              VariableReference CritNconc: VariableName=[Stem].criticalNConc
              VariableReference MinNconc: VariableName=[Stem].minimumNconc
            VariableReference PotentialDMAllocation: VariableName=[Stem].potentialDMAllocation.Structural
          StorageNDemandFunction Storage
            VariableReference NitrogenDemandSwitch: VariableName=[Stem].nitrogenDemandSwitch
            VariableReference MaxNconc: VariableName=[Stem].maximumNconc
        RetranslocateNonStructural RetranslocateNitrogen
        BiomassDemand InitialWt
          Constant Structural: FixedValue=0; Units=g/m^2
          Constant Metabolic: FixedValue=0
          Constant Storage: FixedValue=0
      GenericOrgan Shell: IsAboveGround=true
        Constant NReallocationFactor: FixedValue=0
        Constant NRetranslocationFactor: FixedValue=0.1
        Constant DMRetranslocationFactor: FixedValue=0.1
        Constant MaximumNConc: FixedValue=0.03
        Constant MinimumNConc: FixedValue=0.01
        PhaseLookupValue NitrogenDemandSwitch: Start=Emergence; End=Maturity
          Constant: FixedValue=1
        Constant StructuralFraction: FixedValue=1
        BiomassRemoval BiomassRemovalDefaults
          OrganBiomassRemovalType Harvest: FractionLiveToRemove=0.5; FractionDeadToRemove=0; FractionLiveToResidue=0.1; FractionDeadToResidue=0
          OrganBiomassRemovalType Cut: FractionLiveToRemove=0.8; FractionDeadToRemove=0; FractionLiveToResidue=0; FractionDeadToResidue=0
          OrganBiomassRemovalType Prune: FractionLiveToRemove=0; FractionDeadToRemove=0; FractionLiveToResidue=0.6; FractionDeadToResidue=0
          OrganBiomassRemovalType Graze: FractionLiveToRemove=0.6; FractionDeadToRemove=0; FractionLiveToResidue=0.2; FractionDeadToResidue=0
        Constant SenescenceRate: FixedValue=0; Units=/d
        Constant DetachmentRateFunction: FixedValue=0; Units=/d
        Constant MaintenanceRespirationFunction: FixedValue=0; Units=0-1
        Constant DMConversionEfficiency: FixedValue=1; Units=0-1
        PartitionFractionDemandFunction DMDemandFunction
          PhaseLookup PartitionFraction
            PhaseLookupValue: Start=StartPodfill; End=Maturity
              Constant: FixedValue=0.2
        Constant DMReallocationFactor: FixedValue=0
        VariableReference CriticalNConc: VariableName=[Shell].MinimumNConc
        Constant RemobilisationCost: FixedValue=0
        Constant CarbonConcentration: FixedValue=0.4
        BiomassDemand DMDemands
          PartitionFractionDemandFunction Structural: same as Replacements.Lucerne.Shell.DMDemandFunction
          Constant Storage: FixedValue=0
          Constant Metabolic: FixedValue=0
        BiomassDemand NDemands
          MultiplyFunction Structural
            VariableReference MinNconc: VariableName=[Shell].minimumNconc
            VariableReference PotentialDMAllocation: VariableName=[Shell].potentialDMAllocation.Structural
          MultiplyFunction Metabolic
            SubtractFunction MetabolicNconc
              VariableReference CritNconc: VariableName=[Shell].criticalNConc
              VariableReference MinNconc: VariableName=[Shell].minimumNconc
            VariableReference PotentialDMAllocation: VariableName=[Shell].potentialDMAllocation.Structural
          StorageNDemandFunction Storage
            VariableReference NitrogenDemandSwitch: VariableName=[Shell].nitrogenDemandSwitch
            VariableReference MaxNconc: VariableName=[Shell].maximumNconc
        RetranslocateNonStructural RetranslocateNitrogen
        BiomassDemand InitialWt
          Constant Structural: FixedValue=0; Units=g/m^2
          Constant Metabolic: FixedValue=0
          Constant Storage: FixedValue=0
      GenericOrgan Grain: IsAboveGround=true
        Constant NReallocationFactor: FixedValue=0
        Constant NRetranslocationFactor: FixedValue=0.1
        Constant DMRetranslocationFactor: FixedValue=0.1
        Constant MaximumNConc: FixedValue=0.03
        Constant MinimumNConc: FixedValue=0.01
        PhaseLookupValue NitrogenDemandSwitch: Start=Emergence; End=Maturity
          Constant: FixedValue=1
        Constant StructuralFraction: FixedValue=1
        BiomassRemoval BiomassRemovalDefaults: same as Replacements.Lucerne.Shell.BiomassRemovalDefaults
        Constant SenescenceRate: FixedValue=0; Units=/d
        Constant DetachmentRateFunction: FixedValue=0; Units=/d
        Constant MaintenanceRespirationFunction: FixedValue=0; Units=0-1
        Constant DMConversionEfficiency: FixedValue=1; Units=0-1
        PartitionFractionDemandFunction DMDemandFunction: same as Replacements.Lucerne.Shell.DMDemandFunction
        Constant DMReallocationFactor: FixedValue=0
        VariableReference CriticalNConc: VariableName=[Grain].MinimumNConc
        Constant RemobilisationCost: FixedValue=0
        Constant CarbonConcentration: FixedValue=0.4
        BiomassDemand DMDemands: same as Replacements.Lucerne.Shell.DMDemands
        BiomassDemand NDemands
          MultiplyFunction Structural
            VariableReference MinNconc: VariableName=[Grain].minimumNconc
            VariableReference PotentialDMAllocation: VariableName=[Grain].potentialDMAllocation.Structural
          MultiplyFunction Metabolic
            SubtractFunction MetabolicNconc
              VariableReference CritNconc: VariableName=[Grain].criticalNConc
              VariableReference MinNconc: VariableName=[Grain].minimumNconc
            VariableReference PotentialDMAllocation: VariableName=[Grain].potentialDMAllocation.Structural
          StorageNDemandFunction Storage
            VariableReference NitrogenDemandSwitch: VariableName=[Grain].nitrogenDemandSwitch
            VariableReference MaxNconc: VariableName=[Grain].maximumNconc
        RetranslocateNonStructural RetranslocateNitrogen
        BiomassDemand InitialWt
          Constant Structural: FixedValue=0; Units=g/m^2
          Constant Metabolic: FixedValue=0
          Constant Storage: FixedValue=0
      GenericOrgan TapRoot: IsAboveGround=false
        Constant NReallocationFactor: FixedValue=1
        PhaseLookup NRetranslocationFactor
          PhaseLookupValue Juvenile: Start=Emergence; End=EndJuvenile
            Constant: FixedValue=0
          PhaseLookupValue Vegetative: Start=EndJuvenile; End=StartFlowering
            MultiplyFunction
              LessThanFunction AnnualEffect
                VariableReference DeltaPhotoperiod: VariableName=[Phenology].DeltaPhotoperiod
                Constant Zero: FixedValue=-0.02
                Constant Decreasing: FixedValue=0.001
                Constant Increasing: FixedValue=0.03
              LinearInterpolationFunction RegrowthEffect
                XYPairs: X=[0, 300, 350]; Y=[1.5, 1.5, 0]
                VariableReference XValue: VariableName=[Phenology].ThermalTimeAfterCutting
          PhaseLookupValue Reproductive: Start=StartFlowering; End=Maturity
            Constant: FixedValue=0
          Memo Description
            The extinction coefficient is used to calculate a LAI value (needed by MicroClimate) from the canopy cover
        PhaseLookup DMRetranslocationFactor
          PhaseLookupValue Juvenile: Start=Emergence; End=EndJuvenile
            Constant: FixedValue=0
          PhaseLookupValue Vegetative: Start=EndJuvenile; End=StartFlowering
            MultiplyFunction
              LessThanFunction AnnualEffect
                VariableReference DeltaPhotoperiod: VariableName=[Phenology].DeltaPhotoperiod
                Constant Zero: FixedValue=-0.02
                Constant Decreasing: FixedValue=0
                Constant Increasing: FixedValue=0.075
              LinearInterpolationFunction RegrowthEffect
                XYPairs: X=[0, 300, 350]; Y=[1, 1, 0]
                VariableReference XValue: VariableName=[Phenology].ThermalTimeAfterCutting
          PhaseLookupValue Reproductive: Start=StartFlowering; End=Maturity
            Constant: FixedValue=0
          Memo
            Logic and parameters from Xiumei's Lincoln University PhD Thesis 2021. Refactored to simplify interpretation.
        LinearInterpolationFunction MaximumNConc
          XYPairs: X=[0, 500, 1000]; Y=[0.015, 0.02, 0.025]
          VariableReference XValue: VariableName=[Taproot].Live.Wt
        LinearInterpolationFunction MinimumNConc
          XYPairs: X=[0, 600, 1000]; Y=[0.009, 0.009, 0.009]
          VariableReference XValue: VariableName=[Taproot].Live.Wt
        PhaseLookupValue NitrogenDemandSwitch: Start=Emergence; End=Maturity
          Constant: FixedValue=1
        Constant StructuralFraction: FixedValue=0.4
        BiomassRemoval BiomassRemovalDefaults
          OrganBiomassRemovalType Harvest: FractionLiveToRemove=0; FractionDeadToRemove=0; FractionLiveToResidue=0; FractionDeadToResidue=0
          OrganBiomassRemovalType Cut: FractionLiveToRemove=0; FractionDeadToRemove=0; FractionLiveToResidue=0; FractionDeadToResidue=0
          OrganBiomassRemovalType Prune: FractionLiveToRemove=0; FractionDeadToRemove=0; FractionLiveToResidue=0; FractionDeadToResidue=0
          OrganBiomassRemovalType Graze: FractionLiveToRemove=0; FractionDeadToRemove=0; FractionLiveToResidue=0; FractionDeadToResidue=0
        Constant SenescenceRate: FixedValue=0; Units=/d
        Constant DetachmentRateFunction: FixedValue=0; Units=/d
        Constant DMConversionEfficiency: FixedValue=1; Units=0-1
        Constant DMReallocationFactor: FixedValue=0
        VariableReference CriticalNConc: VariableName=[Taproot].MinimumNConc
        Constant RemobilisationCost: FixedValue=0
        Constant CarbonConcentration: FixedValue=0.4
        BiomassDemand NDemands
          MultiplyFunction Structural
            VariableReference MinNconc: VariableName=[TapRoot].minimumNconc
            VariableReference PotentialDMAllocation: VariableName=[TapRoot].potentialDMAllocation.Structural
          MultiplyFunction Metabolic
            SubtractFunction MetabolicNconc
              VariableReference CritNconc: VariableName=[TapRoot].criticalNConc
              VariableReference MinNconc: VariableName=[TapRoot].minimumNconc
            VariableReference PotentialDMAllocation: VariableName=[TapRoot].potentialDMAllocation.Structural
          MultiplyFunction Storage
            LessThanFunction Photoperiod
              VariableReference DeltaPhotoperiod: VariableName=[Phenology].DeltaPhotoperiod
              Constant Zero: FixedValue=-0.02
              MultiplyFunction Decreasing
                StorageNDemandFunction Decreasing
                  VariableReference NitrogenDemandSwitch: VariableName=[TapRoot].nitrogenDemandSwitch
                  VariableReference MaxNconc: VariableName=[TapRoot].maximumNconc
                Constant: FixedValue=0.05
              Constant Increasing: FixedValue=0
              LinearInterpolationFunction RegrowthEffect
                XYPairs: X=[0, 300, 350]; Y=[0, 0, 1.5]
                VariableReference XValue: VariableName=[Phenology].ThermalTimeAfterCutting
        BiomassDemand DMDemands
          MultiplyFunction Structural
            AddFunction
              SubtractFunction Structural
                MaximumFunction MaximumTapRootStructuralDM
                  Constant: FixedValue=250
                  VariableReference TapRootStructuralDM: VariableName=[TapRoot].Live.StructuralWt
                VariableReference TapRootStructuralDM: VariableName=[TapRoot].Live.StructuralWt
            Constant multiplier: FixedValue=0.01
          MultiplyFunction Storage
            SubtractFunction Capacity
              MultiplyFunction Maxium
                VariableReference Structural: VariableName=[TapRoot].Live.StructuralWt
                PhaseLookup MultiplyFunction
                  PhaseLookupValue Juvenile: Start=Emergence; End=EndJuvenile
                    Constant: FixedValue=3
                  PhaseLookupValue Vegetative: Start=EndJuvenile; End=StartFlowering
                    Constant: FixedValue=1.6
                  PhaseLookupValue Reproductive: Start=StartFlowering; End=Maturity
                    Constant: FixedValue=2.3
                Constant: FixedValue=1
              VariableReference Current: VariableName=[TapRoot].Live.StorageWt
            MultiplyFunction
              LessThanFunction Photoperiod
                VariableReference DeltaPhotoperiod: VariableName=[Phenology].DeltaPhotoperiod
                Constant Zero: FixedValue=-0.02
                Constant Decreasing: FixedValue=1
                Constant Increasing: FixedValue=0
              LinearInterpolationFunction RegrowthEffect
                XYPairs: X=[0, 300, 350]; Y=[0, 0, 1.5]
                VariableReference XValue: VariableName=[Phenology].ThermalTimeAfterCutting
          Constant Metabolic: FixedValue=0
        RetranslocateNonStructural RetranslocateNitrogen
        BiomassDemand InitialWt
          Constant Structural: FixedValue=0; Units=g/m^2
          Constant Metabolic: FixedValue=0
          Constant Storage: FixedValue=0
        MultiplyFunction MaintenanceRespirationFunction
          Constant Switch: FixedValue=0
          LinearInterpolationFunction BaseRespirationCoefficient
            XYPairs: X=[10.5, 16.5]; Y=[0.005, 0.005]
            VariableReference XValue: VariableName=[Phenology].Photoperiod
          ExpressionFunction Q10TempAdj: same as Replacements.Lucerne.Root.MaintenanceRespirationFunction.Q10TempAdj
          Memo Description
            Coefficients from Xiumei Yang PhD Lincoln University 2021.

            The Q10 part is at: Modelling respiration of vegetation: evidence for a general temperature-dependent Q10. Global Change Biology (2001) 7, 223-230. https://onlinelibrary.wiley.com/doi/epdf/10.1046/j.1365-2486.2001.00397.x

            FIXME: Next step suggested is that parameters are estimated by optmising [RUEtot + Resp + Translocation] in relation to [Shoot + Root] - at the moment DMtranslocation is accounting for most of the seasonality so respiration is negligible.
      CompositeBiomass AboveGround: DMDOfStructural=0.6
        Propertys=[[Leaf].Live, [Leaf].Dead, [Stem].Live, [Stem].Dead, [Grain].Live, [Grain].Dead, [Shell].Live, [Shell].Dead]
      CompositeBiomass BelowGround: DMDOfStructural=0.6
        Propertys=[[Root].Live, [Root].Dead, [Nodule].Live, [Nodule].Dead, [TapRoot].Live, [TapRoot].Dead]
      CompositeBiomass Total: DMDOfStructural=0.6
        Propertys=[[Leaf].Live, [Leaf].Dead, [Stem].Live, [Stem].Dead, [Grain].Live, [Grain].Dead, [Shell].Live, [Shell].Dead, [Root].Live, [Root].Dead, [Nodule].Live, [Nodule].Dead, [TapRoot].Live, [TapRoot].Dead]
      CompositeBiomass TotalLive: DMDOfStructural=0.6
        Propertys=[[Leaf].Live, [Stem].Live, [Grain].Live, [Shell].Live, [Root].Live, [Nodule].Live, [TapRoot].Live]
      CompositeBiomass TotalDead: DMDOfStructural=0.6
        Propertys=[[Leaf].Dead, [Stem].Dead, [Grain].Dead, [Shell].Dead, [Root].Dead, [Nodule].Dead, [TapRoot].Dead]
      CompositeBiomass Pod: Propertys=[[Shell].Live, [Shell].Dead, [Grain].Live, [Grain].Dead]; DMDOfStructural=0.6
      Memo
        ## References

        ### **Ayaz S, McKenzie BA, McNeil DL, Hill GD.** **2004**. Light interception and utilization of four grain legumes sown at different plant populations and depths. _Journal of Agricultural Science,_ **142**: 297-308.
         **Ayaz S, McKenzie BA, Hill GD, McNeil DL.** **2004**. Variability in yield of four grain legume species in a subhumid temperate environment. II. Yield components. _Journal of Agricultural Science,_ **142**: 21-28.
         **Ayaz S, McKenzie BA, Hill GD, McNeil DL.** **2004**. Nitrogen distribution in four grain legumes. _Journal of Agricultural Science,_ **142**: 309-317.
         **Wilson DR, Robertson MJ.** **1996.** Pea phenology responses to temperature and photoperiod. _Australian Agronomy Society_.
      CultivarFolder
        Cultivar Kaituna
        Cultivar Trifecta
        Cultivar HunterRiver
        Cultivar Sceptre
        Cultivar SuperMonarca
        Cultivar WL611
        Cultivar southern_special
        Cultivar WL6112
        Cultivar WL6113
        Cultivar WL6114
        Cultivar FD2
          Command:
            [Leaf].Area.LeafArea.DeltaLAI.LAER.Vegetative.LAER.Decreasing.XYPairs.Y = 0, 0.0064, 0.015
            [Leaf].Area.LeafArea.DeltaLAI.LAER.Vegetative.LAER.Increasing.XYPairs.Y = 0, 0.015, 0.015,0.02
            [Leaf].Tallness.Tallness.DeltaHeight.Heightchron.Vegetative.Heightchron.Heightchron.A = 0.99
            [Leaf].Tallness.Tallness.DeltaHeight.Heightchron.Vegetative.Heightchron.Heightchron.B = 117400
            [Leaf].Tallness.Tallness.DeltaHeight.Heightchron.Vegetative.Heightchron.Heightchron.C = -1
            [Nodule].FixationRate.FixationCoefficiency.FixedValue=0.023
            [TapRoot].DMDemands.Storage.Capacity.Maxium.MultiplyFunction.Vegetative.Constant.FixedValue=2.5
            [TapRoot].DMDemands.Storage.Capacity.Maxium.MultiplyFunction.Reproductive.Constant.FixedValue=3
            [TapRoot].DMDemands.Storage.Capacity.Maxium.Constant.FixedValue=1
            [TapRoot].DMRetranslocationFactor.Vegetative.MultiplyFunction.AnnualEffect.Increasing.FixedValue=0.01
            [TapRoot].DMRetranslocationFactor.Vegetative.MultiplyFunction.RegrowthEffect.XYPairs.X =0, 250, 300
            [TapRoot].DMRetranslocationFactor.Vegetative.MultiplyFunction.RegrowthEffect.XYPairs.Y =1.5, 1.5, 0
            [TapRoot].DMDemands.Storage.MultiplyFunction.RegrowthEffect.XYPairs.X = 0, 250, 300
            [TapRoot].DMDemands.Storage.MultiplyFunction.RegrowthEffect.XYPairs.Y = 0, 0, 1.5
            [TapRoot].NRetranslocationFactor.Vegetative.MultiplyFunction.RegrowthEffect.XYPairs.X =0, 250, 300
            [TapRoot].NRetranslocationFactor.Vegetative.MultiplyFunction.RegrowthEffect.XYPairs.Y =1.5, 1.5, 0
            [TapRoot].NRetranslocationFactor.Vegetative.MultiplyFunction.AnnualEffect.Increasing.FixedValue=0.005
        Cultivar FD10
          Command:
            [Leaf].Area.LeafArea.DeltaLAI.LAER.Vegetative.LAER.Decreasing.XYPairs.Y = 0.01, 0.01, 0.01
            [Leaf].Area.LeafArea.DeltaLAI.LAER.Vegetative.LAER.Increasing.XYPairs.Y = 0, 0.01, 0.015,0.015
            [Leaf].Tallness.Tallness.DeltaHeight.Heightchron.Vegetative.Heightchron.Heightchron.A = 0.82
            [Leaf].Tallness.Tallness.DeltaHeight.Heightchron.Vegetative.Heightchron.Heightchron.B = 25470
            [Leaf].Tallness.Tallness.DeltaHeight.Heightchron.Vegetative.Heightchron.Heightchron.C = -1
            [TapRoot].DMDemands.Storage.Capacity.Maxium.Constant.FixedValue=1
            [TapRoot].DMDemands.Storage.Capacity.Maxium.MultiplyFunction.Vegetative.Constant.FixedValue=2.5
            [TapRoot].DMDemands.Storage.Capacity.Maxium.MultiplyFunction.Reproductive.Constant.FixedValue=2.5
            [Nodule].FixationRate.FixationCoefficiency.FixedValue=0.023
            [TapRoot].DMRetranslocationFactor.Vegetative.MultiplyFunction.AnnualEffect.Increasing.FixedValue=0.01
            [TapRoot].DMRetranslocationFactor.Vegetative.MultiplyFunction.RegrowthEffect.XYPairs.X =0, 500, 550
            [TapRoot].DMRetranslocationFactor.Vegetative.MultiplyFunction.RegrowthEffect.XYPairs.Y =1.5, 1.5, 0
            [TapRoot].DMDemands.Storage.MultiplyFunction.RegrowthEffect.XYPairs.X = 0, 500, 550
            [TapRoot].DMDemands.Storage.MultiplyFunction.RegrowthEffect.XYPairs.Y = 0, 0, 1.5
            [TapRoot].NRetranslocationFactor.Vegetative.MultiplyFunction.RegrowthEffect.XYPairs.X =0, 500, 550
            [TapRoot].NRetranslocationFactor.Vegetative.MultiplyFunction.RegrowthEffect.XYPairs.Y =1.5, 1.5, 0
            [TapRoot].NRetranslocationFactor.Vegetative.MultiplyFunction.AnnualEffect.Increasing.FixedValue=0.005
        Cultivar FD5
          Command:
            [TapRoot].DMRetranslocationFactor.Vegetative.MultiplyFunction.RegrowthEffect.XYPairs.X =0, 300, 350
            [TapRoot].DMRetranslocationFactor.Vegetative.MultiplyFunction.RegrowthEffect.XYPairs.Y =1.5, 1.5, 0
            [TapRoot].DMDemands.Storage.MultiplyFunction.RegrowthEffect.XYPairs.X = 0, 300, 350
            [TapRoot].DMDemands.Storage.MultiplyFunction.RegrowthEffect.XYPairs.Y = 0, 0, 1.5
            [TapRoot].DMRetranslocationFactor.Vegetative.MultiplyFunction.AnnualEffect.Increasing.FixedValue=0.05
            [TapRoot].NRetranslocationFactor.Vegetative.MultiplyFunction.RegrowthEffect.XYPairs.X =0, 300, 350
            [TapRoot].NRetranslocationFactor.Vegetative.MultiplyFunction.RegrowthEffect.XYPairs.Y =1.5, 1.5, 0
            [TapRoot].NRetranslocationFactor.Vegetative.MultiplyFunction.AnnualEffect.Increasing.FixedValue=0.02
        Cultivar Dupuits
        Cultivar SARDI7
        Cultivar SARDI10
        Cultivar CRIOULA
        Cultivar ESTANZUELACHANA
    Report: EventNames=[Clock].DoReport
      VariableNames:
        ([Lucerne].Leaf.Transpiration + [Soil].SoilWater.Es) as ET
        [Clock].Today
        [Lucerne].AboveGround.Wt
        [Lucerne].AboveGround.Wt *10 as ShootWt
        [Lucerne].Leaf.CoverDead
        [Lucerne].Leaf.CoverTotal
        [Lucerne].Leaf.CrudeProteinConc as LeafCP
        [Lucerne].Leaf.Area.LeafArea.DeltaLAI
        [Lucerne].Leaf.Photosynthesis
        [Lucerne].Leaf.Fn
        [Lucerne].Leaf.Fw
        [Lucerne].Leaf.Height as Height
        [Lucerne].Leaf.LAI as LAI
        [Lucerne].Leaf.Area
        [Lucerne].Leaf.Area.LeafArea.FrostDeath
        [Lucerne].Leaf.Live.Wt *10 as LeafWt
        [Lucerne].Leaf.NodeNumber as NodeNumber
        [Lucerne].Leaf.BasalBuds.NodeNumber
        [Lucerne].Leaf.SenescenceRate
        [Lucerne].Leaf.Dead.Wt
        [Lucerne].Leaf.Area.LeafArea.Senescence
        [Lucerne].Leaf.WaterDemand
        [Lucerne].Leaf.BasalBuds.LAI
        [Lucerne].Nodule.FixationRate
        [Lucerne].Phenology.CurrentPhase.Name
        [Lucerne].Phenology.CurrentStageName
        [Lucerne].Phenology.DaysAfterCutting as DaysAfterCutting
        [Lucerne].Phenology.Stage
        [Lucerne].Phenology.ThermalTimeAfterCutting as ThermalTimeAfterCutting
        [Lucerne].StemPopulation as ShootPopulation
        [Lucerne].Root.Depth
        [Lucerne].Root.LengthDensity
        [Lucerne].Root.NSupply
        [Lucerne].Root.WaterUptake
        [Lucerne].Stem.CrudeProteinConc as StemCP
        [Lucerne].Stem.Live.Wt
        [Lucerne].Stem.Live.Wt *10 as StemWt
        [Lucerne].TapRoot.Live.StorageWt
        [Lucerne].TapRoot.Live.StorageWt *10 as StorageWt
        [Lucerne].TapRoot.Live.StructuralWt
        [Lucerne].TapRoot.Live.StructuralWt *10 as StructuralWt
        [Lucerne].TapRoot.Live.Wt*10 as RootWt
        [Lucerne].TapRoot.MaintenanceRespiration
        [lucerne].TapRoot.Senesced.Wt
        [Lucerne].TapRoot.StructuralFraction.FixedValue
        [Lucerne].TapRoot.Total.Wt*10 as RootTotal
        [Lucerne].TapRoot.Wt*10 as TapRoot
        [Soil].SoilWater.Eo
        [Soil].SoilWater.Es
        [Soil].SoilWater.SWmm as SWmm
        [Soil].SoilWater.WaterTable
        [Weather].DaysSinceWinterSolstice
        [Phenology].Photoperiod as Photoperiod
        [Phenology].DeltaPhotoperiod
        [Phenology].DaysAfterCutting
  Folder Combined Results
    Memo Combined Results
      Simulation results for the combined datasets from the various countries are shown in the following graphs.  The model is able to adequately capture the influence of growing conditions (soil, climate) and management (population, Nitrogen, irrigation, sowing date).
    Memo
      This graph may not be correct as root refers to "Fine-roots" while datasets often report "TapRoot" - needs checking
  Folder New Zealand
    Experiment Iversen_8 (disabled): DisabledSimNames=[Iversen_8Waterdry]
      Factors
        Factor Water
          CompositeFactor dry: Specifications=[IrrigationEvents]
            Operations IrrigationEvents
              1998-09-11  [Irrigation].Apply(30)
              1998-09-12  [Irrigation].Apply(30)
              1998-09-14  [Irrigation].Apply(30)
              1998-09-16  [Irrigation].Apply(30)
              1998-09-18  [Irrigation].Apply(30)
              1999-09-11  [Irrigation].Apply(30)
              1999-09-12  [Irrigation].Apply(30)
              1999-09-14  [Irrigation].Apply(30)
              1999-09-13  [Irrigation].Apply(50)
              2000-09-11  [Irrigation].Apply(30)
              2000-09-12  [Irrigation].Apply(30)
              2000-09-14  [Irrigation].Apply(30)
              2000-09-13  [Irrigation].Apply(30)
          CompositeFactor irr: Specifications=[IrrigationEvents]
            Operations IrrigationEvents
              1997-10-31  [Irrigation].Apply(30);
              1997-12-01  [Irrigation].Apply(24);
              1997-12-06  [Irrigation].Apply(32);
              1997-12-16  [Irrigation].Apply(41);
              1997-12-22  [Irrigation].Apply(45);
              1998-01-07  [Irrigation].Apply(14);
              1998-01-15  [Irrigation].Apply(30);
              1998-01-23  [Irrigation].Apply(26);
              1998-01-31  [Irrigation].Apply(23);
              1998-02-18  [Irrigation].Apply(62);
              1998-03-06  [Irrigation].Apply(23);
              1998-03-30  [Irrigation].Apply(31);
              1998-09-09  [Irrigation].Apply(30);
              1998-09-10  [Irrigation].Apply(30);
              1998-09-11  [Irrigation].Apply(30);
              1998-09-13  [Irrigation].Apply(30);
              1998-09-14  [Irrigation].Apply(30);
              1998-11-12  [Irrigation].Apply(20);
              1998-11-13  [Irrigation].Apply(20);
              1998-11-14  [Irrigation].Apply(20);
              1998-12-23  [Irrigation].Apply(20);
              1998-12-24  [Irrigation].Apply(20);
              1998-12-25  [Irrigation].Apply(20);
              1998-12-26  [Irrigation].Apply(15);
              1998-12-27  [Irrigation].Apply(15);
              1999-01-20  [Irrigation].Apply(20);
              1999-01-21  [Irrigation].Apply(20);
              1999-01-22  [Irrigation].Apply(20);
              1999-01-23  [Irrigation].Apply(20);
              1999-01-24  [Irrigation].Apply(20);
              1999-01-25  [Irrigation].Apply(27);
              1999-02-25  [Irrigation].Apply(10);
              1999-02-26  [Irrigation].Apply(10);
              1999-02-27  [Irrigation].Apply(10);
              1999-02-28  [Irrigation].Apply(20);
              1999-03-01  [Irrigation].Apply(20);
              1999-12-12  [Irrigation].Apply(30);
              2000-01-22  [Irrigation].Apply(50);
              2000-12-27  [Irrigation].Apply(30);
              2000-12-28  [Irrigation].Apply(30);
              2000-12-29  [Irrigation].Apply(15);
              2001-02-01  [Irrigation].Apply(35);
              2001-02-02  [Irrigation].Apply(30);
              2001-02-03  [Irrigation].Apply(30);
              2001-03-20  [Irrigation].Apply(25);
              2001-03-21  [Irrigation].Apply(25);
              2001-03-22  [Irrigation].Apply(15);
              2001-04-26  [Irrigation].Apply(25);
              2001-04-27  [Irrigation].Apply(20);
              2001-12-21  [Irrigation].Apply(20);
              2001-12-22  [Irrigation].Apply(25);
              2001-12-23  [Irrigation].Apply(20);
      Simulation Iversen_8LL
        Clock: Start=1996-10-31; End=2002-01-06
        Summary summaryfile
        Weather: FileName=C:\Data\Master\Data\ClimateAndObserved\lincoln.met
        SoilArbitrator Soil Arbitrator
        Zone paddock: Area=1; Slope=0; AspectAngle=0; Altitude=50
          MicroClimate: a_interception=0; b_interception=1; c_interception=0; d_interception=0; soil_albedo=0.23; SoilHeatFluxFraction=0.4; MinimumHeightDiffForNewLayer=0; NightInterceptionFraction=0.5; ReferenceHeight=2
          Irrigation
          Fertiliser
          Manager DiagnosticsVariables
```csharp
using Models.Climate;
using APSIM.Shared.Utilities;
using System.Xml.Serialization;
using Models;
using Models.PMF;
using Models.Soils;
using System.Text;
using System.Collections.Generic;
using Models.Core;
using System;
using Models.Interfaces;
using Models.Soils.Nutrients;
using Models.PMF.Organs;
namespace Models
{
    [Serializable] 
    public class Script : Model
    {
        [Link] private Clock Clock;
        [Link] private Weather Met;
        [Link] private Fertiliser Fert;
        [Link] private Irrigation Irrig;
        [Link] private Plant Lucerne;
        [Link] private Zone zone;
        [Link(ByName = true)]
        private ISolute Urea;
        [Link(ByName = true)]
        private ISolute NO3;
        [Link(ByName = true)]
        private ISolute NH4;
        [Link(ByName = true)]
        private SoilNitrogen SoilNitrogen;
        [Link(Type = LinkType.Path, Path = "[Lucerne].Root")]
        private Root root;
        [Link] private Soils.Soil Soil;
        [Link] private Models.Surface.SurfaceOrganicMatter SOM;
        [Link]
        private IPhysical soilPhysical;
        [Link]
        private ISoilWater waterBalance;
                    
        [XmlIgnore] public bool InitialDay { get; set; }
        
        [XmlIgnore] public double AccumPlantN { get; set; }
        [XmlIgnore] public double AccumMineralisation { get; set; }
        [XmlIgnore] public double AccumDenit { get; set; }
        [XmlIgnore] public double AccumFert { get; set; }
        [XmlIgnore] public double AccumLeach { get; set; }
        [XmlIgnore] public double AccumDetach { get; set; }
        [XmlIgnore] public double DeltaSoilOMN { get; set; }
        [XmlIgnore] public double DeltaSurfaceOMN { get; set; }
        [XmlIgnore] public double DeltaSoilMineralN { get; set; }
        [XmlIgnore] public double SoilNitrogenContent { get; set; }
        
        [XmlIgnore] public double AccumEO { get; set; }
        [XmlIgnore] public double AccumEP { get; set; }
        [XmlIgnore] public double AccumES { get; set; }
        [XmlIgnore] public double AccumDrainage { get; set; }
        [XmlIgnore] public double AccumRunoff { get; set; }
        [XmlIgnore] public double AccumOutflowLat { get; set; }
        [XmlIgnore] public double AccumIrrigation { get; set; }
        [XmlIgnore] public double AccumRainfall { get; set; }
        [XmlIgnore] public double SoilWaterDeficit { get; set; }
    
        [XmlIgnore] public double  InitialSoilOMN { get; set; }
        [XmlIgnore] public double  InitialSurfaceOMN { get; set; }
        [XmlIgnore] public double  InitialMineralN { get; set; }
        
        [XmlIgnore] public double SWC { get; set; }
        [XmlIgnore] public double DUL { get; set; }
        [XmlIgnore] public double OutFlowLat { get; set; }

        [XmlIgnore] public double FomN { get; set; }
        [XmlIgnore] public double BiomN { get; set; }
        [XmlIgnore] public double HumN { get; set; }
        [XmlIgnore] public double OrganicN { get; set; }
        [XmlIgnore] public double NO3N { get; set; }
        [XmlIgnore] public double NH4N { get; set; }
        [XmlIgnore] public double UreaN { get; set; }
        [XmlIgnore] public double MineralN { get; set; }
        [XmlIgnore] public double DltNMinRes { get; set; }
        [XmlIgnore] public double DltNMinTot { get; set; }
        
        [EventSubscribe("StartOfSimulation")]
        private void OnSimulationCommencing(object sender, EventArgs e)
        {
            InitialDay = true;
        }
        
        [EventSubscribe("DoManagement")]
        private void OnDoManagement(object sender, EventArgs e)
        {
            //!!!!!! Nitrogen balance components !!!!!!
            //!!!!!!^^^^^^^^^^^^^^^^^^^^^^^^^^^^^!!!!!!
            FomN = MathUtilities.Sum(SoilNitrogen.FOMN);
            HumN = MathUtilities.Sum(SoilNitrogen.HumicN);
            BiomN = MathUtilities.Sum(SoilNitrogen.MicrobialN);
            OrganicN = FomN + HumN + BiomN;
            NO3N = MathUtilities.Sum(NO3.kgha);
            NH4N = MathUtilities.Sum(NH4.kgha);
            UreaN = MathUtilities.Sum(Urea.kgha);
            MineralN = NO3N + NH4N + UreaN; 
            DltNMinRes = MathUtilities.Sum(SoilNitrogen.dlt_n_min_res);
            DltNMinTot = MathUtilities.Sum(SoilNitrogen.MineralisedN);
            int layers = soilPhysical.Thickness.Length;
            if (InitialDay == true)
            {
                InitialSurfaceOMN = SOM.N;
                InitialSoilOMN = OrganicN;
                InitialMineralN = MineralN;
                InitialDay = false;
            }
            AccumFert += Fert.NitrogenApplied;
            DeltaSurfaceOMN = SOM.N - InitialSurfaceOMN;
            AccumLeach = AccumLeach - waterBalance.LeachNH4 - waterBalance.LeachNO3 - waterBalance.LeachUrea; //Fails
            AccumMineralisation += MathUtilities.Sum(SoilNitrogen.MineralisedN);
            AccumDenit -= MathUtilities.Sum(SoilNitrogen.Denitrification);
            AccumPlantN -= (double)zone.Get("Lucerne.Root.NUptake");
            DeltaSoilOMN = OrganicN - InitialSoilOMN;
            DeltaSoilMineralN = MineralN - InitialMineralN;
            SoilNitrogenContent = MineralN;
            
            //!!!!!! Water balance components !!!!!!
            //!!!!!!^^^^^^^^^^^^^^^^^^^^^^^^^^!!!!!!

            AccumIrrigation += Irrig.IrrigationApplied;
            AccumRainfall += Met.Rain;
            //AccumEP -= (double)zone.Get("[Lucerne].Leaf.Transpiration");
            AccumEP -= (double)zone.Get("Lucerne.Root.WaterUptake");
            SoilWaterDeficit = (SWC - DUL);
            double OutFlowLat = MathUtilities.Sum(waterBalance.LateralOutflow);
            AccumOutflowLat -= OutFlowLat;
        }
        
        [EventSubscribe("DoManagementCalculations")]
        private void OnDoManagementCalculations(object sender, EventArgs e)
        {
            FomN = MathUtilities.Sum(SoilNitrogen.FOMN);
            HumN = MathUtilities.Sum(SoilNitrogen.HumicN);
            BiomN = MathUtilities.Sum(SoilNitrogen.MicrobialN);
            
            
            AccumEO -= waterBalance.Eo;
            AccumES -= waterBalance.Es; 
            AccumDrainage -= waterBalance.Drainage;
            AccumRunoff -= waterBalance.Runoff;
            SWC = MathUtilities.Sum(waterBalance.SWmm);
            DUL = MathUtilities.Sum(soilPhysical.DULmm);
        }
    }
}
```
          SurfaceOrganicMatter surface organic matter: InitialResidueName=wheat; InitialResidueType=wheat; InitialResidueMass=0; InitialStandingFraction=0; InitialCPR=0; InitialCNR=80
          Report: EventNames=[Clock].DoReport
            VariableNames:
              [Clock].Today
              [DiagnosticsVariables].Script.AccumPlantN
              [DiagnosticsVariables].Script.AccumMineralisation
              [DiagnosticsVariables].Script.AccumDenit
              [DiagnosticsVariables].Script.AccumFert
              [DiagnosticsVariables].Script.AccumLeach
              [DiagnosticsVariables].Script.AccumDetach
              [DiagnosticsVariables].Script.DeltaSoilOMN
              [DiagnosticsVariables].Script.DeltaSurfaceOMN
              [DiagnosticsVariables].Script.DeltaSoilMineralN
              [Lucerne].Root.NSupply
              [Soil].SoilWater.Eo
              [Soil].SoilWater.Es
              [DiagnosticsVariables].Script.SWC
              [DiagnosticsVariables].Script.DUL
              [Soil].SoilWater.Drainage
              [Soil].SoilWater.Runoff
              [DiagnosticsVariables].Script.OutFlowLat
              [Soil].SoilWater.pond
              [DiagnosticsVariables].Script.AccumEO
              [DiagnosticsVariables].Script.AccumEP
              [DiagnosticsVariables].Script.AccumES
              [DiagnosticsVariables].Script.AccumDrainage
              [DiagnosticsVariables].Script.AccumRunoff
              [DiagnosticsVariables].Script.AccumRainfall
              [DiagnosticsVariables].Script.AccumIrrigation
              [DiagnosticsVariables].Script.AccumOutflowLat
              [DiagnosticsVariables].Script.SoilWaterDeficit
              [Lucerne].Grain.Live.Wt
              [Lucerne].Shell.Live.Wt
              [Lucerne].Stem.Live.Wt
              [Lucerne].Stem.Live.Wt
              [Lucerne].Grain.Live.N
              [Lucerne].Shell.Live.N
              [Lucerne].Leaf.Live.Wt
              [Lucerne].Root.Live.Wt
              [Lucerne].Leaf.Live.N
              [Lucerne].Root.Live.N
              [Lucerne].Leaf.Live.NConc
              [Lucerne].Root.Live.NConc
              [Lucerne].Root.WaterSupply
              [Lucerne].Root.WaterUptake
              [Lucerne].Leaf.Transpiration
              [Lucerne].Leaf.WaterDemand
              [Lucerne].Root.Depth
              [Lucerne].Leaf.CoverTotal
              [Lucerne].Leaf.CoverDead
              [Lucerne].Leaf.LAI as LAI
              [Lucerne].Leaf.Height
              [Soil].SoilWater.SWmm
              [Soil].SoilNitrogen.NO3.kgha
              [DiagnosticsVariables].Script.SoilNitrogenContent
              [Lucerne].Arbitrator.N.TotalPlantDemand
              [DiagnosticsVariables].Script.FomN
              [DiagnosticsVariables].Script.HumN
              [DiagnosticsVariables].Script.BiomN
              [DiagnosticsVariables].Script.DltNMinRes
              [DiagnosticsVariables].Script.DltNMinTot
              [Lucerne].Leaf.Fw
              [Lucerne].Leaf.Fn
              [Lucerne].Phenology.CurrentPhase.Name
              [Lucerne].Phenology.CurrentStageName
              [Lucerne].Phenology.Stage
              [Lucerne].Pod.Wt
              [Lucerne].Pod.N
              [Lucerne].AboveGround.Wt *10 as shootbiomass
              [Lucerne].Shell.PodNumber
              [Lucerne].Leaf.LAIFunction
              [Lucerne].MainN
              [Mower].Script.BudsDays as BudsDays
              [Mower].Script.FloDays as FloDays
              [Mower].Script.HarvestFlag
              [Mower].Script.Rotation as Rotation
              [Mower].Script.Year as GrowthSeason
          Manager LucerneSowingRule
            RowSpacing = 150
            SowingDepth = 20
            SowingRate = 300
            CultivarName = FD5
            SowingDate = 11/02/1996 00:00:00
```csharp
using APSIM.Shared.Utilities;
using Models.PMF;
using Models.Core;
using System;
        
namespace Models
{
    [Serializable] 
    [System.Xml.Serialization.XmlInclude(typeof(Model))]
    public class Script : Model
    {
        [Link] Plant Lucerne;
        [Link] Clock Clock;

        [Description("Spacing (mm) between rows")]
        public double RowSpacing { get; set; }
        [Description("Depth (mm) Grains are planted")]
        public double SowingDepth { get; set; }
        [Description("Seeds sown (/m2)")]
        public double SowingRate { get; set; }
        [Description("Cultivar")]
        [Display(Type=DisplayType.CultivarName)]
        public string CultivarName { get; set; }
        [Description("Sowing Date")]
        public DateTime SowingDate { get; set; }

        [EventSubscribe("DoManagement")]
        private void OnDoManagement(object sender, EventArgs e)
        {
            if (Clock.Today.Date == SowingDate)
                Lucerne.Sow(population: SowingRate, cultivar: CultivarName, depth: SowingDepth, rowSpacing: RowSpacing, budNumber: 1);
            //Lucerne.Sow(... Contains the following arguements:
            //Population  double  Required  Seeds sowing/m2
            //Cultivar    string  Required  "NameOfCultivar"
            //Depth       double  Optional  Depth (mm) seed sown.   Default is 100mm 
            //MaxCover    double  Optional  Proportion (0-1) of the ground row crop will cover.   Default is 1.0
            //BudNumber   double  Optional  Number of mainstems per seed sown.  Default is 1.0
            //RowSpacing  double  Optional  Spaceing (mm) between drill rows when crop is sown.  Default is 150mm
            //CropClass   string  Optional  Crop class to instantiate when crop is sown.  Default is "Plant"
        }
    }
}
```
          Operations IrrigationEvents
          Plant Lucerne
          Operations Cutting
            1997-01-22  [Mower].Script.Cut();
            1997-03-02  [Mower].Script.Cut();
            1997-06-06  [Mower].Script.Cut();
            1997-10-07  [Mower].Script.Cut();
            1997-11-20  [Mower].Script.Cut();
            1997-12-24  [Mower].Script.Cut();
            1998-02-04  [Mower].Script.Cut();
            1998-03-14  [Mower].Script.Cut();
            1998-05-30  [Mower].Script.Cut();
            1998-07-01  [Mower].Script.Cut();
            1998-09-30  [Mower].Script.Cut();
            1998-11-12  [Mower].Script.Cut();
            1998-12-16  [Mower].Script.Cut();
            1999-01-14  [Mower].Script.Cut();
            1999-02-18  [Mower].Script.Cut();
            1999-04-15  [Mower].Script.Cut();
            1999-06-24  [Mower].Script.Cut();
            1999-09-30  [Mower].Script.Cut();
            1999-11-11  [Mower].Script.Cut();
            1999-12-21  [Mower].Script.Cut();
            2000-01-27  [Mower].Script.Cut();
            2000-03-15  [Mower].Script.Cut();
            2000-05-26  [Mower].Script.Cut();
            2000-09-23  [Mower].Script.Cut();
            2000-11-11  [Mower].Script.Cut();
            2000-12-22  [Mower].Script.Cut();
            2001-01-25  [Mower].Script.Cut();
            2001-03-15  [Mower].Script.Cut();
            2001-05-03  [Mower].Script.Cut();
            2001-07-02  [Mower].Script.Cut();
            2001-10-06  [Mower].Script.Cut();
            2001-11-21  [Mower].Script.Cut();
            2001-12-24  [Mower].Script.Cut();
          Manager Mower
            Year = 0
            Rotation = 0
            YearRotation = 0
            HarvestFlag = False
            YearTransation = 1-Jun
            BudsDays = 0
            FloDays = 0
```csharp
using Models.PMF.Phen;
using System;
using System.Collections.Generic;
using Models.Core;
using Models.PMF;
using Models.PMF.Interfaces;
using System.Xml.Serialization;
using APSIM.Shared.Utilities;

namespace Models
{
    [Serializable] 
    [System.Xml.Serialization.XmlInclude(typeof(Model))]
    public class Script : Model
    {
        [Link] private Plant Lucerne;
        [Link] private Clock clock;
        [Link] private Zone zone;
        [Link(Type = LinkType.Path, Path = "[Lucerne].Phenology")]
        private Phenology phenology;
        [XmlIgnore] private RemovalFractions Remove { get; set; }
    public double Year { get;set;}
    public double Rotation { get;set;}
    public double YearRotation { get;set;}
    bool YearPassed { get;set;}
    public bool HarvestFlag { get;set;}
    [Description("Change to the next growth year")]
    public string YearTransation { get;set;}
    public double BudsDays { get;set;}
    public double FloDays { get;set;}
        [EventSubscribe("StartOfSimulation")]
        private void OnSimulationCommencing(object sender, EventArgs e)
        {   Year = 1;
            Rotation =1;
            YearRotation= Year + Rotation;
            HarvestFlag=false;
            YearPassed= false;
            Remove = new RemovalFractions();
        }
        [EventSubscribe("EndOfDay")]
        private void OnEndOfDay(object sender, EventArgs e)
        {
        if (DateUtilities.WithinDates(YearTransation, clock.Today, YearTransation))
         YearPassed= true;
         HarvestFlag= false;
         BudsDays= (double)zone.Get("Lucerne.Phenology.BudsVisableDaysAfterCutting.Value()");
         FloDays= (double)zone.Get("Lucerne.Phenology.FloweringDaysAfterCutting.Value()");
        }
        public void Cut()
        {   /*double TtFlo=(double)zone.Get("Lucerne.Phenology.ThermalTimeAfterFlowering.Value()");
            double LeafWt= (double)zone.Get("Lucerne.Leaf.Wt");
            double NewLeaf= Math.Min(5,TtFlo*0.025);
            double LeafRemove= (LeafWt-NewLeaf)/LeafWt;
            double StemWt= (double)zone.Get("Lucerne.Stem.Wt");
            double NewStem= Math.Min(3,TtFlo*0.015);
            double StemRemove= (StemWt-NewStem)/StemWt;
            Remove.SetFractionToRemove("Leaf",LeafRemove*0.9);
            Remove.SetFractionToResidue("Leaf", LeafRemove*0.1);
            Remove.SetFractionToRemove("Stem", StemRemove*0.5);
            Remove.SetFractionToResidue("Stem",StemRemove*0.5);
            object LAIRemove= 1-Math.Min(0.1,TtFlo*0.0005);
            zone.Set("Lucerne.Leaf.Area.FractionRemovedOnCut",LAIRemove);*/
            Remove.SetPhenologyStage = 4;  
            Lucerne.RemoveBiomass("Cut", Remove);
            Rotation+=1;
            HarvestFlag= true;
            if (YearPassed)
            {Year+=1;
            Rotation=1;
            YearPassed=false;}

        }
    }
}
```
          Soil: Latitude=0; Longitude=0
            Chemical
              Thickness  NO3N     NH4N  PH
              100        172.222  0     6.6
              200        11.9048  0     6.2
              300        1.15741  0     5.7
              300        1.06157  0     5.5
              300        0        0     5.5
              300        0        0     5.5
            InitialWater Initial water: PercentMethod=1; FractionFull=0.998443
            Physical
              Thickness  BD    AirDry  LL15   DUL   SAT
              100        1.26  0.05    0.075  0.35  0.38
              100        1.26  0.06    0.078  0.35  0.38
              100        1.26  0.07    0.07   0.32  0.39
              100        1.44  0.07    0.07   0.29  0.32
              100        1.44  0.069   0.07   0.27  0.3
              100        1.44  0.07    0.07   0.31  0.32
              100        1.57  0.07    0.07   0.33  0.34
              100        1.57  0.07    0.07   0.35  0.35
              100        1.57  0.07    0.07   0.34  0.35
              100        1.58  0.07    0.07   0.34  0.35
              100        1.58  0.07    0.07   0.34  0.35
              100        1.58  0.07    0.07   0.34  0.35
              100        1.58  0.08    0.08   0.34  0.35
              100        1.59  0.078   0.08   0.33  0.35
              100        1.59  0.08    0.08   0.33  0.35
              100        1.59  0.087   0.09   0.32  0.34
              100        1.59  0.09    0.09   0.3   0.33
              100        1.59  0.09    0.09   0.3   0.33
              100        1.59  0.09    0.09   0.3   0.33
              100        1.59  0.08    0.08   0.31  0.33
              100        1.59  0.09    0.09   0.31  0.33
              100        1.59  0.09    0.09   0.32  0.34
              100        1.59  0.09    0.09   0.35  0.38
              SoilCrop LucerneSoil
                LL=[0.1, 0.13, 0.12, 0.12, 0.11, 0.08, 0.08, 0.08, 0.09, 0.11, 0.12, 0.15, 0.15, 0.15, 0.16, 0.2, 0.25, 0.25, 0.25, 0.25, 0.23, 0.15, 0.15]
                KL=[0.06, 0.06, 0.03, 0.03, 0.03, 0.03, 0.03, 0.03, 0.03, 0.03, 0.03, 0.03, 0.03, 0.03, 0.03, 0.03, 0.03, 0.03, 0.03, 0.03, 0.03, 0.03, 0.03]
                XF=[1, 1, 1, 1, 1, 1, 1, 1, 1, 1, 1, 1, 1, 1, 1, 1, 1, 1, 1, 1, 1, 1, 1]
            WaterBalance SoilWater: SummerDate=1-Oct; SummerU=6; SummerCona=3; WinterDate=1-Mar; WinterU=5; WinterCona=2.5; DiffusConst=189; DiffusSlope=21; Salb=0.13; CN2Bare=0; CNRed=0; CNCov=0.8; Thickness=[100, 200, 300, 300, 300, 300]; SWCON=[0.55, 0.55, 0.55, 0.55, 0.55, 0.55]
            SoilNitrogen: fom_types=[default, manure, mucuna, lablab, shemp, stable]; fract_carb=[0.2, 0.3, 0.54, 0.57, 0.45, 0]; fract_cell=[0.7, 0.3, 0.37, 0.37, 0.47, 0.1]; fract_lign=[0.1, 0.4, 0.09, 0.06, 0.08, 0.9]; NPartitionApproach=0
              SoilNitrogenNO3 NO3
              SoilNitrogenNH4 NH4
              SoilNitrogenUrea Urea
              SoilNitrogenPlantAvailableNO3 PlantAvailableNO3
              SoilNitrogenPlantAvailableNH4 PlantAvailableNH4
            Organic: FOMCNRatio=30
              Thickness  Carbon  SoilCNRatio  FBiom  FInert  FOM
              100        1.82    11.5         0.025  0.3     1243.93
              200        1.47    11.5         0.025  0.4     833.832
              300        1.2     11.5         0.015  0.75    457.617
              300        1.03    11.5         0.01   0.9     251.145
              300        0.47    11.5         0.01   0.96    137.831
              300        0.47    11.5         0.01   0.96    75.6435
            CERESSoilTemperature Temperature
          Manager PopulationSet
            SetDate = 01/01/2000 00:00:00
            Pop = 100
```csharp
using Models.Soils;
using APSIM.Shared.Utilities;
using Models.PMF;
using Models.Core;
using System;
        
namespace Models
{
    [Serializable] 
    [System.Xml.Serialization.XmlInclude(typeof(Model))]
    public class Script : Model
    {
        [Link] Plant Lucerne;
        [Link] Clock Clock;
         [Link] Zone zone;

        [Description("PopulationSet Date")]
        public DateTime SetDate { get; set; }
        [Description("New Population")]
        public double Pop{ get; set; }
        [EventSubscribe("DoManagement")]
        private void OnDoManagement(object sender, EventArgs e)
        {
            if (Clock.Today.Date == SetDate)
            {
                object NewPop = Pop;
                zone.Set("Lucerne.Population",NewPop);
            }
        }
    }
}
```
    Experiment Iversen_9 (disabled)
      DisabledSimNames=[Iversen_9SowingDateSD7Waterirr, Iversen_9SowingDateSD6Waterirr, Iversen_9SowingDateSD7Waterdry, Iversen_9SowingDateSD6Waterdry, Iversen_9SowingDateSD4Waterdry, Iversen_9SowingDateSD3Waterdry, Iversen_9SowingDateSD2Waterdry, Iversen_9SowingDateSD1Waterdry]
      Factors
        Permutation
          Factor SowingDate
            CompositeFactor SD1
              Specifications:
                [LucerneSowingRule].Script.SowingDate = 2000-10-24
                [Clock].StartDate = 2000-10-24
                [Cutting]
              Operations Cutting
                2001-01-25  [Mower].Script.Cut();
                2001-03-08  [Mower].Script.Cut();
                2001-05-04  [Mower].Script.Cut();
                2001-07-05  [Mower].Script.Cut();
                2001-10-04  [Mower].Script.Cut();
                2001-11-19  [Mower].Script.Cut();
                2001-12-25  [Mower].Script.Cut();
                2002-02-05  [Mower].Script.Cut();
                2002-04-08  [Mower].Script.Cut();
                2002-06-14  [Mower].Script.Cut();
            CompositeFactor SD2
              Specifications:
                [LucerneSowingRule].Script.SowingDate = 2000-11-14
                [Clock].StartDate = 2000-11-14
                [Cutting]
              Operations Cutting
                2001-02-14  [Mower].Script.Cut();
                2001-05-01  [Mower].Script.Cut();
                2001-07-05  [Mower].Script.Cut();
                2001-10-04  [Mower].Script.Cut();
                2001-11-19  [Mower].Script.Cut();
                2001-12-25  [Mower].Script.Cut();
                2002-02-05  [Mower].Script.Cut();
                2002-04-08  [Mower].Script.Cut();
                2002-06-13  [Mower].Script.Cut();
            CompositeFactor SD3
              Specifications:
                [LucerneSowingRule].Script.SowingDate = 2000-12-05
                [Clock].StartDate = 2000-12-05
                [Cutting]
              Operations Cutting
                2001-03-08  [Mower].Script.Cut();
                2001-05-03  [Mower].Script.Cut();
                2001-07-05  [Mower].Script.Cut();
                2001-10-04  [Mower].Script.Cut();
                2001-11-19  [Mower].Script.Cut();
                2001-12-25  [Mower].Script.Cut();
                2002-02-05  [Mower].Script.Cut();
                2002-04-08  [Mower].Script.Cut();
                2002-06-14  [Mower].Script.Cut();
            CompositeFactor SD4
              Specifications:
                [LucerneSowingRule].Script.SowingDate = 2000-12-27
                [Clock].StartDate = 2000-12-27
                [Cutting]
              Operations Cutting
                2001-03-28  [Mower].Script.Cut();
                2001-05-02  [Mower].Script.Cut();
                2001-07-05  [Mower].Script.Cut();
                2001-10-04  [Mower].Script.Cut();
                2001-11-19  [Mower].Script.Cut();
                2001-12-25  [Mower].Script.Cut();
                2002-02-05  [Mower].Script.Cut();
                2002-04-05  [Mower].Script.Cut();
                2002-06-13  [Mower].Script.Cut();
            CompositeFactor SD6
              Specifications:
                [LucerneSowingRule].Script.SowingDate = 2001-07-31
                [Clock].StartDate = 2001-07-31
                [Cutting]
              Operations Cutting
                2001-12-30  [Mower].Script.Cut();
            CompositeFactor SD7
              Specifications:
                [LucerneSowingRule].Script.SowingDate = 2001-10-02
                [Clock].StartDate = 2001-10-02
                [Cutting]
              Operations Cutting
                2002-01-08  [Mower].Script.Cut();
          Factor Water
            CompositeFactor dry
              Specifications:
                [IrrigationEvents]
                [ClimateControl]
                [Physical]
              Operations IrrigationEvents
                2001-08-11  [Irrigation].Apply(70);
              Manager ClimateControl
                StartDate = 08/11/2001 00:00:00
                EndDate = 07/01/2002 00:00:00
```csharp
using Models.Climate;
using System;
using Models.Core;
using APSIM.Shared.Utilities;
using System.Collections.Generic;
using System.Text;
using Models.PMF;
using Models;
using System.Xml.Serialization;

namespace Models
{
    [Serializable] 
    [System.Xml.Serialization.XmlInclude(typeof(Model))]
    public class Script : Model
    {
        [Link] Weather Met;
        [Link] Clock Clock;
    
        [Description("Start Date")]
        public DateTime StartDate { get; set; }
        
        [Description("End Date")]
        public DateTime EndDate { get; set; }
 
    
        [EventSubscribe("PreparingNewWeatherData")]
        private void OnPreparingNewWeatherData(object sender, EventArgs e)
        {
            if ((Clock.Today.Date >= StartDate) && (Clock.Today.Date <= EndDate))
                Met.Rain = 0;        
        }
    }
}
```
              Physical: same as New Zealand.Iversen_8.Iversen_8LL.paddock.Soil.Physical
            CompositeFactor irr
              Specifications:
                [IrrigationEvents]
                [Physical]
              Operations IrrigationEvents
                2000-12-20  [Irrigation].Apply(25);
                2000-12-29  [Irrigation].Apply(30);
                2001-01-28  [Irrigation].Apply(36);
                2001-02-17  [Irrigation].Apply(45);
                2001-03-07  [Irrigation].Apply(55);
                2001-03-30  [Irrigation].Apply(80);
                2001-04-29  [Irrigation].Apply(52);
                2001-10-06  [Irrigation].Apply(70);
                2001-12-06  [Irrigation].Apply(70);
                2001-12-20  [Irrigation].Apply(80);
              Physical: same as New Zealand.Iversen_8.Iversen_8LL.paddock.Soil.Physical
      Simulation Simulation0
        Clock: Start=2000-10-24; End=2002-07-01
        Summary summaryfile
        Weather: FileName=C:\Data\Master\Data\ClimateAndObserved\lincoln.met
        SoilArbitrator Soil Arbitrator
        Zone paddock: Area=1; Slope=0; AspectAngle=0; Altitude=50
          MicroClimate: a_interception=0; b_interception=1; c_interception=0; d_interception=0; soil_albedo=0.23; SoilHeatFluxFraction=0.4; MinimumHeightDiffForNewLayer=0; NightInterceptionFraction=0.5; ReferenceHeight=2
          Irrigation
          Fertiliser
          Manager DiagnosticsVariables: same as New Zealand.Iversen_8.Iversen_8LL.paddock.DiagnosticsVariables
          SurfaceOrganicMatter surface organic matter: InitialResidueName=wheat; InitialResidueType=wheat; InitialResidueMass=0; InitialStandingFraction=0; InitialCPR=0; InitialCNR=80
          Report: EventNames=[Clock].DoReport
            VariableNames:
              [Clock].Today
              [DiagnosticsVariables].Script.AccumPlantN
              [DiagnosticsVariables].Script.AccumMineralisation
              [DiagnosticsVariables].Script.AccumDenit
              [DiagnosticsVariables].Script.AccumFert
              [DiagnosticsVariables].Script.AccumLeach
              [DiagnosticsVariables].Script.AccumDetach
              [DiagnosticsVariables].Script.DeltaSoilOMN
              [DiagnosticsVariables].Script.DeltaSurfaceOMN
              [DiagnosticsVariables].Script.DeltaSoilMineralN
              [Lucerne].Root.NSupply
              [Soil].SoilWater.Eo
              [Soil].SoilWater.Es
              [DiagnosticsVariables].Script.SWC as SWC
              [DiagnosticsVariables].Script.DUL
              [Soil].SoilWater.Drainage
              [Soil].SoilWater.Runoff
              [DiagnosticsVariables].Script.OutFlowLat
              [Soil].SoilWater.pond
              [DiagnosticsVariables].Script.AccumEO
              [DiagnosticsVariables].Script.AccumEP
              [DiagnosticsVariables].Script.AccumES
              [DiagnosticsVariables].Script.AccumDrainage
              [DiagnosticsVariables].Script.AccumRunoff
              [DiagnosticsVariables].Script.AccumRainfall
              [DiagnosticsVariables].Script.AccumIrrigation
              [DiagnosticsVariables].Script.AccumOutflowLat
              [DiagnosticsVariables].Script.SoilWaterDeficit
              [Lucerne].Grain.Live.Wt
              [Lucerne].Shell.Live.Wt
              [Lucerne].Stem.Live.Wt
              [Lucerne].Stem.Live.Wt
              [Lucerne].Grain.Live.N
              [Lucerne].Shell.Live.N
              [Lucerne].Leaf.Live.Wt
              [Lucerne].Root.Live.Wt
              [Lucerne].Leaf.Live.N
              [Lucerne].Root.Live.N
              [Lucerne].Leaf.Live.NConc
              [Lucerne].Root.Live.NConc
              [Lucerne].Root.WaterSupply
              [Lucerne].Root.WaterUptake
              [Lucerne].Leaf.Transpiration
              [Lucerne].Leaf.WaterDemand
              [Lucerne].Root.Depth
              [Lucerne].Leaf.CoverTotal
              [Lucerne].Leaf.CoverDead
              [Lucerne].Leaf.LAI
              [Lucerne].Leaf.Height
              [Soil].SoilWater.SWmm
              [Soil].SoilNitrogen.NO3.kgha
              [DiagnosticsVariables].Script.SoilNitrogenContent
              [Lucerne].Arbitrator.N.TotalPlantDemand
              [DiagnosticsVariables].Script.FomN
              [DiagnosticsVariables].Script.HumN
              [DiagnosticsVariables].Script.BiomN
              [DiagnosticsVariables].Script.DltNMinRes
              [DiagnosticsVariables].Script.DltNMinTot
              [Lucerne].Leaf.Fw
              [Lucerne].Leaf.Fn
              [Lucerne].Phenology.CurrentPhase.Name
              [Lucerne].Phenology.CurrentStageName
              [Lucerne].Phenology.Stage
              [Lucerne].Pod.Wt
              [Lucerne].Pod.N
              [Lucerne].AboveGround.Wt *10 as shootbiomass
              [Lucerne].Shell.PodNumber
              [Lucerne].Leaf.LAIFunction
              [Mower].Script.BudsDays as BudsDays
              [Mower].Script.FloDays as FloDays
              [Mower].Script.HarvestFlag
              [Mower].Script.Rotation as Rotation
              [Mower].Script.Year as GrowthSeason
          Manager LucerneSowingRule
            RowSpacing = 150
            SowingDepth = 20
            SowingRate = 300
            CultivarName = FD5
            SowingDate = 10/24/2000 00:00:00
            script: same as in New Zealand.Iversen_8.Iversen_8LL.paddock.LucerneSowingRule
          Operations IrrigationEvents
          Plant Lucerne
          Operations Cutting
          Manager ClimateControl
            StartDate = 08/11/2001 00:00:00
            EndDate = 07/01/2002 00:00:00
```csharp
using Models.Climate;
using System;
using Models.Core;
using APSIM.Shared.Utilities;
using System.Collections.Generic;
using System.Text;
using Models.PMF;
using Models;
using System.Xml.Serialization;

namespace Models
{
    [Serializable] 
    [System.Xml.Serialization.XmlInclude(typeof(Model))]
    public class Script : Model
    {
        [Link] Weather Met;
        [Link] Clock Clock;
    
        [Description("Start Date")]
        public DateTime StartDate { get; set; }
        
        [Description("End Date")]
        public DateTime EndDate { get; set; }
 
    
        
    }
}
```
          Manager Mower: same as New Zealand.Iversen_8.Iversen_8LL.paddock.Mower
          Soil: same as New Zealand.Iversen_8.Iversen_8LL.paddock.Soil
    Experiment Iversen_91 (disabled)
      Factors
        Factor Defoliation
          CompositeFactor LL: Specifications=[Cutting]
            Operations Cutting
              2002-10-06  [Mower].Script.Cut();
              2002-11-17  [Mower].Script.Cut();
              2002-12-29  [Mower].Script.Cut();
              2003-02-11  [Mower].Script.Cut();
              2003-03-23  [Mower].Script.Cut();
              2003-05-05  [Mower].Script.Cut();
              2003-06-13  [Mower].Script.Cut();
              2003-10-06  [Mower].Script.Cut();
              2003-11-13  [Mower].Script.Cut();
              2003-12-29  [Mower].Script.Cut();
              2004-02-08  [Mower].Script.Cut();
              2004-03-20  [Mower].Script.Cut();
              2004-05-03  [Mower].Script.Cut();
              2004-06-12  [Mower].Script.Cut();
              2004-10-04  [Mower].Script.Cut();
          CompositeFactor SL: Specifications=[Cutting]
            Operations Cutting
              2002-09-20  [Mower].Script.Cut();
              2002-10-18  [Mower].Script.Cut();
              2002-11-14  [Mower].Script.Cut();
              2002-12-12  [Mower].Script.Cut();
              2003-01-09  [Mower].Script.Cut();
              2003-02-11  [Mower].Script.Cut();
              2003-03-23  [Mower].Script.Cut();
              2003-05-05  [Mower].Script.Cut();
              2003-06-13  [Mower].Script.Cut();
              2003-09-18  [Mower].Script.Cut();
              2003-10-19  [Mower].Script.Cut();
              2003-11-13  [Mower].Script.Cut();
              2003-12-13  [Mower].Script.Cut();
              2004-01-08  [Mower].Script.Cut();
              2004-02-08  [Mower].Script.Cut();
              2004-03-20  [Mower].Script.Cut();
              2004-05-03  [Mower].Script.Cut();
              2004-06-12  [Mower].Script.Cut();
              2004-10-06  [Mower].Script.Cut();
          CompositeFactor SS: Specifications=[Cutting]
            Operations Cutting
              2002-09-14  [Mower].Script.Cut();
              2002-10-15  [Mower].Script.Cut();
              2002-11-09  [Mower].Script.Cut();
              2002-12-07  [Mower].Script.Cut();
              2003-01-07  [Mower].Script.Cut();
              2003-02-11  [Mower].Script.Cut();
              2003-03-03  [Mower].Script.Cut();
              2003-04-02  [Mower].Script.Cut();
              2003-05-02  [Mower].Script.Cut();
              2003-06-13  [Mower].Script.Cut();
              2003-09-14  [Mower].Script.Cut();
              2003-10-16  [Mower].Script.Cut();
              2003-11-12  [Mower].Script.Cut();
              2003-12-12  [Mower].Script.Cut();
              2004-01-05  [Mower].Script.Cut();
              2004-02-03  [Mower].Script.Cut();
              2004-03-04  [Mower].Script.Cut();
              2004-03-31  [Mower].Script.Cut();
              2004-04-28  [Mower].Script.Cut();
              2004-06-09  [Mower].Script.Cut();
              2004-10-06  [Mower].Script.Cut();
          CompositeFactor LS: Specifications=[Cutting]
            Operations Cutting
              2002-10-06  [Mower].Script.Cut();
              2002-11-17  [Mower].Script.Cut();
              2002-12-29  [Mower].Script.Cut();
              2003-02-11  [Mower].Script.Cut();
              2003-03-08  [Mower].Script.Cut();
              2003-04-05  [Mower].Script.Cut();
              2003-05-05  [Mower].Script.Cut();
              2003-06-13  [Mower].Script.Cut();
              2003-10-06  [Mower].Script.Cut();
              2003-11-13  [Mower].Script.Cut();
              2003-12-29  [Mower].Script.Cut();
              2004-02-08  [Mower].Script.Cut();
              2004-03-07  [Mower].Script.Cut();
              2004-04-04  [Mower].Script.Cut();
              2004-05-03  [Mower].Script.Cut();
              2004-06-12  [Mower].Script.Cut();
              2004-10-06  [Mower].Script.Cut();
      Simulation Iversen_91
        Clock: Start=2000-10-24; End=2004-10-31
        Summary summaryfile
        Weather: FileName=lincoln.met
        SoilArbitrator Soil Arbitrator
        Zone paddock: Area=1; Slope=0; AspectAngle=0; Altitude=50
          MicroClimate: a_interception=0; b_interception=1; c_interception=0; d_interception=0; soil_albedo=0.23; SoilHeatFluxFraction=0.4; MinimumHeightDiffForNewLayer=0; NightInterceptionFraction=0.5; ReferenceHeight=2
          Irrigation
          Fertiliser
          Manager DiagnosticsVariables: same as New Zealand.Iversen_8.Iversen_8LL.paddock.DiagnosticsVariables
          SurfaceOrganicMatter surface organic matter: InitialResidueName=wheat; InitialResidueType=wheat; InitialResidueMass=0; InitialStandingFraction=0; InitialCPR=0; InitialCNR=80
          Report: EventNames=[Clock].DoReport
            VariableNames:
              [Clock].Today
              [DiagnosticsVariables].Script.AccumPlantN
              [DiagnosticsVariables].Script.AccumMineralisation
              [DiagnosticsVariables].Script.AccumDenit
              [DiagnosticsVariables].Script.AccumFert
              [DiagnosticsVariables].Script.AccumLeach
              [DiagnosticsVariables].Script.AccumDetach
              [DiagnosticsVariables].Script.DeltaSoilOMN
              [DiagnosticsVariables].Script.DeltaSurfaceOMN
              [DiagnosticsVariables].Script.DeltaSoilMineralN
              [Lucerne].Root.NSupply
              [Soil].SoilWater.Eo
              [Soil].SoilWater.Es
              [DiagnosticsVariables].Script.SWC as SWC
              [DiagnosticsVariables].Script.DUL
              [Soil].SoilWater.Drainage
              [Soil].SoilWater.Runoff
              [DiagnosticsVariables].Script.OutFlowLat
              [Soil].SoilWater.pond
              [DiagnosticsVariables].Script.AccumEO
              [DiagnosticsVariables].Script.AccumEP
              [DiagnosticsVariables].Script.AccumES
              [DiagnosticsVariables].Script.AccumDrainage
              [DiagnosticsVariables].Script.AccumRunoff
              [DiagnosticsVariables].Script.AccumRainfall
              [DiagnosticsVariables].Script.AccumIrrigation
              [DiagnosticsVariables].Script.AccumOutflowLat
              [DiagnosticsVariables].Script.SoilWaterDeficit
              [Lucerne].Grain.Live.Wt
              [Lucerne].Shell.Live.Wt
              [Lucerne].Stem.Live.Wt as StemWt
              [Lucerne].Stem.Live.Wt
              [Lucerne].Grain.Live.N
              [Lucerne].Shell.Live.N
              [Lucerne].Leaf.Live.Wt as LeafWt
              [Lucerne].Root.Live.Wt as RootWt
              [Lucerne].Leaf.Live.N
              [Lucerne].Root.Live.N
              [Lucerne].Leaf.Live.NConc
              [Lucerne].Root.Live.NConc
              [Lucerne].Root.WaterSupply
              [Lucerne].Root.WaterUptake
              [Lucerne].Leaf.Transpiration
              [Lucerne].Leaf.WaterDemand
              [Lucerne].Root.Depth
              [Lucerne].Leaf.CoverTotal
              [Lucerne].Leaf.CoverDead
              [Lucerne].Leaf.LAI
              [Lucerne].Leaf.Height
              [Soil].SoilWater.SWmm
              [Soil].SoilNitrogen.NO3.kgha
              [DiagnosticsVariables].Script.SoilNitrogenContent
              [Lucerne].Arbitrator.N.TotalPlantDemand
              [DiagnosticsVariables].Script.FomN
              [DiagnosticsVariables].Script.HumN
              [DiagnosticsVariables].Script.BiomN
              [DiagnosticsVariables].Script.DltNMinRes
              [DiagnosticsVariables].Script.DltNMinTot
              [Lucerne].Leaf.Fw
              [Lucerne].Leaf.Fn
              [Lucerne].Phenology.CurrentPhase.Name
              [Lucerne].Phenology.CurrentStageName
              [Lucerne].Phenology.Stage
              [Lucerne].Pod.Wt
              [Lucerne].Pod.N
              [Lucerne].AboveGround.Wt *10 as shootbiomass
              [Lucerne].Shell.PodNumber
              [Lucerne].Leaf.LAIFunction
              [Mower].Script.BudsDays as BudsDays
              [Mower].Script.FloDays as FloDays
              [Mower].Script.HarvestFlag
              [Mower].Script.Rotation as Rotation
              [Mower].Script.Year as GrowthSeason
          Manager LucerneSowingRule: same as New Zealand.Iversen_9.Simulation0.paddock.LucerneSowingRule
          Operations IrrigationEvents
            2000-12-20  [Irrigation].Apply(25);
            2000-12-29  [Irrigation].Apply(30);
            2001-01-28  [Irrigation].Apply(36);
            2001-02-17  [Irrigation].Apply(45);
            2001-03-07  [Irrigation].Apply(55);
            2001-03-30  [Irrigation].Apply(80);
            2001-04-29  [Irrigation].Apply(52);
            2001-10-06  [Irrigation].Apply(70);
            2001-12-06  [Irrigation].Apply(70);
            2001-12-20  [Irrigation].Apply(80);
            2002-09-12  [Irrigation].Apply(42);
            2002-10-11  [Irrigation].Apply(40);
            2002-12-31  [Irrigation].Apply(47);
            2003-01-19  [Irrigation].Apply(40);
            2003-02-12  [Irrigation].Apply(45);
            2003-02-28  [Irrigation].Apply(45);
            2003-03-14  [Irrigation].Apply(50);
            2003-03-27  [Irrigation].Apply(40);
            2003-11-27  [Irrigation].Apply(35);
            2004-01-02  [Irrigation].Apply(40);
            2004-01-14  [Irrigation].Apply(40);
            2004-02-15  [Irrigation].Apply(40);
          Plant Lucerne
          Operations Cutting
          Report Report1: EventNames=[Clock].DoReport
            VariableNames:
              [Lucerne].TapRoot.DMDemand.Storage
              [Clock].Today
              [Lucerne].Leaf.Photosynthesis
          Manager Mower: same as New Zealand.Iversen_8.Iversen_8LL.paddock.Mower
          Operations CommonCutting: same as New Zealand.Iversen_9.Factors.Permutation.SowingDate.SD1.Cutting
          Operations UncertainIrrigation
            2001-12-20  [Irrigation].Apply(50);
            2002-01-29  [Irrigation].Apply(50);
            2002-02-28  [Irrigation].Apply(50);
            2002-03-17  [Irrigation].Apply(30);
            2002-04-07  [Irrigation].Apply(30);
          Soil: same as New Zealand.Iversen_8.Iversen_8LL.paddock.Soil
    Experiment Iversen_12
      Factors
        Factor SowingDate
          CompositeFactor SD1
            Specifications:
              [LucerneSowingRule].Script.SowingDate = 2010-10-04
              [Cutting]
              [Clock].StartDate = 2010-10-04
            Operations Cutting
              2010-12-29  [Mower].Script.Cut();
              2011-02-09  [Mower].Script.Cut();
              2011-04-21  [Mower].Script.Cut();
              2011-06-21  [Mower].Script.Cut();
              2011-10-12  [Mower].Script.Cut();
              2011-11-18  [Mower].Script.Cut();
              2011-12-21  [Mower].Script.Cut();
              2012-01-27  [Mower].Script.Cut();
              2012-03-16  [Mower].Script.Cut();
              2012-05-02  [Mower].Script.Cut();
              2012-07-17  [Mower].Script.Cut();
            Soil: SoilType=Udic Haplustept (US), Pallic orthic brown soil (NZ); Site=Ashley Dene: Lincoln University Research Farm; NearestTown=Lincoln; Country=New Zealand; Latitude=999999; Longitude=999999
              Comments=Soil water characterised from NNM (2 years). Stone content and BD  from Di and Cameron 2002. Soil saturation from Cichota 2013.
              Chemical
                Thickness  NO3N  NH4N  PH
                200        31    8     6
                100        1.5   0.05  -
                100        1     0.03  -
                100        1     0.01  -
                100        1     0.01  -
                100        0.7   0.01  -
                100        0.5   0.01  -
                100        0.5   0.01  -
                100        0.5   0.01  -
                100        0.5   0.01  -
                100        0.5   0.01  -
                100        0.5   0.01  -
                100        0.5   0.01  -
                100        0.5   0.01  -
                100        0.5   0.01  -
                100        0.5   0.01  -
                100        0.5   0.01  -
                100        0.05  0.01  -
                100        0.05  0.01  -
                100        0.05  0.01  -
                100        0.05  0.01  -
                100        0     0     -
              Physical
                Thickness  BD    AirDry  LL15   DUL    SAT
                200        1.15  0.092   0.092  0.361  0.361
                100        1.15  0.138   0.138  0.358  0.358
                100        1.31  0.128   0.128  0.305  0.305
                100        1.31  0.108   0.108  0.288  0.288
                100        1.95  0.092   0.092  0.29   0.29
                100        1.95  0.09    0.09   0.3    0.3
                100        1.95  0.094   0.094  0.306  0.306
                100        1.95  0.113   0.113  0.323  0.323
                100        1.95  0.139   0.139  0.329  0.329
                100        1.95  0.126   0.126  0.322  0.322
                100        1.95  0.11    0.11   0.31   0.31
                100        1.95  0.094   0.094  0.293  0.293
                100        1.95  0.102   0.102  0.309  0.309
                100        1.95  0.11    0.11   0.341  0.341
                100        1.95  0.162   0.162  0.346  0.346
                100        1.95  0.213   0.213  0.353  0.353
                100        1.95  0.226   0.226  0.37   0.37
                100        1.95  0.249   0.249  0.379  0.379
                100        1.95  0.259   0.259  0.369  0.369
                100        1.95  0.269   0.269  0.37   0.37
                100        1.95  0.275   0.275  0.368  0.368
                100        1.95  0.281   0.281  0.368  0.368
                SoilCrop LucerneSoil
                  LL=[0.092, 0.138, 0.128, 0.108, 0.092, 0.09, 0.094, 0.113, 0.139, 0.126, 0.11, 0.094, 0.102, 0.11, 0.162, 0.213, 0.226, 0.249, 0.259, 0.269, 0.275, 0.281]
                  KL=[0.065, 0.005, 0.085, 0.11, 0.11, 0.11, 0.105, 0.105, 0.1, 0.01, 0.105, 0.11, 0.11, 0.11, 0.08, 0.005, 0.005, 0.005, 0.005, 0.005, 0.005, 0.005]
                  XF=[1, 1, 1, 1, 1, 1, 1, 1, 1, 1, 1, 1, 1, 1, 1, 1, 1, 1, 1, 1, 1, 1]
              WaterBalance SoilWater: SummerDate=1-Oct; SummerU=5; SummerCona=4.4; WinterDate=1-Mar; WinterU=5; WinterCona=2.5; DiffusConst=88; DiffusSlope=35.4; Salb=0.18; CN2Bare=68; CNRed=20; CNCov=0.8
                Thickness=[200, 100, 100, 100, 100, 100, 100, 100, 100, 100, 100, 100, 100, 100, 100, 100, 100, 100, 100, 100, 100, 100]
                SWCON=[0.99, 0.99, 0.99, 0.99, 0.99, 0.99, 0.99, 0.99, 0.99, 0.99, 0.99, 0.99, 0.99, 0.99, 0.99, 0.99, 0.99, 0.99, 0.99, 0.99, 0.99, 0.99]
              SoilNitrogen: fom_types=[default, manure, mucuna, lablab, shemp, stable]; fract_carb=[0.2, 0.3, 0.54, 0.57, 0.45, 0]; fract_cell=[0.7, 0.3, 0.37, 0.37, 0.47, 0.1]; fract_lign=[0.1, 0.4, 0.09, 0.06, 0.08, 0.9]; NPartitionApproach=0
                SoilNitrogenNO3 NO3
                SoilNitrogenNH4 NH4
                SoilNitrogenUrea Urea
                SoilNitrogenPlantAvailableNO3 PlantAvailableNO3
                SoilNitrogenPlantAvailableNH4 PlantAvailableNH4
              Organic: FOMCNRatio=50
                Thickness  Carbon  SoilCNRatio  FBiom  FInert  FOM
                200        3.57    14.5         0.025  0.45    194.46
                100        1.47    14.5         0.025  0.6     170.68
                100        1.2     14.5         0.015  0.75    149.808
                100        1.03    14.5         0.01   0.9     131.489
                100        0.47    14.5         0.01   0.96    115.409
                100        0.47    14.5         0.01   0.96    101.296
                100        0.47    14.5         0.01   0.96    88.9093
                100        0.47    14.5         0.01   0.96    78.0369
                100        0.47    14.5         0.01   0.96    68.4941
                100        0.47    14.5         0.01   0.96    60.1182
                100        0.47    14.5         0.01   0.96    52.7666
                100        0.47    14.5         0.01   0.96    46.3139
                100        0.47    14.5         0.01   0.96    40.6504
                100        0.47    14.5         0.01   0.96    35.6794
                100        0.47    14.5         0.01   0.96    31.3163
                100        0.47    14.5         0.01   0.96    27.4867
                100        0.47    14.5         0.01   0.96    24.1255
                100        0.47    14.5         0.01   0.96    21.1753
                100        0.47    14.5         0.01   0.96    18.5858
                100        0.47    14.5         0.01   0.96    16.313
                100        0.47    14.5         0.01   0.96    14.3182
                100        0.47    14.5         0.01   0.96    12.5673
              Sample Initial nitrogen: SWUnits=Volumetric; OCUnits=Total; PHUnits=Water
                Thickness=[200, 100, 100, 100, 100, 100, 100, 100, 100, 100, 100, 100, 100, 100, 100, 100, 100, 100, 100, 100, 100, 100, -]
              CERESSoilTemperature Temperature
              Sample InitialConditions: SWUnits=Volumetric; OCUnits=Total; PHUnits=Water
                Thickness=[200, 100, 100, 100, 100, 100, 100, 100, 100, 100, 100, 100, 100, 100, 100, 100, 100, 100, 100, 100, 100, 100]
                SW=[0.244, 0.299, 0.274, 0.262, 0.27, 0.292, 0.306, 0.314, 0.297, 0.316, 0.309, 0.288, 0.303, 0.339, 0.343, 0.352, 0.365, 0.366, 0.363, 0.366, 0.358, 0.362]
              InitialWater Initial water: PercentMethod=0; FractionFull=1
          CompositeFactor SD2
            Specifications:
              [LucerneSowingRule].Script.SowingDate = 2010-11-04
              [Cutting]
              [Clock].StartDate = 2010-11-04
            Operations Cutting
              2011-01-15  [Mower].Script.Cut();
              2011-03-11  [Mower].Script.Cut();
              2011-05-14  [Mower].Script.Cut();
              2011-06-21  [Mower].Script.Cut();
              2011-10-12  [Mower].Script.Cut();
              2011-11-18  [Mower].Script.Cut();
              2011-12-21  [Mower].Script.Cut();
              2012-01-27  [Mower].Script.Cut();
              2012-03-16  [Mower].Script.Cut();
              2012-05-02  [Mower].Script.Cut();
              2012-07-17  [Mower].Script.Cut();
            Soil: SoilType=Udic Haplustept (US), Pallic orthic brown soil (NZ); Site=Ashley Dene: Lincoln University Research Farm; NearestTown=Lincoln; Country=New Zealand; Latitude=999999; Longitude=999999
              Comments=Soil water characterised from NNM (2 years). Stone content and BD  from Di and Cameron 2002. Soil saturation from Cichota 2013.
              Chemical
                Thickness  NO3N  NH4N
                200        31    8
                100        1.5   0.05
                100        1     0.03
                100        1     0.01
                100        1     0.01
                100        0.7   0.01
                100        0.5   0.01
                100        0.5   0.01
                100        0.5   0.01
                100        0.5   0.01
                100        0.5   0.01
                100        0.5   0.01
                100        0.5   0.01
                100        0.5   0.01
                100        0.5   0.01
                100        0.5   0.01
                100        0.5   0.01
                100        0.05  0.01
                100        0.05  0.01
                100        0.05  0.01
                100        0.05  0.01
                100        0     0
                PH=[6, -, -, -, -, -, -, -, -, -, -, -, -, -, -, -, -, -, -, -, -, -, -]
              Physical
                Thickness  BD    AirDry  LL15   DUL    SAT
                200        1.15  0.092   0.092  0.375  0.375
                100        1.15  0.143   0.143  0.366  0.366
                100        1.31  0.155   0.155  0.318  0.318
                100        1.31  0.142   0.142  0.292  0.292
                100        1.95  0.127   0.127  0.295  0.295
                100        1.95  0.133   0.133  0.303  0.303
                100        1.95  0.144   0.144  0.315  0.315
                100        1.95  0.133   0.133  0.327  0.327
                100        1.95  0.135   0.135  0.337  0.337
                100        1.95  0.145   0.145  0.336  0.336
                100        1.95  0.134   0.134  0.319  0.319
                100        1.95  0.124   0.124  0.31   0.31
                100        1.95  0.127   0.127  0.34   0.34
                100        1.95  0.131   0.131  0.341  0.341
                100        1.95  0.176   0.176  0.346  0.346
                100        1.95  0.22    0.22   0.36   0.36
                100        1.95  0.238   0.238  0.37   0.37
                100        1.95  0.256   0.256  0.375  0.375
                100        1.95  0.271   0.271  0.374  0.374
                100        1.95  0.286   0.286  0.364  0.364
                100        1.95  0.288   0.288  0.368  0.368
                100        1.95  0.29    0.29   0.368  0.368
                SoilCrop LucerneSoil
                  LL=[0.092, 0.143, 0.155, 0.142, 0.127, 0.133, 0.144, 0.133, 0.135, 0.145, 0.134, 0.124, 0.127, 0.131, 0.176, 0.22, 0.238, 0.256, 0.271, 0.286, 0.288, 0.29]
                  KL=[0.065, 0.105, 0.095, 0.11, 0.11, 0.11, 0.11, 0.105, 0.1, 0.06, 0.095, 0.105, 0.105, 0.1, 0.09, 0.005, 0.005, 0.005, 0.005, 0.005, 0.005, 0.005]
                  XF=[1, 1, 1, 1, 1, 1, 1, 1, 1, 1, 1, 1, 1, 1, 1, 1, 1, 1, 1, 1, 1, 1]
              WaterBalance SoilWater: same as New Zealand.Iversen_12.Factors.SowingDate.SD1.Soil.SoilWater
              SoilNitrogen: same as New Zealand.Iversen_12.Factors.SowingDate.SD1.Soil.SoilNitrogen
              Organic: same as New Zealand.Iversen_12.Factors.SowingDate.SD1.Soil.Organic
              Sample Initial nitrogen: same as New Zealand.Iversen_12.Factors.SowingDate.SD1.Soil.Initial nitrogen
              CERESSoilTemperature Temperature
              Sample InitialConditions: SWUnits=Volumetric; OCUnits=Total; PHUnits=Water
                Thickness=[200, 100, 100, 100, 100, 100, 100, 100, 100, 100, 100, 100, 100, 100, 100, 100, 100, 100, 100, 100, 100, 100]
                SW=[0.375, 0.189, 0.205, 0.206, 0.203, 0.241, 0.277, 0.302, 0.323, 0.326, 0.318, 0.307, 0.333, 0.339, 0.345, 0.353, 0.361, 0.37, 0.372, 0.355, 0.365, 0.355]
              InitialWater Initial water: PercentMethod=0; FractionFull=1
          CompositeFactor SD3
            Specifications:
              [LucerneSowingRule].Script.SowingDate = 2010-12-02
              [Cutting]
              [Clock].StartDate = 2010-12-02
            Operations Cutting
              2011-02-16  [Mower].Script.Cut();
              2011-04-21  [Mower].Script.Cut();
              2011-06-21  [Mower].Script.Cut();
              2011-10-12  [Mower].Script.Cut();
              2011-11-18  [Mower].Script.Cut();
              2011-12-21  [Mower].Script.Cut();
              2012-01-27  [Mower].Script.Cut();
              2012-03-16  [Mower].Script.Cut();
              2012-05-02  [Mower].Script.Cut();
              2012-07-17  [Mower].Script.Cut();
            Soil: SoilType=Udic Haplustept (US), Pallic orthic brown soil (NZ); Site=Ashley Dene: Lincoln University Research Farm; NearestTown=Lincoln; Country=New Zealand; Latitude=999999; Longitude=999999
              Comments=Soil water characterised from NNM (2 years). Stone content and BD  from Di and Cameron 2002. Soil saturation from Cichota 2013.
              Chemical: same as New Zealand.Iversen_12.Factors.SowingDate.SD2.Soil.Chemical
              Physical
                Thickness  BD    AirDry  LL15   DUL    SAT
                200        1.15  0.107   0.107  0.368  0.368
                100        1.15  0.158   0.158  0.368  0.368
                100        1.31  0.166   0.166  0.327  0.327
                100        1.31  0.17    0.17   0.305  0.305
                100        1.95  0.173   0.173  0.311  0.311
                100        1.95  0.168   0.168  0.324  0.324
                100        1.95  0.159   0.159  0.335  0.335
                100        1.95  0.141   0.141  0.338  0.338
                100        1.95  0.122   0.122  0.319  0.319
                100        1.95  0.11    0.11   0.302  0.302
                100        1.95  0.1     0.1    0.277  0.277
                100        1.95  0.09    0.09   0.271  0.271
                100        1.95  0.132   0.132  0.289  0.289
                100        1.95  0.174   0.174  0.321  0.321
                100        1.95  0.159   0.159  0.34   0.34
                100        1.95  0.144   0.144  0.349  0.349
                100        1.95  0.192   0.192  0.373  0.373
                100        1.95  0.238   0.238  0.376  0.376
                100        1.95  0.261   0.261  0.38   0.38
                100        1.95  0.283   0.283  0.377  0.377
                100        1.95  0.282   0.282  0.352  0.352
                100        1.95  0.282   0.282  0.35   0.35
                SoilCrop LucerneSoil
                  LL=[0.107, 0.158, 0.166, 0.17, 0.173, 0.168, 0.159, 0.141, 0.122, 0.11, 0.1, 0.09, 0.132, 0.174, 0.159, 0.144, 0.192, 0.238, 0.261, 0.283, 0.282, 0.282]
                  KL=[0.055, 0.09, 0.105, 0.11, 0.11, 0.08, 0.045, 0.005, 0.06, 0.09, 0.11, 0.11, 0.11, 0.055, 0.03, 0.105, 0.005, 0.005, 0.005, 0.005, 0.005, 0.005]
                  XF=[1, 1, 1, 1, 1, 1, 1, 1, 1, 1, 1, 1, 1, 1, 1, 1, 1, 1, 1, 1, 1, 1]
              WaterBalance SoilWater: same as New Zealand.Iversen_12.Factors.SowingDate.SD1.Soil.SoilWater
              SoilNitrogen: same as New Zealand.Iversen_12.Factors.SowingDate.SD1.Soil.SoilNitrogen
              Organic: same as New Zealand.Iversen_12.Factors.SowingDate.SD1.Soil.Organic
              Sample Initial nitrogen: same as New Zealand.Iversen_12.Factors.SowingDate.SD1.Soil.Initial nitrogen
              CERESSoilTemperature Temperature
              Sample InitialConditions: SWUnits=Volumetric; OCUnits=Total; PHUnits=Water
                Thickness=[200, 100, 100, 100, 100, 100, 100, 100, 100, 100, 100, 100, 100, 100, 100, 100, 100, 100, 100, 100, 100, 100]
                SW=[0.233, 0.288, 0.268, 0.256, 0.269, 0.29, 0.305, 0.318, 0.298, 0.285, 0.274, 0.271, 0.288, 0.315, 0.34, 0.346, 0.368, 0.362, 0.366, 0.368, 0.341, 0.338]
              InitialWater Initial water: PercentMethod=0; FractionFull=1
          CompositeFactor SD4
            Specifications:
              [LucerneSowingRule].Script.SowingDate = 2011-01-10
              [Cutting]
              [Clock].StartDate = 2011-01-10
            Operations Cutting
              2011-05-06  [Mower].Script.Cut();
              2011-06-21  [Mower].Script.Cut();
              2011-10-12  [Mower].Script.Cut();
              2011-11-18  [Mower].Script.Cut();
              2011-12-21  [Mower].Script.Cut();
              2012-01-27  [Mower].Script.Cut();
              2012-03-16  [Mower].Script.Cut();
              2012-05-02  [Mower].Script.Cut();
              2012-07-17  [Mower].Script.Cut();
            Soil: SoilType=Udic Haplustept (US), Pallic orthic brown soil (NZ); Site=Ashley Dene: Lincoln University Research Farm; NearestTown=Lincoln; Country=New Zealand; Latitude=999999; Longitude=999999
              Comments=Soil water characterised from NNM (2 years). Stone content and BD  from Di and Cameron 2002. Soil saturation from Cichota 2013.
              Chemical: same as New Zealand.Iversen_12.Factors.SowingDate.SD2.Soil.Chemical
              Physical
                Thickness  BD    AirDry  LL15   DUL    SAT
                200        1.15  0.158   0.158  0.37   0.37
                100        1.15  0.169   0.169  0.368  0.368
                100        1.31  0.15    0.15   0.314  0.314
                100        1.31  0.128   0.128  0.294  0.294
                100        1.95  0.12    0.12   0.297  0.297
                100        1.95  0.109   0.109  0.318  0.318
                100        1.95  0.106   0.106  0.322  0.322
                100        1.95  0.12    0.12   0.32   0.32
                100        1.95  0.104   0.104  0.3    0.3
                100        1.95  0.079   0.079  0.275  0.275
                100        1.95  0.086   0.086  0.264  0.264
                100        1.95  0.099   0.099  0.274  0.274
                100        1.95  0.121   0.121  0.295  0.295
                100        1.95  0.142   0.142  0.307  0.307
                100        1.95  0.167   0.167  0.324  0.324
                100        1.95  0.191   0.191  0.341  0.341
                100        1.95  0.2     0.2    0.338  0.338
                100        1.95  0.225   0.225  0.348  0.348
                100        1.95  0.258   0.258  0.368  0.368
                100        1.95  0.291   0.291  0.384  0.384
                100        1.95  0.289   0.289  0.381  0.381
                100        1.95  0.286   0.286  0.357  0.357
                SoilCrop LucerneSoil
                  LL=[0.158, 0.169, 0.15, 0.128, 0.12, 0.109, 0.106, 0.12, 0.104, 0.079, 0.086, 0.099, 0.121, 0.142, 0.167, 0.191, 0.2, 0.225, 0.258, 0.291, 0.289, 0.286]
                  KL=[0.045, 0.11, 0.105, 0.11, 0.11, 0.11, 0.105, 0.11, 0.105, 0.105, 0.11, 0.11, 0.11, 0.105, 0.06, 0.005, 0.11, 0.045, 0.005, 0.005, 0.005, 0.01]
                  XF=[1, 1, 1, 1, 1, 1, 1, 1, 1, 1, 1, 1, 1, 1, 1, 1, 1, 1, 1, 1, 1, 1]
              WaterBalance SoilWater: same as New Zealand.Iversen_12.Factors.SowingDate.SD1.Soil.SoilWater
              SoilNitrogen: same as New Zealand.Iversen_12.Factors.SowingDate.SD1.Soil.SoilNitrogen
              Organic: same as New Zealand.Iversen_12.Factors.SowingDate.SD1.Soil.Organic
              Sample Initial nitrogen: same as New Zealand.Iversen_12.Factors.SowingDate.SD1.Soil.Initial nitrogen
              CERESSoilTemperature Temperature
              Sample InitialConditions: SWUnits=Volumetric; OCUnits=Total; PHUnits=Water
                Thickness=[200, 100, 100, 100, 100, 100, 100, 100, 100, 100, 100, 100, 100, 100, 100, 100, 100, 100, 100, 100, 100, 100]
                SW=[0.261, 0.288, 0.247, 0.232, 0.231, 0.232, 0.249, 0.275, 0.272, 0.242, 0.227, 0.252, 0.295, 0.307, 0.324, 0.34, 0.331, 0.348, 0.368, 0.373, 0.372, 0.348]
              InitialWater Initial water: PercentMethod=0; FractionFull=1
          CompositeFactor SD5
            Specifications:
              [LucerneSowingRule].Script.SowingDate = 2011-02-07
              [Cutting]
              [Clock].StartDate = 2011-02-7
            Operations Cutting
              2011-05-18  [Mower].Script.Cut();
              2011-06-21  [Mower].Script.Cut();
              2011-10-12  [Mower].Script.Cut();
              2011-11-18  [Mower].Script.Cut();
              2011-12-21  [Mower].Script.Cut();
              2012-01-27  [Mower].Script.Cut();
              2012-03-16  [Mower].Script.Cut();
              2012-05-02  [Mower].Script.Cut();
              2012-07-17  [Mower].Script.Cut();
            Soil: SoilType=Udic Haplustept (US), Pallic orthic brown soil (NZ); Site=Ashley Dene: Lincoln University Research Farm; NearestTown=Lincoln; Country=New Zealand; Latitude=999999; Longitude=999999
              Comments=Soil water characterised from NNM (2 years). Stone content and BD  from Di and Cameron 2002. Soil saturation from Cichota 2013.
              Chemical: same as New Zealand.Iversen_12.Factors.SowingDate.SD2.Soil.Chemical
              Physical
                Thickness  BD    AirDry  LL15   DUL    SAT
                200        1.15  0.154   0.154  0.369  0.369
                100        1.15  0.172   0.172  0.37   0.37
                100        1.31  0.176   0.176  0.326  0.326
                100        1.31  0.16    0.16   0.309  0.309
                100        1.95  0.13    0.13   0.307  0.307
                100        1.95  0.125   0.125  0.312  0.312
                100        1.95  0.114   0.114  0.308  0.308
                100        1.95  0.09    0.09   0.312  0.312
                100        1.95  0.091   0.091  0.314  0.314
                100        1.95  0.126   0.126  0.318  0.318
                100        1.95  0.115   0.115  0.312  0.312
                100        1.95  0.103   0.103  0.317  0.317
                100        1.95  0.138   0.138  0.303  0.303
                100        1.95  0.174   0.174  0.308  0.308
                100        1.95  0.181   0.181  0.329  0.329
                100        1.95  0.187   0.187  0.346  0.346
                100        1.95  0.18    0.18   0.334  0.334
                100        1.95  0.2     0.2    0.34   0.34
                100        1.95  0.227   0.227  0.361  0.361
                100        1.95  0.253   0.253  0.367  0.367
                100        1.95  0.268   0.268  0.356  0.356
                100        1.95  0.283   0.283  0.346  0.346
                SoilCrop LucerneSoil
                  LL=[0.154, 0.172, 0.176, 0.16, 0.13, 0.125, 0.114, 0.09, 0.091, 0.126, 0.115, 0.103, 0.138, 0.174, 0.181, 0.187, 0.18, 0.2, 0.227, 0.253, 0.268, 0.283]
                  KL=[0.065, 0.1, 0.105, 0.11, 0.11, 0.11, 0.11, 0.105, 0.1, 0.095, 0.11, 0.11, 0.11, 0.095, 0.1, 0.11, 0.105, 0.1, 0.085, 0.095, 0.005, 0.005]
                  XF=[1, 1, 1, 1, 1, 1, 1, 1, 1, 1, 1, 1, 1, 1, 1, 1, 1, 1, 1, 1, 1, 1]
              WaterBalance SoilWater: same as New Zealand.Iversen_12.Factors.SowingDate.SD1.Soil.SoilWater
              SoilNitrogen: same as New Zealand.Iversen_12.Factors.SowingDate.SD1.Soil.SoilNitrogen
              Organic: same as New Zealand.Iversen_12.Factors.SowingDate.SD1.Soil.Organic
              Sample Initial nitrogen: same as New Zealand.Iversen_12.Factors.SowingDate.SD1.Soil.Initial nitrogen
              CERESSoilTemperature Temperature
              Sample InitialConditions: SWUnits=Volumetric; OCUnits=Total; PHUnits=Water
                Thickness=[200, 100, 100, 100, 100, 100, 100, 100, 100, 100, 100, 100, 100, 100, 100, 100, 100, 100, 100, 100, 100, 100]
                SW=[0.197, 0.272, 0.256, 0.239, 0.226, 0.225, 0.245, 0.24, 0.225, 0.252, 0.266, 0.271, 0.25, 0.285, 0.32, 0.337, 0.332, 0.34, 0.361, 0.36, 0.355, 0.341]
              InitialWater Initial water: PercentMethod=0; FractionFull=1
          CompositeFactor SD6
            Specifications:
              [LucerneSowingRule].Script.SowingDate = 2011-10-10
              [Cutting]
              [Clock].StartDate = 2011-10-10
            Operations Cutting
              2012-01-05  [Mower].Script.Cut();
              2012-02-22  [Mower].Script.Cut();
              2012-04-05  [Mower].Script.Cut();
              2012-06-19  [Mower].Script.Cut();
            Soil: SoilType=Udic Haplustept (US), Pallic orthic brown soil (NZ); Site=Ashley Dene: Lincoln University Research Farm; NearestTown=Lincoln; Country=New Zealand; Latitude=999999; Longitude=999999
              Comments=Soil water characterised from NNM (2 years). Stone content and BD  from Di and Cameron 2002. Soil saturation from Cichota 2013.
              Chemical: same as New Zealand.Iversen_12.Factors.SowingDate.SD2.Soil.Chemical
              Physical
                Thickness  BD    AirDry  LL15   DUL    SAT
                200        1.15  0.116   0.116  0.37   0.37
                100        1.15  0.161   0.161  0.333  0.333
                100        1.31  0.168   0.168  0.309  0.309
                100        1.31  0.185   0.185  0.286  0.286
                100        1.95  0.174   0.174  0.28   0.28
                100        1.95  0.151   0.151  0.283  0.283
                100        1.95  0.152   0.152  0.295  0.295
                100        1.95  0.176   0.176  0.312  0.312
                100        1.95  0.176   0.176  0.316  0.316
                100        1.95  0.171   0.171  0.315  0.315
                100        1.95  0.204   0.204  0.32   0.32
                100        1.95  0.237   0.237  0.326  0.326
                100        1.95  0.226   0.226  0.337  0.337
                100        1.95  0.216   0.216  0.343  0.343
                100        1.95  0.237   0.237  0.344  0.344
                100        1.95  0.259   0.259  0.344  0.344
                100        1.95  0.262   0.262  0.359  0.359
                100        1.95  0.264   0.264  0.367  0.367
                100        1.95  0.29    0.29   0.38   0.38
                100        1.95  0.315   0.315  0.378  0.378
                100        1.95  0.313   0.313  0.373  0.373
                100        1.95  0.309   0.309  0.365  0.365
                SoilCrop LucerneSoil
                  LL=[0.116, 0.161, 0.168, 0.185, 0.174, 0.151, 0.152, 0.176, 0.176, 0.171, 0.204, 0.237, 0.226, 0.216, 0.237, 0.259, 0.262, 0.264, 0.29, 0.315, 0.313, 0.309]
                  KL=[0.05, 0.11, 0.105, 0.105, 0.11, 0.11, 0.11, 0.1, 0.105, 0.11, 0.105, 0.06, 0.11, 0.11, 0.105, 0.11, 0.11, 0.11, 0.105, 0.105, 0.11, 0.11]
                  XF=[1, 1, 1, 1, 1, 1, 1, 1, 1, 1, 1, 1, 1, 1, 1, 1, 1, 1, 1, 1, 1, 1]
              WaterBalance SoilWater: same as New Zealand.Iversen_12.Factors.SowingDate.SD1.Soil.SoilWater
              SoilNitrogen: same as New Zealand.Iversen_12.Factors.SowingDate.SD1.Soil.SoilNitrogen
              Organic: same as New Zealand.Iversen_12.Factors.SowingDate.SD1.Soil.Organic
              Sample Initial nitrogen: same as New Zealand.Iversen_12.Factors.SowingDate.SD1.Soil.Initial nitrogen
              CERESSoilTemperature Temperature
              Sample InitialConditions: SWUnits=Volumetric; OCUnits=Total; PHUnits=Water
                Thickness=[200, 100, 100, 100, 100, 100, 100, 100, 100, 100, 100, 100, 100, 100, 100, 100, 100, 100, 100, 100, 100, 100]
                SW=[0.257, 0.33, 0.305, 0.284, 0.277, 0.283, 0.295, 0.309, 0.313, 0.315, 0.319, 0.322, 0.336, 0.339, 0.342, 0.336, 0.355, 0.354, 0.37, 0.372, 0.366, 0.357]
              InitialWater Initial water: PercentMethod=0; FractionFull=1
          CompositeFactor SD7
            Specifications:
              [LucerneSowingRule].Script.SowingDate = 2011-11-07
              [Cutting]
              [Clock].StartDate = 2011-11-07
            Operations Cutting
              2012-01-26  [Mower].Script.Cut();
              2012-03-13  [Mower].Script.Cut();
              2012-05-03  [Mower].Script.Cut();
              2012-06-19  [Mower].Script.Cut();
            Soil: SoilType=Udic Haplustept (US), Pallic orthic brown soil (NZ); Site=Ashley Dene: Lincoln University Research Farm; NearestTown=Lincoln; Country=New Zealand; Latitude=999999; Longitude=999999
              Comments=Soil water characterised from NNM (2 years). Stone content and BD  from Di and Cameron 2002. Soil saturation from Cichota 2013.
              Chemical: same as New Zealand.Iversen_12.Factors.SowingDate.SD2.Soil.Chemical
              Physical
                Thickness  BD    AirDry  LL15   DUL    SAT
                200        1.15  0.141   0.141  0.331  0.331
                100        1.15  0.171   0.171  0.356  0.356
                100        1.31  0.163   0.163  0.311  0.311
                100        1.31  0.156   0.156  0.3    0.3
                100        1.95  0.132   0.132  0.297  0.297
                100        1.95  0.134   0.134  0.293  0.293
                100        1.95  0.161   0.161  0.312  0.312
                100        1.95  0.177   0.177  0.316  0.316
                100        1.95  0.161   0.161  0.31   0.31
                100        1.95  0.161   0.161  0.31   0.31
                100        1.95  0.162   0.162  0.3    0.3
                100        1.95  0.161   0.161  0.286  0.286
                100        1.95  0.162   0.162  0.304  0.304
                100        1.95  0.163   0.163  0.322  0.322
                100        1.95  0.157   0.157  0.322  0.322
                100        1.95  0.152   0.152  0.35   0.35
                100        1.95  0.206   0.206  0.374  0.374
                100        1.95  0.258   0.258  0.364  0.364
                100        1.95  0.282   0.282  0.355  0.355
                100        1.95  0.302   0.302  0.358  0.358
                100        1.95  0.304   0.304  0.357  0.357
                100        1.95  0.305   0.305  0.345  0.345
                SoilCrop LucerneSoil
                  LL=[0.141, 0.171, 0.163, 0.156, 0.132, 0.134, 0.161, 0.177, 0.161, 0.161, 0.162, 0.161, 0.162, 0.163, 0.157, 0.152, 0.206, 0.258, 0.282, 0.302, 0.304, 0.305]
                  KL=[0.085, 0.09, 0.105, 0.11, 0.11, 0.105, 0.095, 0.005, 0.05, 0.105, 0.11, 0.11, 0.105, 0.105, 0.11, 0.11, 0.085, 0.005, 0.1, 0.105, 0.11, 0.11]
                  XF=[1, 1, 1, 1, 1, 1, 1, 1, 1, 1, 1, 1, 1, 1, 1, 1, 1, 1, 1, 1, 1, 1]
              WaterBalance SoilWater: same as New Zealand.Iversen_12.Factors.SowingDate.SD1.Soil.SoilWater
              SoilNitrogen: same as New Zealand.Iversen_12.Factors.SowingDate.SD1.Soil.SoilNitrogen
              Organic: same as New Zealand.Iversen_12.Factors.SowingDate.SD1.Soil.Organic
              Sample Initial nitrogen: same as New Zealand.Iversen_12.Factors.SowingDate.SD1.Soil.Initial nitrogen
              CERESSoilTemperature Temperature
              Sample InitialConditions: SWUnits=Volumetric; OCUnits=Total; PHUnits=Water
                Thickness=[200, 100, 100, 100, 100, 100, 100, 100, 100, 100, 100, 100, 100, 100, 100, 100, 100, 100, 100, 100, 100, 100]
                SW=[0.273, 0.335, 0.304, 0.286, 0.287, 0.289, 0.305, 0.313, 0.307, 0.308, 0.294, 0.284, 0.3, 0.319, 0.318, 0.348, 0.37, 0.36, 0.351, 0.353, 0.349, 0.343]
              InitialWater Initial water: PercentMethod=0; FractionFull=1
          CompositeFactor SD8
            Specifications:
              [LucerneSowingRule].Script.SowingDate = 2011-12-09
              [Cutting]
              [Clock].StartDate = 2011-12-09
            Operations Cutting
              2012-02-28  [Mower].Script.Cut();
              2012-04-12  [Mower].Script.Cut();
              2012-06-19  [Mower].Script.Cut();
            Soil: SoilType=Udic Haplustept (US), Pallic orthic brown soil (NZ); Site=Ashley Dene: Lincoln University Research Farm; NearestTown=Lincoln; Country=New Zealand; Latitude=999999; Longitude=999999
              Comments=Soil water characterised from NNM (2 years). Stone content and BD  from Di and Cameron 2002. Soil saturation from Cichota 2013.
              Chemical: same as New Zealand.Iversen_12.Factors.SowingDate.SD2.Soil.Chemical
              Physical
                Thickness  BD    AirDry  LL15   DUL    SAT
                200        1.15  0.158   0.158  0.335  0.335
                100        1.15  0.181   0.181  0.313  0.313
                100        1.31  0.183   0.183  0.278  0.278
                100        1.31  0.164   0.164  0.257  0.257
                100        1.95  0.156   0.156  0.231  0.231
                100        1.95  0.18    0.18   0.239  0.239
                100        1.95  0.189   0.189  0.269  0.269
                100        1.95  0.193   0.193  0.275  0.275
                100        1.95  0.202   0.202  0.274  0.274
                100        1.95  0.191   0.191  0.286  0.286
                100        1.95  0.163   0.163  0.268  0.268
                100        1.95  0.134   0.134  0.235  0.235
                100        1.95  0.138   0.138  0.217  0.217
                100        1.95  0.142   0.142  0.236  0.236
                100        1.95  0.162   0.162  0.252  0.252
                100        1.95  0.207   0.207  0.264  0.264
                100        1.95  0.261   0.261  0.309  0.309
                100        1.95  0.311   0.311  0.36   0.36
                100        1.95  0.311   0.311  0.367  0.367
                100        1.95  0.311   0.311  0.358  0.358
                100        1.95  0.308   0.308  0.361  0.361
                100        1.95  0.31    0.31   0.356  0.356
                SoilCrop LucerneSoil
                  LL=[0.158, 0.181, 0.183, 0.164, 0.156, 0.18, 0.189, 0.193, 0.202, 0.191, 0.163, 0.134, 0.138, 0.142, 0.162, 0.207, 0.261, 0.311, 0.311, 0.311, 0.308, 0.31]
                  KL=[0.095, 0.065, 0.11, 0.11, 0.11, 0.02, 0.005, 0.005, 0.005, 0.005, 0.005, 0.075, 0.11, 0.11, 0.11, 0.085, 0.04, 0.08, 0.105, 0.11, 0.11, 0.11]
                  XF=[1, 1, 1, 1, 1, 1, 1, 1, 1, 1, 1, 1, 1, 1, 1, 1, 1, 1, 1, 1, 1, 1]
              WaterBalance SoilWater: same as New Zealand.Iversen_12.Factors.SowingDate.SD1.Soil.SoilWater
              SoilNitrogen: same as New Zealand.Iversen_12.Factors.SowingDate.SD1.Soil.SoilNitrogen
              Organic: same as New Zealand.Iversen_12.Factors.SowingDate.SD1.Soil.Organic
              Sample Initial nitrogen: same as New Zealand.Iversen_12.Factors.SowingDate.SD1.Soil.Initial nitrogen
              CERESSoilTemperature Temperature
              Sample InitialConditions: SWUnits=Volumetric; OCUnits=Total; PHUnits=Water
                Thickness=[200, 100, 100, 100, 100, 100, 100, 100, 100, 100, 100, 100, 100, 100, 100, 100, 100, 100, 100, 100, 100, 100]
                SW=[0.308, 0.223, 0.218, 0.209, 0.21, 0.239, 0.269, 0.275, 0.274, 0.28, 0.265, 0.23, 0.21, 0.23, 0.245, 0.263, 0.307, 0.357, 0.366, 0.357, 0.355, 0.355]
              InitialWater Initial water: PercentMethod=0; FractionFull=1
          CompositeFactor SD9
            Specifications:
              [LucerneSowingRule].Script.SowingDate = 2012-01-10
              [Cutting]
              [Clock].StartDate = 2012-01-10
            Operations Cutting
              2012-04-26  [Mower].Script.Cut();
              2012-06-19  [Mower].Script.Cut();
            Soil: SoilType=Udic Haplustept (US), Pallic orthic brown soil (NZ); Site=Ashley Dene: Lincoln University Research Farm; NearestTown=Lincoln; Country=New Zealand; Latitude=999999; Longitude=999999
              Comments=Soil water characterised from NNM (2 years). Stone content and BD  from Di and Cameron 2002. Soil saturation from Cichota 2013.
              Chemical: same as New Zealand.Iversen_12.Factors.SowingDate.SD2.Soil.Chemical
              Physical
                Thickness  BD    AirDry  LL15   DUL    SAT
                200        1.15  0.193   0.193  0.342  0.342
                100        1.15  0.253   0.253  0.354  0.354
                100        1.31  0.223   0.223  0.306  0.306
                100        1.31  0.197   0.197  0.263  0.263
                100        1.95  0.184   0.184  0.242  0.242
                100        1.95  0.179   0.179  0.251  0.251
                100        1.95  0.194   0.194  0.263  0.263
                100        1.95  0.175   0.175  0.229  0.229
                100        1.95  0.182   0.182  0.223  0.223
                100        1.95  0.191   0.191  0.238  0.238
                100        1.95  0.183   0.183  0.236  0.236
                100        1.95  0.174   0.174  0.234  0.234
                100        1.95  0.189   0.189  0.24   0.24
                100        1.95  0.203   0.203  0.259  0.259
                100        1.95  0.238   0.238  0.3    0.3
                100        1.95  0.272   0.272  0.317  0.317
                100        1.95  0.287   0.287  0.348  0.348
                100        1.95  0.302   0.302  0.354  0.354
                100        1.95  0.307   0.307  0.351  0.351
                100        1.95  0.311   0.311  0.363  0.363
                100        1.95  0.309   0.309  0.365  0.365
                100        1.95  0.306   0.306  0.351  0.351
                SoilCrop LucerneSoil
                  LL=[0.193, 0.253, 0.223, 0.197, 0.184, 0.179, 0.194, 0.175, 0.182, 0.191, 0.183, 0.174, 0.189, 0.203, 0.238, 0.272, 0.287, 0.302, 0.307, 0.311, 0.309, 0.306]
                  KL=[0.06, 0.06, 0.049, 0.048, 0.055, 0.05, 0.048, 0.059, 0.076, 0.051, 0.094, 0.069, 0.033, 0.03, 0.043, 0.043, 0.056, 0.061, 0.03, 0.03, 0.03, 0.03]
                  XF=[1, 1, 1, 1, 1, 1, 1, 1, 1, 1, 1, 1, 1, 1, 1, 1, 1, 1, 1, 1, 1, 1]
              WaterBalance SoilWater: same as New Zealand.Iversen_12.Factors.SowingDate.SD1.Soil.SoilWater
              SoilNitrogen: same as New Zealand.Iversen_12.Factors.SowingDate.SD1.Soil.SoilNitrogen
              Organic: same as New Zealand.Iversen_12.Factors.SowingDate.SD1.Soil.Organic
              Sample Initial nitrogen: same as New Zealand.Iversen_12.Factors.SowingDate.SD1.Soil.Initial nitrogen
              CERESSoilTemperature Temperature
              Sample InitialConditions: SWUnits=Volumetric; OCUnits=Total; PHUnits=Water
                Thickness=[200, 100, 100, 100, 100, 100, 100, 100, 100, 100, 100, 100, 100, 100, 100, 100, 100, 100, 100, 100, 100, 100]
                SW=[0.246, 0.342, 0.296, 0.259, 0.24, 0.25, 0.257, 0.228, 0.22, 0.236, 0.232, 0.23, 0.236, 0.254, 0.289, 0.314, 0.347, 0.352, 0.351, 0.359, 0.359, 0.348]
              InitialWater Initial water: PercentMethod=0; FractionFull=1
          CompositeFactor SD10
            Specifications:
              [LucerneSowingRule].Script.SowingDate = 2012-02-17
              [Cutting]
              [Clock].StartDate = 2012-02-17
            Operations Cutting
              2012-06-19  [Mower].Script.Cut();
            Soil: SoilType=Udic Haplustept (US), Pallic orthic brown soil (NZ); Site=Ashley Dene: Lincoln University Research Farm; NearestTown=Lincoln; Country=New Zealand; Latitude=999999; Longitude=999999
              Comments=Soil water characterised from NNM (2 years). Stone content and BD  from Di and Cameron 2002. Soil saturation from Cichota 2013.
              Chemical: same as New Zealand.Iversen_12.Factors.SowingDate.SD2.Soil.Chemical
              Physical
                Thickness  BD    AirDry  LL15   DUL    SAT
                200        1.15  0.226   0.226  0.351  0.351
                100        1.15  0.27    0.27   0.327  0.327
                100        1.31  0.24    0.24   0.296  0.296
                100        1.31  0.213   0.213  0.272  0.272
                100        1.95  0.2     0.2    0.257  0.257
                100        1.95  0.206   0.206  0.243  0.243
                100        1.95  0.21    0.21   0.236  0.236
                100        1.95  0.207   0.207  0.233  0.233
                100        1.95  0.202   0.202  0.226  0.226
                100        1.95  0.208   0.208  0.226  0.226
                100        1.95  0.213   0.213  0.23   0.23
                100        1.95  0.215   0.215  0.235  0.235
                100        1.95  0.194   0.194  0.225  0.225
                100        1.95  0.172   0.172  0.204  0.204
                100        1.95  0.208   0.208  0.22   0.22
                100        1.95  0.235   0.235  0.249  0.249
                100        1.95  0.261   0.261  0.277  0.277
                100        1.95  0.28    0.28   0.29   0.29
                100        1.95  0.291   0.291  0.306  0.306
                100        1.95  0.299   0.299  0.314  0.314
                100        1.95  0.3     0.3    0.318  0.318
                100        1.95  0.299   0.299  0.316  0.316
                SoilCrop LucerneSoil
                  LL=[0.226, 0.27, 0.24, 0.213, 0.2, 0.206, 0.21, 0.207, 0.202, 0.208, 0.213, 0.215, 0.194, 0.172, 0.208, 0.235, 0.261, 0.28, 0.291, 0.299, 0.3, 0.299]
                  XF=[1, 1, 1, 1, 1, 1, 1, 1, 1, 1, 1, 1, 1, 1, 1, 1, 1, 1, 1, 1, 1, 1]
              WaterBalance SoilWater: same as New Zealand.Iversen_12.Factors.SowingDate.SD1.Soil.SoilWater
              SoilNitrogen: same as New Zealand.Iversen_12.Factors.SowingDate.SD1.Soil.SoilNitrogen
              Organic: same as New Zealand.Iversen_12.Factors.SowingDate.SD1.Soil.Organic
              Sample Initial nitrogen: same as New Zealand.Iversen_12.Factors.SowingDate.SD1.Soil.Initial nitrogen
              CERESSoilTemperature Temperature
              Sample InitialConditions: SWUnits=Volumetric; OCUnits=Total; PHUnits=Water
                Thickness=[200, 100, 100, 100, 100, 100, 100, 100, 100, 100, 100, 100, 100, 100, 100, 100, 100, 100, 100, 100, 100, 100]
                SW=[0.248, 0.327, 0.284, 0.255, 0.244, 0.239, 0.236, 0.233, 0.226, 0.224, 0.228, 0.234, 0.223, 0.2, 0.211, 0.237, 0.267, 0.289, 0.306, 0.314, 0.318, 0.316]
              InitialWater Initial water: PercentMethod=0; FractionFull=1
      Simulation Simulation3
        Clock: Start=2010-09-27; End=2012-07-12
        Summary summaryfile
        Weather: FileName=C:\Data\Master\01Data\ClimateAndObserved\Iversen12.met
        SoilArbitrator Soil Arbitrator
        Zone paddock: Area=1; Slope=0; AspectAngle=0; Altitude=50
          Folder Management
            Manager DiagnosticsVariables
              InitialDay = False
              AccumPlantN = 0
              AccumMineralisation = 0
              AccumDenit = 0
              AccumFert = 0
              AccumLeach = 0
              AccumDetach = 0
              DeltaSoilOMN = 0
              DeltaSurfaceOMN = 0
              DeltaSoilMineralN = 0
              SoilNitrogenContent = 0
              AccumEO = 0
              AccumEP = 0
              AccumES = 0
              AccumDrainage = 0
              AccumRunoff = 0
              AccumOutflowLat = 0
              AccumIrrigation = 0
              AccumRainfall = 0
              SoilWaterDeficit = 0
              InitialSoilOMN = 0
              InitialSurfaceOMN = 0
              InitialMineralN = 0
              SWC = 0
              DUL = 0
              OutFlowLat = 0
              FomN = 0
              BiomN = 0
              HumN = 0
              OrganicN = 0
              NO3N = 0
              NH4N = 0
              UreaN = 0
              MineralN = 0
              DltNMinRes = 0
              DltNMinTot = 0
              script: same as in New Zealand.Iversen_8.Iversen_8LL.paddock.DiagnosticsVariables
            Manager LucerneSowingRule
              SowingDate = 10/24/2000 00:00:00
              RowSpacing = 150
              SowingDepth = 20
              SowingRate = 300
              CultivarName = FD5
              script: same as in New Zealand.Iversen_8.Iversen_8LL.paddock.LucerneSowingRule
            Manager Mower
              Year = 0
              Rotation = 0
              YearRotation = 0
              HarvestFlag = False
              YearTransation = 1-Jun
              BudsDays = 0
              FloDays = 0
              script: same as in New Zealand.Iversen_8.Iversen_8LL.paddock.Mower
          MicroClimate: a_interception=0; b_interception=1; c_interception=0; d_interception=0; soil_albedo=0.23; SoilHeatFluxFraction=0.4; MinimumHeightDiffForNewLayer=0; NightInterceptionFraction=0.5; ReferenceHeight=2
          Irrigation
          Fertiliser
          SurfaceOrganicMatter surface organic matter: InitialResidueName=wheat; InitialResidueType=wheat; InitialResidueMass=0; InitialStandingFraction=0; InitialCPR=0; InitialCNR=80
          Report: EventNames=[Clock].DoReport
            VariableNames:
              [Clock].Today
              [DiagnosticsVariables].Script.AccumPlantN
              [DiagnosticsVariables].Script.AccumMineralisation
              [DiagnosticsVariables].Script.AccumDenit
              [DiagnosticsVariables].Script.AccumFert
              [DiagnosticsVariables].Script.AccumLeach
              [DiagnosticsVariables].Script.AccumDetach
              [DiagnosticsVariables].Script.DeltaSoilOMN
              [DiagnosticsVariables].Script.DeltaSurfaceOMN
              [DiagnosticsVariables].Script.DeltaSoilMineralN
              [Lucerne].Root.NSupply
              [Soil].SoilWater.Eo
              [Soil].SoilWater.Es
              [DiagnosticsVariables].Script.SWC
              [DiagnosticsVariables].Script.DUL
              [Soil].SoilWater.Drainage
              [Soil].SoilWater.Runoff
              [DiagnosticsVariables].Script.OutFlowLat
              [Soil].SoilWater.pond
              [DiagnosticsVariables].Script.AccumEO
              [DiagnosticsVariables].Script.AccumEP
              [DiagnosticsVariables].Script.AccumES
              [DiagnosticsVariables].Script.AccumDrainage
              [DiagnosticsVariables].Script.AccumRunoff
              [DiagnosticsVariables].Script.AccumRainfall
              [DiagnosticsVariables].Script.AccumIrrigation
              [DiagnosticsVariables].Script.AccumOutflowLat
              [DiagnosticsVariables].Script.SoilWaterDeficit
              [Lucerne].Grain.Live.Wt
              [Lucerne].Shell.Live.Wt
              [Lucerne].Stem.Live.Wt
              [Lucerne].Stem.Live.Wt
              [Lucerne].Grain.Live.N
              [Lucerne].Shell.Live.N
              [Lucerne].Leaf.Live.Wt
              [Lucerne].Root.Live.Wt
              [Lucerne].Leaf.Live.N
              [Lucerne].Root.Live.N
              [Lucerne].Leaf.Live.NConc
              [Lucerne].Root.Live.NConc
              [Lucerne].Root.WaterSupply
              [Lucerne].Root.WaterUptake
              [Lucerne].Leaf.Transpiration
              [Lucerne].Leaf.WaterDemand
              [Lucerne].Root.Depth
              [Lucerne].Leaf.CoverTotal
              [Lucerne].Leaf.CoverDead
              [Lucerne].Leaf.LAI
              [Lucerne].Leaf.Height
              [Soil].SoilWater.SWmm
              [Soil].SoilNitrogen.NO3.kgha
              [DiagnosticsVariables].Script.SoilNitrogenContent
              [Lucerne].Arbitrator.N.TotalPlantDemand
              [DiagnosticsVariables].Script.FomN
              [DiagnosticsVariables].Script.HumN
              [DiagnosticsVariables].Script.BiomN
              [DiagnosticsVariables].Script.DltNMinRes
              [DiagnosticsVariables].Script.DltNMinTot
              [Lucerne].Leaf.Fw
              [Lucerne].Leaf.Fn
              [Lucerne].Phenology.CurrentPhase.Name
              [Lucerne].Phenology.CurrentStageName
              [Lucerne].Phenology.Stage
              [Lucerne].Pod.Wt
              [Lucerne].Pod.N
              [Lucerne].AboveGround.Wt *10 as shootbiomass
              [Lucerne].Shell.PodNumber
              [Lucerne].Leaf.LAIFunction
              [Mower].Script.BudsDays as BudsDays
              [Mower].Script.FloDays as FloDays
              [Mower].Script.HarvestFlag
              [Mower].Script.Rotation as Rotation
              [Mower].Script.Year as GrowthSeason
          Plant Lucerne
          Operations Cutting
          Soil: Latitude=0; Longitude=0
            Chemical
              Thickness  NO3N     NH4N  PH
              100        172.222  0     6.6
              200        11.9048  0     6.2
              300        1.15741  0     5.7
              300        1.06157  0     5.5
              300        0        0     5.5
              300        0        0     5.5
            InitialWater Initial water: PercentMethod=1; FractionFull=0.998443
            Physical
              Thickness  BD    AirDry  LL15   DUL   SAT
              100        1.26  0.05    0.075  0.35  0.38
              100        1.26  0.06    0.078  0.35  0.38
              100        1.26  0.07    0.07   0.32  0.39
              100        1.44  0.07    0.07   0.29  0.32
              100        1.44  0.069   0.07   0.27  0.3
              100        1.44  0.07    0.07   0.31  0.32
              100        1.57  0.07    0.07   0.33  0.34
              100        1.57  0.07    0.07   0.35  0.35
              100        1.57  0.07    0.07   0.34  0.35
              100        1.58  0.07    0.07   0.34  0.35
              100        1.58  0.07    0.07   0.34  0.35
              100        1.58  0.07    0.07   0.34  0.35
              100        1.58  0.08    0.08   0.34  0.35
              100        1.59  0.078   0.08   0.33  0.35
              100        1.59  0.08    0.08   0.33  0.35
              100        1.59  0.087   0.09   0.32  0.34
              100        1.59  0.09    0.09   0.3   0.33
              100        1.59  0.09    0.09   0.3   0.33
              100        1.59  0.09    0.09   0.3   0.33
              100        1.59  0.08    0.08   0.31  0.33
              100        1.59  0.09    0.09   0.31  0.33
              100        1.59  0.09    0.09   0.32  0.34
              100        1.59  0.09    0.09   0.35  0.38
              SoilCrop LucerneSoil
                LL=[0.1, 0.13, 0.12, 0.12, 0.11, 0.08, 0.08, 0.08, 0.09, 0.11, 0.12, 0.15, 0.15, 0.15, 0.16, 0.2, 0.25, 0.25, 0.25, 0.25, 0.23, 0.15, 0.15]
                KL=[0.06, 0.06, 0.03, 0.03, 0.03, 0.03, 0.03, 0.03, 0.03, 0.03, 0.03, 0.03, 0.03, 0.03, 0.03, 0.03, 0.03, 0.03, 0.03, 0.03, 0.03, 0.03, 0.03]
                XF=[1, 1, 1, 1, 1, 1, 1, 1, 1, 1, 1, 1, 1, 1, 1, 1, 1, 1, 1, 1, 1, 1, 1]
            WaterBalance SoilWater: SummerDate=1-Oct; SummerU=6; SummerCona=3; WinterDate=1-Mar; WinterU=5; WinterCona=2.5; DiffusConst=189; DiffusSlope=21; Salb=0.13; CN2Bare=0; CNRed=0; CNCov=0.8; Thickness=[100, 200, 300, 300, 300, 300]; SWCON=[0.55, 0.55, 0.55, 0.55, 0.55, 0.55]
            SoilNitrogen: same as New Zealand.Iversen_12.Factors.SowingDate.SD1.Soil.SoilNitrogen
            Organic: FOMCNRatio=30
              Thickness  Carbon  SoilCNRatio  FBiom  FInert  FOM
              100        1.82    11.5         0.025  0.3     1243.93
              200        1.47    11.5         0.025  0.4     833.832
              300        1.2     11.5         0.015  0.75    457.617
              300        1.03    11.5         0.01   0.9     251.145
              300        0.47    11.5         0.01   0.96    137.831
              300        0.47    11.5         0.01   0.96    75.6435
            CERESSoilTemperature Temperature
    Experiment AshleyDene
      Factors
        Factor SowingDate
          CompositeFactor SD1
            Specifications:
              [LucerneSowingRule].Script.SowingDate = 2010-10-21
              [Cutting]
              [Clock].StartDate = 2010-10-21
            Operations Cutting
              2011-01-25  [Mower].Script.Cut();
              2011-04-08  [Mower].Script.Cut();
              2011-06-20  [Mower].Script.Cut();
              2011-11-04  [Mower].Script.Cut();
              2011-12-24  [Mower].Script.Cut();
              2012-03-05  [Mower].Script.Cut();
              2012-04-25  [Mower].Script.Cut();
              2012-07-17  [Mower].Script.Cut();
            Soil: SoilType=Udic Haplustept (US), Pallic orthic brown soil (NZ); Site=Ashley Dene: Lincoln University Research Farm; NearestTown=Lincoln; Country=New Zealand; Latitude=999999; Longitude=999999
              Comments=Soil water characterised from NNM (2 years). Stone content and BD  from Di and Cameron 2002. Soil saturation from Cichota 2013.
              Chemical: same as New Zealand.Iversen_12.Factors.SowingDate.SD2.Soil.Chemical
              Physical
                Thickness  BD     AirDry  LL15   DUL    SAT
                200        1.438  0.063   0.063  0.27   0.27
                100        1.643  0.08    0.08   0.194  0.194
                100        1.796  0.074   0.074  0.158  0.158
                100        1.796  0.076   0.076  0.135  0.135
                100        2.086  0.069   0.069  0.118  0.118
                100        2.086  0.07    0.07   0.114  0.114
                100        2.146  0.07    0.07   0.111  0.111
                100        2.146  0.07    0.07   0.115  0.115
                100        2.146  0.069   0.069  0.115  0.115
                100        2.146  0.07    0.07   0.11   0.11
                100        2.146  0.073   0.073  0.106  0.106
                100        2.146  0.079   0.079  0.116  0.116
                100        2.21   0.084   0.084  0.114  0.114
                100        2.21   0.086   0.086  0.13   0.13
                100        1.95   0.092   0.092  0.138  0.138
                100        1.95   0.096   0.096  0.134  0.134
                100        1.95   0.094   0.094  0.126  0.126
                100        1.95   0.095   0.095  0.128  0.128
                100        1.95   0.095   0.095  0.122  0.122
                100        1.95   0.095   0.095  0.116  0.116
                100        1.95   0.098   0.098  0.128  0.128
                100        1.95   0.1     0.1    0.147  0.147
                SoilCrop LucerneSoil
                  LL=[0.063, 0.08, 0.074, 0.076, 0.069, 0.07, 0.07, 0.07, 0.069, 0.07, 0.073, 0.079, 0.084, 0.086, 0.092, 0.096, 0.094, 0.095, 0.095, 0.095, 0.098, 0.1]
                  KL=[0.055, 0.1, 0.11, 0.11, 0.11, 0.11, 0.105, 0.075, 0.11, 0.085, 0.105, 0.04, 0.045, 0.035, 0.03, 0.025, 0.04, 0.105, 0.1, 0.065, 0.055, 0.11]
                  XF=[1, 1, 1, 1, 1, 1, 1, 1, 1, 1, 1, 1, 1, 1, 1, 1, 1, 1, 1, 1, 1, 1]
              WaterBalance SoilWater: same as New Zealand.Iversen_12.Factors.SowingDate.SD1.Soil.SoilWater
              SoilNitrogen: same as New Zealand.Iversen_12.Factors.SowingDate.SD1.Soil.SoilNitrogen
              Organic: same as New Zealand.Iversen_12.Factors.SowingDate.SD1.Soil.Organic
              Sample Initial nitrogen: same as New Zealand.Iversen_12.Factors.SowingDate.SD1.Soil.Initial nitrogen
              CERESSoilTemperature Temperature
              Sample InitialConditions: SWUnits=Volumetric; OCUnits=Total; PHUnits=Water
                Thickness=[200, 100, 100, 100, 100, 100, 100, 100, 100, 100, 100, 100, 100, 100, 100, 100, 100, 100, 100, 100, 100, 100]
                SW=[0.204, 0.168, 0.134, 0.11, 0.102, 0.098, 0.1, 0.103, 0.101, 0.097, 0.096, 0.1, 0.106, 0.106, 0.114, 0.117, 0.112, 0.109, 0.11, 0.11, 0.114, 0.118]
              InitialWater Initial water: PercentMethod=0; FractionFull=1
          CompositeFactor SD2
            Specifications:
              [LucerneSowingRule].Script.SowingDate = 2010-11-09
              [Cutting]
              [Clock].StartDate = 2010-11-09
            Operations Cutting
              2011-02-12  [Mower].Script.Cut();
              2011-04-28  [Mower].Script.Cut();
              2011-06-20  [Mower].Script.Cut();
              2011-11-04  [Mower].Script.Cut();
              2011-12-24  [Mower].Script.Cut();
              2012-03-05  [Mower].Script.Cut();
              2012-04-25  [Mower].Script.Cut();
              2012-07-17  [Mower].Script.Cut();
            Soil: SoilType=Udic Haplustept (US), Pallic orthic brown soil (NZ); Site=Ashley Dene: Lincoln University Research Farm; NearestTown=Lincoln; Country=New Zealand; Latitude=999999; Longitude=999999
              Comments=Soil water characterised from NNM (2 years). Stone content and BD  from Di and Cameron 2002. Soil saturation from Cichota 2013.
              Chemical: same as New Zealand.Iversen_12.Factors.SowingDate.SD2.Soil.Chemical
              Physical
                Thickness  BD     AirDry  LL15   DUL    SAT
                200        1.438  0.076   0.076  0.275  0.275
                100        1.643  0.096   0.096  0.221  0.221
                100        1.796  0.084   0.084  0.168  0.168
                100        1.796  0.073   0.073  0.135  0.135
                100        2.086  0.074   0.074  0.121  0.121
                100        2.086  0.072   0.072  0.118  0.118
                100        2.146  0.068   0.068  0.112  0.112
                100        2.146  0.064   0.064  0.108  0.108
                100        2.146  0.064   0.064  0.102  0.102
                100        2.146  0.064   0.064  0.101  0.101
                100        2.146  0.064   0.064  0.101  0.101
                100        2.146  0.064   0.064  0.111  0.111
                100        2.21   0.068   0.068  0.12   0.12
                100        2.21   0.064   0.064  0.123  0.123
                100        1.95   0.07    0.07   0.114  0.114
                100        1.95   0.07    0.07   0.109  0.109
                100        1.95   0.073   0.073  0.108  0.108
                100        1.95   0.076   0.076  0.112  0.112
                100        1.95   0.079   0.079  0.115  0.115
                100        1.95   0.082   0.082  0.114  0.114
                100        1.95   0.087   0.087  0.118  0.118
                100        1.95   0.102   0.102  0.12   0.12
                SoilCrop LucerneSoil
                  LL=[0.076, 0.096, 0.084, 0.073, 0.074, 0.072, 0.068, 0.064, 0.064, 0.064, 0.064, 0.064, 0.068, 0.064, 0.07, 0.07, 0.073, 0.076, 0.079, 0.082, 0.087, 0.102]
                  KL=[0.075, 0.1, 0.105, 0.11, 0.11, 0.11, 0.11, 0.1, 0.075, 0.08, 0.04, 0.03, 0.015, 0.01, 0.02, 0.025, 0.02, 0.02, 0.015, 0.02, 0.015, 0.005]
                  XF=[1, 1, 1, 1, 1, 1, 1, 1, 1, 1, 1, 1, 1, 1, 1, 1, 1, 1, 1, 1, 1, 1]
              WaterBalance SoilWater: same as New Zealand.Iversen_12.Factors.SowingDate.SD1.Soil.SoilWater
              SoilNitrogen: same as New Zealand.Iversen_12.Factors.SowingDate.SD1.Soil.SoilNitrogen
              Organic: same as New Zealand.Iversen_12.Factors.SowingDate.SD1.Soil.Organic
              Sample Initial nitrogen: same as New Zealand.Iversen_12.Factors.SowingDate.SD1.Soil.Initial nitrogen
              CERESSoilTemperature Temperature
              Sample InitialConditions: SWUnits=Volumetric; OCUnits=Total; PHUnits=Water
                Thickness=[200, 100, 100, 100, 100, 100, 100, 100, 100, 100, 100, 100, 100, 100, 100, 100, 100, 100, 100, 100, 100, 100]
                SW=[0.205, 0.189, 0.143, 0.114, 0.103, 0.101, 0.096, 0.093, 0.095, 0.087, 0.09, 0.095, 0.102, 0.103, 0.098, 0.095, 0.094, 0.102, 0.107, 0.107, 0.109, 0.114]
              InitialWater Initial water: PercentMethod=0; FractionFull=1
          CompositeFactor SD3
            Specifications:
              [LucerneSowingRule].Script.SowingDate = 2010-12-08
              [Cutting]
              [Clock].StartDate = 2010-12-08
            Operations Cutting
              2011-03-26  [Mower].Script.Cut();
              2011-06-20  [Mower].Script.Cut();
              2011-11-04  [Mower].Script.Cut();
              2011-12-24  [Mower].Script.Cut();
              2012-03-05  [Mower].Script.Cut();
              2012-04-25  [Mower].Script.Cut();
              2012-07-17  [Mower].Script.Cut();
            Soil: SoilType=Udic Haplustept (US), Pallic orthic brown soil (NZ); Site=Ashley Dene: Lincoln University Research Farm; NearestTown=Lincoln; Country=New Zealand; Latitude=999999; Longitude=999999
              Comments=Soil water characterised from NNM (2 years). Stone content and BD  from Di and Cameron 2002. Soil saturation from Cichota 2013.
              Chemical: same as New Zealand.Iversen_12.Factors.SowingDate.SD2.Soil.Chemical
              Physical
                Thickness  BD     AirDry  LL15   DUL    SAT
                200        1.438  0.074   0.074  0.278  0.278
                100        1.643  0.086   0.086  0.212  0.212
                100        1.796  0.081   0.081  0.166  0.166
                100        1.796  0.079   0.079  0.143  0.143
                100        2.086  0.074   0.074  0.133  0.133
                100        2.086  0.07    0.07   0.119  0.119
                100        2.146  0.072   0.072  0.127  0.127
                100        2.146  0.069   0.069  0.117  0.117
                100        2.146  0.064   0.064  0.107  0.107
                100        2.146  0.063   0.063  0.104  0.104
                100        2.146  0.065   0.065  0.105  0.105
                100        2.146  0.067   0.067  0.109  0.109
                100        2.21   0.069   0.069  0.115  0.115
                100        2.21   0.072   0.072  0.117  0.117
                100        1.95   0.074   0.074  0.117  0.117
                100        1.95   0.076   0.076  0.114  0.114
                100        1.95   0.081   0.081  0.114  0.114
                100        1.95   0.088   0.088  0.113  0.113
                100        1.95   0.094   0.094  0.12   0.12
                100        1.95   0.1     0.1    0.123  0.123
                100        1.95   0.099   0.099  0.125  0.125
                100        1.95   0.095   0.095  0.123  0.123
                SoilCrop LucerneSoil
                  LL=[0.074, 0.086, 0.081, 0.079, 0.074, 0.07, 0.072, 0.069, 0.064, 0.063, 0.065, 0.067, 0.069, 0.072, 0.074, 0.076, 0.081, 0.088, 0.094, 0.1, 0.099, 0.095]
                  KL=[0.095, 0.095, 0.11, 0.11, 0.105, 0.105, 0.08, 0.07, 0.065, 0.07, 0.045, 0.035, 0.035, 0.015, 0.025, 0.04, 0.045, 0.055, 0.025, 0.01, 0.015, 0.02]
                  XF=[1, 1, 1, 1, 1, 1, 1, 1, 1, 1, 1, 1, 1, 1, 1, 1, 1, 1, 1, 1, 1, 1]
              WaterBalance SoilWater: same as New Zealand.Iversen_12.Factors.SowingDate.SD1.Soil.SoilWater
              SoilNitrogen: same as New Zealand.Iversen_12.Factors.SowingDate.SD1.Soil.SoilNitrogen
              Organic: same as New Zealand.Iversen_12.Factors.SowingDate.SD1.Soil.Organic
              Sample Initial nitrogen: same as New Zealand.Iversen_12.Factors.SowingDate.SD1.Soil.Initial nitrogen
              CERESSoilTemperature Temperature
              Sample InitialConditions: SWUnits=Volumetric; OCUnits=Total; PHUnits=Water
                Thickness=[200, 100, 100, 100, 100, 100, 100, 100, 100, 100, 100, 100, 100, 100, 100, 100, 100, 100, 100, 100, 100, 100]
                SW=[0.133, 0.139, 0.116, 0.109, 0.099, 0.094, 0.105, 0.096, 0.088, 0.088, 0.085, 0.091, 0.096, 0.1, 0.102, 0.098, 0.101, 0.102, 0.107, 0.111, 0.111, 0.121]
              InitialWater Initial water: PercentMethod=0; FractionFull=1
          CompositeFactor SD4
            Specifications:
              [LucerneSowingRule].Script.SowingDate = 2011-01-13
              [Cutting]
              [Clock].StartDate = 2011-01-13
            Operations Cutting
              2011-05-06  [Mower].Script.Cut();
              2011-06-20  [Mower].Script.Cut();
              2011-11-04  [Mower].Script.Cut();
              2011-12-24  [Mower].Script.Cut();
              2012-03-05  [Mower].Script.Cut();
              2012-04-25  [Mower].Script.Cut();
              2012-07-17  [Mower].Script.Cut();
            Soil: SoilType=Udic Haplustept (US), Pallic orthic brown soil (NZ); Site=Ashley Dene: Lincoln University Research Farm; NearestTown=Lincoln; Country=New Zealand; Latitude=999999; Longitude=999999
              Comments=Soil water characterised from NNM (2 years). Stone content and BD  from Di and Cameron 2002. Soil saturation from Cichota 2013.
              Chemical: same as New Zealand.Iversen_12.Factors.SowingDate.SD2.Soil.Chemical
              Physical
                Thickness  BD     AirDry  LL15   DUL    SAT
                200        1.438  0.07    0.07   0.3    0.3
                100        1.643  0.083   0.083  0.243  0.243
                100        1.796  0.075   0.075  0.181  0.181
                100        1.796  0.07    0.07   0.151  0.151
                100        2.086  0.068   0.068  0.129  0.129
                100        2.086  0.067   0.067  0.12   0.12
                100        2.146  0.068   0.068  0.114  0.114
                100        2.146  0.068   0.068  0.114  0.114
                100        2.146  0.068   0.068  0.111  0.111
                100        2.146  0.071   0.071  0.11   0.11
                100        2.146  0.075   0.075  0.109  0.109
                100        2.146  0.08    0.08   0.116  0.116
                100        2.21   0.083   0.083  0.121  0.121
                100        2.21   0.086   0.086  0.117  0.117
                100        1.95   0.093   0.093  0.116  0.116
                100        1.95   0.101   0.101  0.12   0.12
                100        1.95   0.106   0.106  0.122  0.122
                100        1.95   0.11    0.11   0.123  0.123
                100        1.95   0.108   0.108  0.122  0.122
                100        1.95   0.105   0.105  0.117  0.117
                100        1.95   0.107   0.107  0.117  0.117
                100        1.95   0.106   0.106  0.118  0.118
                SoilCrop LucerneSoil
                  LL=[0.07, 0.083, 0.075, 0.07, 0.068, 0.067, 0.068, 0.068, 0.068, 0.071, 0.075, 0.08, 0.083, 0.086, 0.093, 0.101, 0.106, 0.11, 0.108, 0.105, 0.107, 0.106]
                  KL=[0.11, 0.08, 0.105, 0.11, 0.11, 0.11, 0.11, 0.095, 0.105, 0.095, 0.075, 0.05, 0.045, 0.065, 0.06, 0.06, 0.06, 0.07, 0.11, 0.11, 0.11, 0.11]
                  XF=[1, 1, 1, 1, 1, 1, 1, 1, 1, 1, 1, 1, 1, 1, 1, 1, 1, 1, 1, 1, 1, 1]
              WaterBalance SoilWater: same as New Zealand.Iversen_12.Factors.SowingDate.SD1.Soil.SoilWater
              SoilNitrogen: same as New Zealand.Iversen_12.Factors.SowingDate.SD1.Soil.SoilNitrogen
              Organic: same as New Zealand.Iversen_12.Factors.SowingDate.SD1.Soil.Organic
              Sample Initial nitrogen: same as New Zealand.Iversen_12.Factors.SowingDate.SD1.Soil.Initial nitrogen
              CERESSoilTemperature Temperature
              Sample InitialConditions: SWUnits=Volumetric; OCUnits=Total; PHUnits=Water
                Thickness=[200, 100, 100, 100, 100, 100, 100, 100, 100, 100, 100, 100, 100, 100, 100, 100, 100, 100, 100, 100, 100, 100]
                SW=[0.194, 0.18, 0.134, 0.111, 0.098, 0.091, 0.091, 0.094, 0.09, 0.091, 0.09, 0.1, 0.102, 0.105, 0.106, 0.109, 0.112, 0.118, 0.118, 0.113, 0.115, 0.116]
              InitialWater Initial water: PercentMethod=0; FractionFull=1
          CompositeFactor SD5
            Specifications:
              [LucerneSowingRule].Script.SowingDate = 2011-02-03
              [Cutting]
              [Clock].StartDate = 2011-02-03
            Operations Cutting
              2011-06-20  [Mower].Script.Cut();
              2011-11-04  [Mower].Script.Cut();
              2011-12-24  [Mower].Script.Cut();
              2012-03-05  [Mower].Script.Cut();
              2012-04-25  [Mower].Script.Cut();
              2012-07-17  [Mower].Script.Cut();
            Soil: SoilType=Udic Haplustept (US), Pallic orthic brown soil (NZ); Site=Ashley Dene: Lincoln University Research Farm; NearestTown=Lincoln; Country=New Zealand; Latitude=999999; Longitude=999999
              Comments=Soil water characterised from NNM (2 years). Stone content and BD  from Di and Cameron 2002. Soil saturation from Cichota 2013.
              Chemical: same as New Zealand.Iversen_12.Factors.SowingDate.SD2.Soil.Chemical
              Physical
                Thickness  BD     AirDry  LL15   DUL    SAT
                200        1.438  0.066   0.066  0.283  0.283
                100        1.643  0.077   0.077  0.206  0.206
                100        1.796  0.077   0.077  0.162  0.162
                100        1.796  0.072   0.072  0.144  0.144
                100        2.086  0.07    0.07   0.126  0.126
                100        2.086  0.07    0.07   0.114  0.114
                100        2.146  0.065   0.065  0.11   0.11
                100        2.146  0.063   0.063  0.106  0.106
                100        2.146  0.064   0.064  0.108  0.108
                100        2.146  0.068   0.068  0.104  0.104
                100        2.146  0.07    0.07   0.111  0.111
                100        2.146  0.073   0.073  0.108  0.108
                100        2.21   0.077   0.077  0.11   0.11
                100        2.21   0.082   0.082  0.114  0.114
                100        1.95   0.085   0.085  0.119  0.119
                100        1.95   0.088   0.088  0.117  0.117
                100        1.95   0.089   0.089  0.116  0.116
                100        1.95   0.09    0.09   0.115  0.115
                100        1.95   0.087   0.087  0.109  0.109
                100        1.95   0.087   0.087  0.11   0.11
                100        1.95   0.089   0.089  0.107  0.107
                100        1.95   0.091   0.091  0.111  0.111
                SoilCrop LucerneSoil
                  LL=[0.066, 0.077, 0.077, 0.072, 0.07, 0.07, 0.065, 0.063, 0.064, 0.068, 0.07, 0.073, 0.077, 0.082, 0.085, 0.088, 0.089, 0.09, 0.087, 0.087, 0.089, 0.091]
                  KL=[0.1, 0.105, 0.11, 0.11, 0.11, 0.11, 0.11, 0.11, 0.11, 0.105, 0.075, 0.075, 0.11, 0.11, 0.085, 0.105, 0.11, 0.11, 0.11, 0.11, 0.11, 0.035]
                  XF=[1, 1, 1, 1, 1, 1, 1, 1, 1, 1, 1, 1, 1, 1, 1, 1, 1, 1, 1, 1, 1, 1]
              WaterBalance SoilWater: same as New Zealand.Iversen_12.Factors.SowingDate.SD1.Soil.SoilWater
              SoilNitrogen: same as New Zealand.Iversen_12.Factors.SowingDate.SD1.Soil.SoilNitrogen
              Organic: same as New Zealand.Iversen_12.Factors.SowingDate.SD1.Soil.Organic
              Sample Initial nitrogen: same as New Zealand.Iversen_12.Factors.SowingDate.SD1.Soil.Initial nitrogen
              CERESSoilTemperature Temperature
              Sample InitialConditions: SWUnits=Volumetric; OCUnits=Total; PHUnits=Water
                Thickness=[200, 100, 100, 100, 100, 100, 100, 100, 100, 100, 100, 100, 100, 100, 100, 100, 100, 100, 100, 100, 100, 100]
                SW=[0.167, 0.15, 0.118, 0.106, 0.099, 0.088, 0.087, 0.087, 0.087, 0.087, 0.091, 0.089, 0.093, 0.095, 0.1, 0.101, 0.101, 0.101, 0.102, 0.096, 0.099, 0.1]
              InitialWater Initial water: PercentMethod=0; FractionFull=1
          CompositeFactor SD6
            Specifications:
              [LucerneSowingRule].Script.SowingDate = 2011-10-10
              [Cutting]
              [Clock].StartDate = 2011-10-10
            Operations Cutting
              2012-01-12  [Mower].Script.Cut();
              2012-03-29  [Mower].Script.Cut();
              2012-06-19  [Mower].Script.Cut();
            Soil: SoilType=Udic Haplustept (US), Pallic orthic brown soil (NZ); Site=Ashley Dene: Lincoln University Research Farm; NearestTown=Lincoln; Country=New Zealand; Latitude=999999; Longitude=999999
              Comments=Soil water characterised from NNM (2 years). Stone content and BD  from Di and Cameron 2002. Soil saturation from Cichota 2013.
              Chemical: same as New Zealand.Iversen_12.Factors.SowingDate.SD2.Soil.Chemical
              Physical
                Thickness  BD     AirDry  LL15   DUL    SAT
                200        1.438  0.074   0.074  0.259  0.259
                100        1.643  0.086   0.086  0.172  0.172
                100        1.796  0.078   0.078  0.133  0.133
                100        1.796  0.073   0.073  0.108  0.108
                100        2.086  0.072   0.072  0.102  0.102
                100        2.086  0.073   0.073  0.103  0.103
                100        2.146  0.074   0.074  0.102  0.102
                100        2.146  0.077   0.077  0.099  0.099
                100        2.146  0.076   0.076  0.099  0.099
                100        2.146  0.074   0.074  0.094  0.094
                100        2.146  0.074   0.074  0.093  0.093
                100        2.146  0.073   0.073  0.09   0.09
                100        2.21   0.076   0.076  0.089  0.089
                100        2.21   0.079   0.079  0.09   0.09
                100        1.95   0.085   0.085  0.098  0.098
                100        1.95   0.091   0.091  0.099  0.099
                100        1.95   0.093   0.093  0.106  0.106
                100        1.95   0.095   0.095  0.104  0.104
                100        1.95   0.096   0.096  0.102  0.102
                100        1.95   0.097   0.097  0.102  0.102
                100        1.95   0.098   0.098  0.108  0.108
                100        1.95   0.106   0.106  0.114  0.114
                SoilCrop LucerneSoil
                  LL=[0.074, 0.086, 0.078, 0.073, 0.072, 0.073, 0.074, 0.077, 0.076, 0.074, 0.074, 0.073, 0.076, 0.079, 0.085, 0.091, 0.093, 0.095, 0.096, 0.097, 0.098, 0.106]
                  KL=[0.08, 0.11, 0.11, 0.11, 0.11, 0.11, 0.11, 0.06, 0.04, 0.045, 0.045, 0.06, 0.1, 0.085, 0.035, 0.065, 0.03, 0.105, 0.11, 0.11, 0.095, 0.005]
                  XF=[1, 1, 1, 1, 1, 1, 1, 1, 1, 1, 1, 1, 1, 1, 1, 1, 1, 1, 1, 1, 1, 1]
              WaterBalance SoilWater: same as New Zealand.Iversen_12.Factors.SowingDate.SD1.Soil.SoilWater
              SoilNitrogen: same as New Zealand.Iversen_12.Factors.SowingDate.SD1.Soil.SoilNitrogen
              Organic: same as New Zealand.Iversen_12.Factors.SowingDate.SD1.Soil.Organic
              Sample Initial nitrogen: same as New Zealand.Iversen_12.Factors.SowingDate.SD1.Soil.Initial nitrogen
              CERESSoilTemperature Temperature
              Sample InitialConditions: SWUnits=Volumetric; OCUnits=Total; PHUnits=Water
                Thickness=[200, 100, 100, 100, 100, 100, 100, 100, 100, 100, 100, 100, 100, 100, 100, 100, 100, 100, 100, 100, 100, 100]
                SW=[0.184, 0.16, 0.121, 0.102, 0.093, 0.089, 0.091, 0.093, 0.098, 0.094, 0.091, 0.089, 0.089, 0.089, 0.096, 0.098, 0.105, 0.102, 0.102, 0.099, 0.104, 0.109]
              InitialWater Initial water: PercentMethod=0; FractionFull=1
          CompositeFactor SD7
            Specifications:
              [LucerneSowingRule].Script.SowingDate = 2011-11-07
              [Cutting]
              [Clock].StartDate = 2011-11-07
            Operations Cutting
              2012-02-02  [Mower].Script.Cut();
              2012-04-12  [Mower].Script.Cut();
              2012-06-19  [Mower].Script.Cut();
            Soil: SoilType=Udic Haplustept (US), Pallic orthic brown soil (NZ); Site=Ashley Dene: Lincoln University Research Farm; NearestTown=Lincoln; Country=New Zealand; Latitude=999999; Longitude=999999
              Comments=Soil water characterised from NNM (2 years). Stone content and BD  from Di and Cameron 2002. Soil saturation from Cichota 2013.
              Chemical: same as New Zealand.Iversen_12.Factors.SowingDate.SD2.Soil.Chemical
              Physical
                Thickness  BD     AirDry  LL15   DUL    SAT
                200        1.438  0.091   0.091  0.276  0.276
                100        1.643  0.108   0.108  0.21   0.21
                100        1.796  0.091   0.091  0.159  0.159
                100        1.796  0.087   0.087  0.134  0.134
                100        2.086  0.083   0.083  0.121  0.121
                100        2.086  0.081   0.081  0.118  0.118
                100        2.146  0.079   0.079  0.108  0.108
                100        2.146  0.077   0.077  0.099  0.099
                100        2.146  0.076   0.076  0.1    0.1
                100        2.146  0.077   0.077  0.101  0.101
                100        2.146  0.077   0.077  0.102  0.102
                100        2.146  0.075   0.075  0.097  0.097
                100        2.21   0.079   0.079  0.094  0.094
                100        2.21   0.083   0.083  0.098  0.098
                100        1.95   0.087   0.087  0.102  0.102
                100        1.95   0.09    0.09   0.108  0.108
                100        1.95   0.095   0.095  0.106  0.106
                100        1.95   0.099   0.099  0.108  0.108
                100        1.95   0.1     0.1    0.111  0.111
                100        1.95   0.099   0.099  0.106  0.106
                100        1.95   0.104   0.104  0.114  0.114
                100        1.95   0.104   0.104  0.113  0.113
                SoilCrop LucerneSoil
                  LL=[0.091, 0.108, 0.091, 0.087, 0.083, 0.081, 0.079, 0.077, 0.076, 0.077, 0.077, 0.075, 0.079, 0.083, 0.087, 0.09, 0.095, 0.099, 0.1, 0.099, 0.104, 0.104]
                  KL=[0.075, 0.1, 0.11, 0.11, 0.11, 0.11, 0.11, 0.1, 0.085, 0.09, 0.11, 0.11, 0.11, 0.11, 0.11, 0.11, 0.11, 0.11, 0.11, 0.11, 0.11, 0.045]
                  XF=[1, 1, 1, 1, 1, 1, 1, 1, 1, 1, 1, 1, 1, 1, 1, 1, 1, 1, 1, 1, 1, 1]
              WaterBalance SoilWater: same as New Zealand.Iversen_12.Factors.SowingDate.SD1.Soil.SoilWater
              SoilNitrogen: same as New Zealand.Iversen_12.Factors.SowingDate.SD1.Soil.SoilNitrogen
              Organic: same as New Zealand.Iversen_12.Factors.SowingDate.SD1.Soil.Organic
              Sample Initial nitrogen: same as New Zealand.Iversen_12.Factors.SowingDate.SD1.Soil.Initial nitrogen
              CERESSoilTemperature Temperature
              Sample InitialConditions: SWUnits=Volumetric; OCUnits=Total; PHUnits=Water
                Thickness=[200, 100, 100, 100, 100, 100, 100, 100, 100, 100, 100, 100, 100, 100, 100, 100, 100, 100, 100, 100, 100, 100]
                SW=[0.193, 0.208, 0.148, 0.129, 0.115, 0.109, 0.101, 0.095, 0.096, 0.097, 0.095, 0.09, 0.087, 0.092, 0.098, 0.099, 0.102, 0.106, 0.107, 0.102, 0.109, 0.109]
              InitialWater Initial water: PercentMethod=0; FractionFull=1
          CompositeFactor SD8
            Specifications:
              [LucerneSowingRule].Script.SowingDate = 2011-12-09
              [Cutting]
              [Clock].StartDate = 2011-12-09
            Operations Cutting
              2012-03-22  [Mower].Script.Cut();
              2012-05-15  [Mower].Script.Cut();
              2012-06-19  [Mower].Script.Cut();
            Soil: SoilType=Udic Haplustept (US), Pallic orthic brown soil (NZ); Site=Ashley Dene: Lincoln University Research Farm; NearestTown=Lincoln; Country=New Zealand; Latitude=999999; Longitude=999999
              Comments=Soil water characterised from NNM (2 years). Stone content and BD  from Di and Cameron 2002. Soil saturation from Cichota 2013.
              Chemical: same as New Zealand.Iversen_12.Factors.SowingDate.SD2.Soil.Chemical
              Physical
                Thickness  BD     AirDry  LL15   DUL    SAT
                200        1.438  0.095   0.095  0.253  0.253
                100        1.643  0.091   0.091  0.168  0.168
                100        1.796  0.086   0.086  0.14   0.14
                100        1.796  0.08    0.08   0.118  0.118
                100        2.086  0.077   0.077  0.108  0.108
                100        2.086  0.076   0.076  0.105  0.105
                100        2.146  0.073   0.073  0.101  0.101
                100        2.146  0.074   0.074  0.097  0.097
                100        2.146  0.079   0.079  0.097  0.097
                100        2.146  0.08    0.08   0.096  0.096
                100        2.146  0.084   0.084  0.096  0.096
                100        2.146  0.085   0.085  0.096  0.096
                100        2.21   0.089   0.089  0.103  0.103
                100        2.21   0.093   0.093  0.11   0.11
                100        1.95   0.094   0.094  0.109  0.109
                100        1.95   0.098   0.098  0.109  0.109
                100        1.95   0.097   0.097  0.108  0.108
                100        1.95   0.098   0.098  0.108  0.108
                100        1.95   0.101   0.101  0.115  0.115
                100        1.95   0.11    0.11   0.123  0.123
                100        1.95   0.113   0.113  0.13   0.13
                100        1.95   0.115   0.115  0.125  0.125
                SoilCrop LucerneSoil
                  LL=[0.095, 0.091, 0.086, 0.08, 0.077, 0.076, 0.073, 0.074, 0.079, 0.08, 0.084, 0.085, 0.089, 0.093, 0.094, 0.098, 0.097, 0.098, 0.101, 0.11, 0.113, 0.115]
                  KL=[0.095, 0.11, 0.11, 0.11, 0.075, 0.01, 0.005, 0.005, 0.005, 0.005, 0.015, 0.04, 0.01, 0.005, 0.005, 0.005, 0.005, 0.06, 0.005, 0.005, 0.005, 0.005]
                  XF=[1, 1, 1, 1, 1, 1, 1, 1, 1, 1, 1, 1, 1, 1, 1, 1, 1, 1, 1, 1, 1, 1]
              WaterBalance SoilWater: same as New Zealand.Iversen_12.Factors.SowingDate.SD1.Soil.SoilWater
              SoilNitrogen: same as New Zealand.Iversen_12.Factors.SowingDate.SD1.Soil.SoilNitrogen
              Organic: same as New Zealand.Iversen_12.Factors.SowingDate.SD1.Soil.Organic
              Sample Initial nitrogen: same as New Zealand.Iversen_12.Factors.SowingDate.SD1.Soil.Initial nitrogen
              CERESSoilTemperature Temperature
              Sample InitialConditions: SWUnits=Volumetric; OCUnits=Total; PHUnits=Water
                Thickness=[200, 100, 100, 100, 100, 100, 100, 100, 100, 100, 100, 100, 100, 100, 100, 100, 100, 100, 100, 100, 100, 100]
                SW=[0.19, 0.109, 0.098, 0.094, 0.088, 0.09, 0.091, 0.089, 0.092, 0.094, 0.094, 0.095, 0.098, 0.102, 0.103, 0.105, 0.106, 0.104, 0.109, 0.119, 0.12, 0.121]
              InitialWater Initial water: PercentMethod=0; FractionFull=1
          CompositeFactor SD9
            Specifications:
              [LucerneSowingRule].Script.SowingDate = 2012-01-10
              [Cutting]
              [Clock].StartDate = 2012-01-10
            Operations Cutting
              2012-04-26  [Mower].Script.Cut();
              2012-06-19  [Mower].Script.Cut();
            Soil: SoilType=Udic Haplustept (US), Pallic orthic brown soil (NZ); Site=Ashley Dene: Lincoln University Research Farm; NearestTown=Lincoln; Country=New Zealand; Latitude=999999; Longitude=999999
              Comments=Soil water characterised from NNM (2 years). Stone content and BD  from Di and Cameron 2002. Soil saturation from Cichota 2013.
              Chemical: same as New Zealand.Iversen_12.Factors.SowingDate.SD2.Soil.Chemical
              Physical
                Thickness  BD     AirDry  LL15   DUL    SAT
                200        1.438  0.11    0.11   0.27   0.27
                100        1.643  0.133   0.133  0.235  0.235
                100        1.796  0.102   0.102  0.169  0.169
                100        1.796  0.089   0.089  0.129  0.129
                100        2.086  0.084   0.084  0.116  0.116
                100        2.086  0.085   0.085  0.106  0.106
                100        2.146  0.088   0.088  0.101  0.101
                100        2.146  0.091   0.091  0.1    0.1
                100        2.146  0.092   0.092  0.098  0.098
                100        2.146  0.092   0.092  0.101  0.101
                100        2.146  0.093   0.093  0.101  0.101
                100        2.146  0.092   0.092  0.098  0.098
                100        2.21   0.094   0.094  0.104  0.104
                100        2.21   0.098   0.098  0.111  0.111
                100        1.95   0.104   0.104  0.117  0.117
                100        1.95   0.104   0.104  0.121  0.121
                100        1.95   0.102   0.102  0.113  0.113
                100        1.95   0.099   0.099  0.106  0.106
                100        1.95   0.096   0.096  0.104  0.104
                100        1.95   0.093   0.093  0.102  0.102
                100        1.95   0.099   0.099  0.11   0.11
                100        1.95   0.102   0.102  0.119  0.119
                SoilCrop LucerneSoil
                  LL=[0.11, 0.133, 0.102, 0.089, 0.084, 0.085, 0.088, 0.091, 0.092, 0.092, 0.093, 0.092, 0.094, 0.098, 0.104, 0.104, 0.102, 0.099, 0.096, 0.093, 0.099, 0.102]
                  KL=[0.035, 0.11, 0.11, 0.105, 0.11, 0.11, 0.005, 0.005, 0.005, 0.005, 0.005, 0.005, 0.005, 0.005, 0.005, 0.005, 0.005, 0.005, 0.005, 0.005, 0.005, 0.005]
                  XF=[1, 1, 1, 1, 1, 1, 1, 1, 1, 1, 1, 1, 1, 1, 1, 1, 1, 1, 1, 1, 1, 1]
              WaterBalance SoilWater: same as New Zealand.Iversen_12.Factors.SowingDate.SD1.Soil.SoilWater
              SoilNitrogen: same as New Zealand.Iversen_12.Factors.SowingDate.SD1.Soil.SoilNitrogen
              Organic: same as New Zealand.Iversen_12.Factors.SowingDate.SD1.Soil.Organic
              Sample Initial nitrogen: same as New Zealand.Iversen_12.Factors.SowingDate.SD1.Soil.Initial nitrogen
              CERESSoilTemperature Temperature
              Sample InitialConditions: SWUnits=Volumetric; OCUnits=Total; PHUnits=Water
                Thickness=[200, 100, 100, 100, 100, 100, 100, 100, 100, 100, 100, 100, 100, 100, 100, 100, 100, 100, 100, 100, 100, 100]
                SW=[0.167, 0.199, 0.144, 0.112, 0.097, 0.091, 0.091, 0.093, 0.095, 0.093, 0.095, 0.094, 0.094, 0.099, 0.105, 0.106, 0.105, 0.099, 0.096, 0.094, 0.099, 0.103]
              InitialWater Initial water: PercentMethod=0; FractionFull=1
          CompositeFactor SD10
            Specifications:
              [LucerneSowingRule].Script.SowingDate = 2012-02-17
              [Cutting]
              [Clock].StartDate = 2012-02-17
            Operations Cutting
              2012-06-19  [Mower].Script.Cut();
            Soil: SoilType=Udic Haplustept (US), Pallic orthic brown soil (NZ); Site=Ashley Dene: Lincoln University Research Farm; NearestTown=Lincoln; Country=New Zealand; Latitude=999999; Longitude=999999
              Comments=Soil water characterised from NNM (2 years). Stone content and BD  from Di and Cameron 2002. Soil saturation from Cichota 2013.
              Chemical: same as New Zealand.Iversen_12.Factors.SowingDate.SD2.Soil.Chemical
              Physical
                Thickness  BD     AirDry  LL15   DUL    SAT
                200        1.438  0.136   0.136  0.284  0.284
                100        1.643  0.167   0.167  0.239  0.239
                100        1.796  0.131   0.131  0.182  0.182
                100        1.796  0.103   0.103  0.134  0.134
                100        2.086  0.09    0.09   0.117  0.117
                100        2.086  0.082   0.082  0.111  0.111
                100        2.146  0.079   0.079  0.106  0.106
                100        2.146  0.075   0.075  0.107  0.107
                100        2.146  0.083   0.083  0.117  0.117
                100        2.146  0.101   0.101  0.118  0.118
                100        2.146  0.099   0.099  0.116  0.116
                100        2.146  0.088   0.088  0.112  0.112
                100        2.21   0.083   0.083  0.107  0.107
                100        2.21   0.085   0.085  0.103  0.103
                100        1.95   0.09    0.09   0.108  0.108
                100        1.95   0.093   0.093  0.113  0.113
                100        1.95   0.094   0.094  0.111  0.111
                100        1.95   0.098   0.098  0.11   0.11
                100        1.95   0.1     0.1    0.113  0.113
                100        1.95   0.103   0.103  0.115  0.115
                100        1.95   0.109   0.109  0.119  0.119
                100        1.95   0.113   0.113  0.123  0.123
                SoilCrop LucerneSoil
                  LL=[0.136, 0.167, 0.131, 0.103, 0.09, 0.082, 0.079, 0.075, 0.083, 0.101, 0.099, 0.088, 0.083, 0.085, 0.09, 0.093, 0.094, 0.098, 0.1, 0.103, 0.109, 0.113]
                  KL=[0.01, 0.105, 0.11, 0.095, 0.11, 0.11, 0.095, 0.005, 0.005, 0.005, 0.005, 0.005, 0.005, 0.005, 0.005, 0.005, 0.005, 0.005, 0.005, 0.005, 0.005, 0.005]
                  XF=[1, 1, 1, 1, 1, 1, 1, 1, 1, 1, 1, 1, 1, 1, 1, 1, 1, 1, 1, 1, 1, 1]
              WaterBalance SoilWater: same as New Zealand.Iversen_12.Factors.SowingDate.SD1.Soil.SoilWater
              SoilNitrogen: same as New Zealand.Iversen_12.Factors.SowingDate.SD1.Soil.SoilNitrogen
              Organic: same as New Zealand.Iversen_12.Factors.SowingDate.SD1.Soil.Organic
              Sample Initial nitrogen: same as New Zealand.Iversen_12.Factors.SowingDate.SD1.Soil.Initial nitrogen
              CERESSoilTemperature Temperature
              Sample InitialConditions: SWUnits=Volumetric; OCUnits=Total; PHUnits=Water
                Thickness=[200, 100, 100, 100, 100, 100, 100, 100, 100, 100, 100, 100, 100, 100, 100, 100, 100, 100, 100, 100, 100, 100]
                SW=[0.188, 0.197, 0.154, 0.113, 0.09, 0.082, 0.079, 0.075, 0.083, 0.101, 0.099, 0.088, 0.083, 0.085, 0.09, 0.093, 0.094, 0.098, 0.1, 0.103, 0.109, 0.113]
              InitialWater Initial water: PercentMethod=0; FractionFull=1
      Simulation AshleyDene
        Clock: Start=2010-10-03; End=2012-06-13
        Summary summaryfile
        Weather: FileName=C:\Data\Master\01Data\ClimateAndObserved\AshleyDene.met
        SoilArbitrator Soil Arbitrator
        Zone paddock: Area=1; Slope=0; AspectAngle=0; Altitude=50
          Folder Management
            Manager DiagnosticsVariables: same as New Zealand.Iversen_12.Simulation3.paddock.Management.DiagnosticsVariables
            Manager LucerneSowingRule
              RowSpacing = 150
              SowingDepth = 20
              SowingRate = 100
              CultivarName = Kaituna
              SowingDate = 10/24/2000 00:00:00
              script: same as in New Zealand.Iversen_8.Iversen_8LL.paddock.LucerneSowingRule
            Manager Mower: same as New Zealand.Iversen_12.Simulation3.paddock.Management.Mower
          MicroClimate: a_interception=0; b_interception=1; c_interception=0; d_interception=0; soil_albedo=0.23; SoilHeatFluxFraction=0.4; MinimumHeightDiffForNewLayer=0; NightInterceptionFraction=0.5; ReferenceHeight=2
          Irrigation
          Fertiliser
          SurfaceOrganicMatter surface organic matter: InitialResidueName=wheat; InitialResidueType=wheat; InitialResidueMass=0; InitialStandingFraction=0; InitialCPR=0; InitialCNR=80
          Report: same as New Zealand.Iversen_12.Simulation3.paddock.Report
          Plant Lucerne
          Operations Cutting
          Soil: SoilType=Udic Haplustept (US), Pallic orthic brown soil (NZ); Site=Ashley Dene: Lincoln University Research Farm; NearestTown=Lincoln; Country=New Zealand; Latitude=999999; Longitude=999999
            Comments=Soil water characterised from NNM (2 years). Stone content and BD  from Di and Cameron 2002. Soil saturation from Cichota 2013.
            Chemical
              Thickness  NO3N  NH4N
              200        31    8
              100        1.5   0.05
              100        1     0.03
              100        1     0.01
              100        1     0.01
              100        0.7   0.01
              100        0.5   0.01
              100        0.5   0.01
              100        0.5   0.01
              100        0.5   0.01
              100        0.5   0.01
              100        0.5   0.01
              100        0.5   0.01
              100        0.5   0.01
              100        0.5   0.01
              100        0.5   0.01
              100        0.5   0.01
              100        0.05  0.01
              100        0.05  0.01
              100        0.05  0.01
              100        0.05  0.01
              100        0     0
            Physical
              Thickness  BD    AirDry  LL15   DUL    SAT
              200        1.15  0.063   0.063  0.27   0.27
              100        1.15  0.08    0.08   0.194  0.194
              100        1.31  0.074   0.074  0.158  0.158
              100        1.31  0.076   0.076  0.135  0.135
              100        1.95  0.069   0.069  0.118  0.118
              100        1.95  0.07    0.07   0.114  0.114
              100        1.95  0.07    0.07   0.111  0.111
              100        1.95  0.07    0.07   0.115  0.115
              100        1.95  0.069   0.069  0.115  0.115
              100        1.95  0.07    0.07   0.11   0.11
              100        1.95  0.073   0.073  0.106  0.106
              100        1.95  0.079   0.079  0.116  0.116
              100        1.95  0.084   0.084  0.114  0.114
              100        1.95  0.086   0.086  0.13   0.13
              100        1.95  0.092   0.092  0.138  0.138
              100        1.95  0.096   0.096  0.134  0.134
              100        1.95  0.094   0.094  0.126  0.126
              100        1.95  0.095   0.095  0.128  0.128
              100        1.95  0.095   0.095  0.122  0.122
              100        1.95  0.095   0.095  0.116  0.116
              100        1.95  0.098   0.098  0.128  0.128
              100        1.95  0.1     0.1    0.147  0.147
              SoilCrop LucerneSoil
                LL=[0.075, 0.0829, 0.0778, 0.0766, 0.0723, 0.0726, 0.0718, 0.0733, 0.0722, 0.0728, 0.0759, 0.0858, 0.0868, 0.091, 0.1, 0.1023, 0.0983, 0.0978, 0.0972, 0.0999, 0.1018, 0.1069]
                KL=[0.06, 0.06, 0.049, 0.048, 0.055, 0.05, 0.048, 0.059, 0.076, 0.051, 0.094, 0.069, 0.033, 0.03, 0.043, 0.043, 0.056, 0.061, 0.03, 0.03, 0.03, 0.03]
                XF=[1, 1, 1, 1, 1, 1, 1, 1, 1, 1, 1, 1, 1, 1, 1, 1, 1, 1, 1, 1, 1, 1]
            WaterBalance SoilWater: same as New Zealand.Iversen_12.Factors.SowingDate.SD1.Soil.SoilWater
            SoilNitrogen: same as New Zealand.Iversen_12.Factors.SowingDate.SD1.Soil.SoilNitrogen
            Organic: same as New Zealand.Iversen_12.Factors.SowingDate.SD1.Soil.Organic
            Sample InitialConditions: same as New Zealand.AshleyDene.Factors.SowingDate.SD1.Soil.InitialConditions
            CERESSoilTemperature Temperature
            InitialWater Initial water: PercentMethod=0; FractionFull=1
    Experiment Iversen_121 (disabled)
      Factors
        Permutation
          Factor Defoliation
            CompositeFactor SS: Specifications=[Cutting]
              Operations Cutting
                2015-01-30  [Mower].Script.Cut();
                2015-03-01  [Mower].Script.Cut();
                2015-03-28  [Mower].Script.Cut();
                2015-04-25  [Mower].Script.Cut();
                2015-05-22  [Mower].Script.Cut();
                2015-09-03  [Mower].Script.Cut();
                2015-10-06  [Mower].Script.Cut();
                2015-11-11  [Mower].Script.Cut();
                2015-12-01  [Mower].Script.Cut();
                2015-12-29  [Mower].Script.Cut();
                2016-01-27  [Mower].Script.Cut();
                2016-02-25  [Mower].Script.Cut();
                2016-03-26  [Mower].Script.Cut();
                2016-04-22  [Mower].Script.Cut();
                2016-05-18  [Mower].Script.Cut();
                2016-08-10  [Mower].Script.Cut();
                2016-09-11  [Mower].Script.Cut();
                2016-10-09  [Mower].Script.Cut();
                2016-11-09  [Mower].Script.Cut();
                2016-12-17  [Mower].Script.Cut();
                2017-01-12  [Mower].Script.Cut();
                2017-01-26  [Mower].Script.Cut();
                2017-02-27  [Mower].Script.Cut();
                2017-03-24  [Mower].Script.Cut();
                2017-05-10  [Mower].Script.Cut();
                2017-07-16  [Mower].Script.Cut();
                2017-08-21  [Mower].Script.Cut();
                2017-09-20  [Mower].Script.Cut();
                2017-10-19  [Mower].Script.Cut();
                2017-11-27  [Mower].Script.Cut();
                2017-12-23  [Mower].Script.Cut();
                2018-01-18  [Mower].Script.Cut();
                2018-02-19  [Mower].Script.Cut();
                2018-03-20  [Mower].Script.Cut();
                2018-04-20  [Mower].Script.Cut();
                2018-07-11  [Mower].Script.Cut();
                2018-08-15  [Mower].Script.Cut();
                2018-09-13  [Mower].Script.Cut();
                2018-10-16  [Mower].Script.Cut();
                2018-11-15  [Mower].Script.Cut();
                2018-12-14  [Mower].Script.Cut();
                2019-01-11  [Mower].Script.Cut();
                2019-02-11  [Mower].Script.Cut();
                2019-03-11  [Mower].Script.Cut();
                2019-04-10  [Mower].Script.Cut();
            CompositeFactor LL: Specifications=[Cutting]
              Operations Cutting
                2015-01-29  [Mower].Script.Cut();
                2015-03-11  [Mower].Script.Cut();
                2015-04-26  [Mower].Script.Cut();
                2015-06-11  [Mower].Script.Cut();
                2015-09-04  [Mower].Script.Cut();
                2015-10-21  [Mower].Script.Cut();
                2015-12-08  [Mower].Script.Cut();
                2016-01-13  [Mower].Script.Cut();
                2016-02-25  [Mower].Script.Cut();
                2016-04-07  [Mower].Script.Cut();
                2016-05-20  [Mower].Script.Cut();
                2016-08-26  [Mower].Script.Cut();
                2016-10-08  [Mower].Script.Cut();
                2016-11-24  [Mower].Script.Cut();
                2017-01-25  [Mower].Script.Cut();
                2017-03-12  [Mower].Script.Cut();
                2017-05-09  [Mower].Script.Cut();
                2017-07-16  [Mower].Script.Cut();
                2017-09-03  [Mower].Script.Cut();
                2017-10-18  [Mower].Script.Cut();
                2017-12-02  [Mower].Script.Cut();
                2018-01-18  [Mower].Script.Cut();
                2018-03-09  [Mower].Script.Cut();
                2018-04-21  [Mower].Script.Cut();
                2018-07-11  [Mower].Script.Cut();
                2018-08-23  [Mower].Script.Cut();
                2018-10-16  [Mower].Script.Cut();
                2018-11-30  [Mower].Script.Cut();
                2019-01-11  [Mower].Script.Cut();
                2019-02-24  [Mower].Script.Cut();
                2019-04-10  [Mower].Script.Cut();
            CompositeFactor HH: Specifications=[Cutting]
              Operations Cutting
                2015-01-30  [Mower].Script.Cut();
                2015-04-25  [Mower].Script.Cut();
                2015-09-04  [Mower].Script.Cut();
                2015-12-03  [Mower].Script.Cut();
                2016-02-26  [Mower].Script.Cut();
                2016-05-16  [Mower].Script.Cut();
                2016-07-12  [Mower].Script.Cut();
                2016-10-15  [Mower].Script.Cut();
                2017-01-26  [Mower].Script.Cut();
                2017-04-21  [Mower].Script.Cut();
                2017-07-17  [Mower].Script.Cut();
                2017-10-19  [Mower].Script.Cut();
                2018-01-16  [Mower].Script.Cut();
                2018-04-21  [Mower].Script.Cut();
                2018-07-11  [Mower].Script.Cut();
                2018-10-16  [Mower].Script.Cut();
                2019-01-11  [Mower].Script.Cut();
                2019-05-09  [Mower].Script.Cut();
          Factor FD
            CompositeFactor FD2: Specifications=[LucerneSowingRule].Script.CultivarName = FD2
            CompositeFactor FD5: Specifications=[LucerneSowingRule].Script.CultivarName = FD5
            CompositeFactor FD10: Specifications=[LucerneSowingRule].Script.CultivarName = FD10
      Simulation Simulation5
        Clock: Start=2014-10-08; End=2019-04-09
        Summary summaryfile
        Weather: FileName=lincoln.met
        SoilArbitrator Soil Arbitrator
        Zone paddock: Area=1; Slope=0; AspectAngle=0; Altitude=50
          MicroClimate: a_interception=0; b_interception=1; c_interception=0; d_interception=0; soil_albedo=0.23; SoilHeatFluxFraction=0.4; MinimumHeightDiffForNewLayer=0; NightInterceptionFraction=0.5; ReferenceHeight=2
          Irrigation
          Fertiliser
          Manager DiagnosticsVariables: same as New Zealand.Iversen_8.Iversen_8LL.paddock.DiagnosticsVariables
          SurfaceOrganicMatter surface organic matter: InitialResidueName=wheat; InitialResidueType=wheat; InitialResidueMass=0; InitialStandingFraction=0; InitialCPR=0; InitialCNR=80
          Report: EventNames=[Clock].DoReport
            VariableNames:
              [Clock].Today
              [DiagnosticsVariables].Script.AccumPlantN
              [DiagnosticsVariables].Script.AccumMineralisation
              [DiagnosticsVariables].Script.AccumDenit
              [DiagnosticsVariables].Script.AccumFert
              [DiagnosticsVariables].Script.AccumLeach
              [DiagnosticsVariables].Script.AccumDetach
              [DiagnosticsVariables].Script.DeltaSoilOMN
              [DiagnosticsVariables].Script.DeltaSurfaceOMN
              [DiagnosticsVariables].Script.DeltaSoilMineralN
              [Lucerne].Root.NSupply
              [Soil].SoilWater.Eo
              [Soil].SoilWater.Es
              [DiagnosticsVariables].Script.SWC
              [DiagnosticsVariables].Script.DUL
              [Soil].SoilWater.Drainage
              [Soil].SoilWater.Runoff
              [DiagnosticsVariables].Script.OutFlowLat
              [Soil].SoilWater.pond
              [DiagnosticsVariables].Script.AccumEO
              [DiagnosticsVariables].Script.AccumEP
              [DiagnosticsVariables].Script.AccumES
              [DiagnosticsVariables].Script.AccumDrainage
              [DiagnosticsVariables].Script.AccumRunoff
              [DiagnosticsVariables].Script.AccumRainfall
              [DiagnosticsVariables].Script.AccumIrrigation
              [DiagnosticsVariables].Script.AccumOutflowLat
              [DiagnosticsVariables].Script.SoilWaterDeficit
              [Lucerne].Grain.Live.Wt
              [Lucerne].Shell.Live.Wt
              [Lucerne].Stem.Live.Wt
              [Lucerne].Stem.Live.Wt
              [Lucerne].Grain.Live.N
              [Lucerne].Shell.Live.N
              [Lucerne].Leaf.Live.Wt
              [Lucerne].Root.Live.Wt
              [Lucerne].Leaf.Live.N
              [Lucerne].Root.Live.N
              [Lucerne].Leaf.Live.NConc
              [Lucerne].Root.Live.NConc
              [Lucerne].Root.WaterSupply
              [Lucerne].Root.WaterUptake
              [Lucerne].Leaf.Transpiration
              [Lucerne].Leaf.WaterDemand
              [Lucerne].Root.Depth
              [Lucerne].Leaf.CoverTotal
              [Lucerne].Leaf.CoverDead
              [Lucerne].Leaf.LAI
              [Lucerne].Leaf.Height
              [Soil].SoilWater.SWmm
              [Soil].SoilNitrogen.NO3.kgha
              [DiagnosticsVariables].Script.SoilNitrogenContent
              [Lucerne].Arbitrator.N.TotalPlantDemand
              [DiagnosticsVariables].Script.FomN
              [DiagnosticsVariables].Script.HumN
              [DiagnosticsVariables].Script.BiomN
              [DiagnosticsVariables].Script.DltNMinRes
              [DiagnosticsVariables].Script.DltNMinTot
              [Lucerne].Leaf.Fw
              [Lucerne].Leaf.Fn
              [Lucerne].Phenology.CurrentPhase.Name
              [Lucerne].Phenology.CurrentStageName
              [Lucerne].Phenology.Stage
              [Lucerne].Pod.Wt
              [Lucerne].Pod.N
              [Lucerne].AboveGround.Wt *10 as shootbiomass
              [Lucerne].Shell.PodNumber
              [Lucerne].Leaf.LAIFunction
              [Mower].Script.BudsDays as BudsDays
              [Mower].Script.FloDays as FloDays
              [Mower].Script.HarvestFlag
              [Mower].Script.Rotation as Rotation
              [Mower].Script.Year as GrowthSeason
          Manager LucerneSowingRule
            RowSpacing = 150
            SowingDepth = 20
            SowingRate = 300
            CultivarName = FD2
            SowingDate = 10/08/2014 00:00:00
            script: same as in New Zealand.Iversen_8.Iversen_8LL.paddock.LucerneSowingRule
          Operations IrrigationEvents
            2015-01-13  [Irrigation].Apply(37);
            2015-01-14  [Irrigation].Apply(37);
            2015-02-05  [Irrigation].Apply(40);
            2015-02-10  [Irrigation].Apply(40);
            2015-03-25  [Irrigation].Apply(18);
            2015-11-02  [Irrigation].Apply(30);
            2015-11-03  [Irrigation].Apply(30);
            2015-11-29  [Irrigation].Apply(25);
            2015-11-30  [Irrigation].Apply(25);
            2015-12-26  [Irrigation].Apply(25);
            2015-12-27  [Irrigation].Apply(25);
            2016-01-12  [Irrigation].Apply(25);
            2016-01-13  [Irrigation].Apply(25);
            2016-02-11  [Irrigation].Apply(30);
            2016-02-12  [Irrigation].Apply(30);
            2016-03-23  [Irrigation].Apply(45);
            2016-04-11  [Irrigation].Apply(45);
            2016-04-26  [Irrigation].Apply(45);
            2016-05-15  [Irrigation].Apply(45);
            2016-12-07  [Irrigation].Apply(30);
            2016-12-08  [Irrigation].Apply(30);
            2017-01-09  [Irrigation].Apply(30);
            2017-01-10  [Irrigation].Apply(30);
            2017-02-22  [Irrigation].Apply(30);
            2017-02-23  [Irrigation].Apply(30);
            2017-03-05  [Irrigation].Apply(30);
            2017-03-06  [Irrigation].Apply(30);
            2017-11-13  [Irrigation].Apply(40);
            2017-11-21  [Irrigation].Apply(40);
            2017-11-30  [Irrigation].Apply(30);
            2017-12-14  [Irrigation].Apply(30);
            2018-01-03  [Irrigation].Apply(20);
            2018-02-14  [Irrigation].Apply(30);
            2018-02-20  [Irrigation].Apply(30);
            2018-10-10  [Irrigation].Apply(30);
            2019-01-07  [Irrigation].Apply(30);
            2019-01-28  [Irrigation].Apply(45);
            2019-01-29  [Irrigation].Apply(45);
            2019-02-07  [Irrigation].Apply(30);
            2019-02-18  [Irrigation].Apply(45);
            2019-02-19  [Irrigation].Apply(45);
            2019-02-21  [Irrigation].Apply(30);
            2019-03-07  [Irrigation].Apply(30);
            2019-03-08  [Irrigation].Apply(30);
          Plant Lucerne
          Operations Cutting
          Manager PopulationSet
            SetDate = 01/01/2018 00:00:00
            Pop = 100
            script: same as in New Zealand.Iversen_8.Iversen_8LL.paddock.PopulationSet
          Manager Mower: same as New Zealand.Iversen_8.Iversen_8LL.paddock.Mower
          Soil: same as New Zealand.Iversen_8.Iversen_8LL.paddock.Soil
  Folder SimulationTesting (disabled)
    Experiment Iversen_testing
      DisabledSimNames=[Iversen_12SowingDateSD10, Iversen_12SowingDateSD9, Iversen_12SowingDateSD8, Iversen_12SowingDateSD7, Iversen_12SowingDateSD6, Iversen_12SowingDateSD5, Iversen_12SowingDateSD4, Iversen_12SowingDateSD3, Iversen_12SowingDateSD2]
      Factors
        Factor SowingDate
          CompositeFactor SD1
            Specifications:
              [LucerneSowingRule].Script.SowingDate = 1990-10-04
              [Clock].StartDate = 1990-10-04
              [Clock].EndDate = 1992-06-10
          CompositeFactor SD2
            Specifications:
              [LucerneSowingRule].Script.SowingDate = 1991-10-04
              [Clock].StartDate = 1991-10-04
              [Clock].EndDate = 1993-06-10
          CompositeFactor SD3
            Specifications:
              [LucerneSowingRule].Script.SowingDate = 1992-10-04
              [Clock].StartDate = 1992-10-04
              [Clock].EndDate = 1994-06-10
          CompositeFactor SD4
            Specifications:
              [LucerneSowingRule].Script.SowingDate = 1993-10-04
              [Clock].StartDate = 1993-10-04
              [Clock].EndDate = 1995-06-10
          CompositeFactor SD5
            Specifications:
              [LucerneSowingRule].Script.SowingDate = 1994-10-04
              [Clock].StartDate = 1994-10-04
              [Clock].EndDate = 1996-06-10
          CompositeFactor SD6
            Specifications:
              [LucerneSowingRule].Script.SowingDate = 1995-10-04
              [Clock].StartDate = 1995-10-04
              [Clock].EndDate = 1997-06-10
          CompositeFactor SD7
            Specifications:
              [LucerneSowingRule].Script.SowingDate = 1996-10-04
              [Clock].StartDate = 1996-10-04
              [Clock].EndDate = 1998-06-10
          CompositeFactor SD8
            Specifications:
              [LucerneSowingRule].Script.SowingDate = 1997-10-04
              [Clock].StartDate = 1997-10-04
              [Clock].EndDate = 1999-06-10
          CompositeFactor SD9
            Specifications:
              [LucerneSowingRule].Script.SowingDate = 1998-10-04
              [Clock].StartDate = 1998-10-04
              [Clock].EndDate = 2000-06-10
          CompositeFactor SD10
            Specifications:
              [LucerneSowingRule].Script.SowingDate = 1999-10-04
              [Clock].StartDate = 1999-10-04
              [Clock].EndDate = 2001-06-10
          CompositeFactor SD11
            Specifications:
              [LucerneSowingRule].Script.SowingDate = 2000-10-04
              [Clock].StartDate = 2000-10-04
              [Clock].EndDate = 2002-06-10
          CompositeFactor SD12
            Specifications:
              [LucerneSowingRule].Script.SowingDate = 2001-10-04
              [Clock].StartDate = 2001-10-04
              [Clock].EndDate = 2003-06-10
          CompositeFactor SD13
            Specifications:
              [LucerneSowingRule].Script.SowingDate = 2002-10-04
              [Clock].StartDate = 2002-10-04
              [Clock].EndDate = 2004-06-10
          CompositeFactor SD14
            Specifications:
              [LucerneSowingRule].Script.SowingDate = 2003-10-04
              [Clock].StartDate = 2003-10-04
              [Clock].EndDate = 2005-06-10
          CompositeFactor SD15
            Specifications:
              [LucerneSowingRule].Script.SowingDate = 2004-10-04
              [Clock].StartDate = 2004-10-04
              [Clock].EndDate = 2006-06-10
          CompositeFactor SD16
            Specifications:
              [LucerneSowingRule].Script.SowingDate = 2005-10-04
              [Clock].StartDate = 2005-10-04
              [Clock].EndDate = 2007-06-10
          CompositeFactor SD17
            Specifications:
              [LucerneSowingRule].Script.SowingDate = 2006-10-04
              [Clock].StartDate = 2006-10-04
              [Clock].EndDate = 2008-06-10
          CompositeFactor SD18
            Specifications:
              [LucerneSowingRule].Script.SowingDate = 2007-10-04
              [Clock].StartDate = 2007-10-04
              [Clock].EndDate = 2009-06-10
          CompositeFactor SD19
            Specifications:
              [LucerneSowingRule].Script.SowingDate = 2008-10-04
              [Clock].StartDate = 2008-10-04
              [Clock].EndDate = 2010-06-10
          CompositeFactor SD20
            Specifications:
              [LucerneSowingRule].Script.SowingDate = 2009-10-04
              [Clock].StartDate = 2009-10-04
              [Clock].EndDate = 2011-06-10
          CompositeFactor SD21
            Specifications:
              [LucerneSowingRule].Script.SowingDate = 2010-10-04
              [Clock].StartDate = 2010-10-04
              [Clock].EndDate = 2012-06-10
          CompositeFactor SD22
            Specifications:
              [LucerneSowingRule].Script.SowingDate = 2011-10-04
              [Clock].StartDate = 2011-10-04
              [Clock].EndDate = 2013-06-10
          CompositeFactor SD23
            Specifications:
              [LucerneSowingRule].Script.SowingDate = 2012-10-04
              [Clock].StartDate = 2012-10-04
              [Clock].EndDate = 2014-06-10
          CompositeFactor SD24
            Specifications:
              [LucerneSowingRule].Script.SowingDate = 2013-10-04
              [Clock].StartDate = 2013-10-04
              [Clock].EndDate = 2015-06-10
          CompositeFactor SD25
            Specifications:
              [LucerneSowingRule].Script.SowingDate = 2014-10-04
              [Clock].StartDate = 2014-10-04
              [Clock].EndDate = 2016-06-10
          CompositeFactor SD26
            Specifications:
              [LucerneSowingRule].Script.SowingDate = 2015-10-04
              [Clock].StartDate = 2015-10-04
              [Clock].EndDate = 2017-06-10
          CompositeFactor SD27
            Specifications:
              [LucerneSowingRule].Script.SowingDate = 2016-10-04
              [Clock].StartDate = 2016-10-04
              [Clock].EndDate = 2018-06-10
          CompositeFactor SD28
            Specifications:
              [LucerneSowingRule].Script.SowingDate = 2017-10-04
              [Clock].StartDate = 2017-10-04
              [Clock].EndDate = 2019-06-10
          CompositeFactor SD29
            Specifications:
              [LucerneSowingRule].Script.SowingDate = 2018-10-04
              [Clock].StartDate = 2018-10-04
              [Clock].EndDate = 2020-04-08
          CompositeFactor SD30
            Specifications:
              [LucerneSowingRule].Script.SowingDate = 2019-10-04
              [Clock].StartDate = 2019-10-04
              [Clock].EndDate = 2020-04-08
      Simulation Simulationtesting
        Clock: Start=2010-09-27; End=2020-04-08
        Summary summaryfile
        Weather: FileName=lincoln.met
        SoilArbitrator Soil Arbitrator
        Zone paddock: Area=1; Slope=0; AspectAngle=0; Altitude=50
          MicroClimate: a_interception=0; b_interception=1; c_interception=0; d_interception=0; soil_albedo=0.23; SoilHeatFluxFraction=0.4; MinimumHeightDiffForNewLayer=0; NightInterceptionFraction=0.5; ReferenceHeight=2
          Irrigation
          Fertiliser
          Manager DiagnosticsVariables
            InitialDay = False
            AccumPlantN = 0
            AccumMineralisation = 0
            AccumDenit = 0
            AccumFert = 0
            AccumLeach = 0
            AccumDetach = 0
            DeltaSoilOMN = 0
            DeltaSurfaceOMN = 0
            DeltaSoilMineralN = 0
            SoilNitrogenContent = 0
            AccumEO = 0
            AccumEP = 0
            AccumES = 0
            AccumDrainage = 0
            AccumRunoff = 0
            AccumOutflowLat = 0
            AccumIrrigation = 0
            AccumRainfall = 0
            SoilWaterDeficit = 0
            InitialSoilOMN = 0
            InitialSurfaceOMN = 0
            InitialMineralN = 0
            SWC = 0
            DUL = 0
            OutFlowLat = 0
            FomN = 0
            BiomN = 0
            HumN = 0
            OrganicN = 0
            NO3N = 0
            NH4N = 0
            UreaN = 0
            MineralN = 0
            DltNMinRes = 0
            DltNMinTot = 0
            script: same as in New Zealand.Iversen_8.Iversen_8LL.paddock.DiagnosticsVariables
          SurfaceOrganicMatter surface organic matter: InitialResidueName=wheat; InitialResidueType=wheat; InitialResidueMass=0; InitialStandingFraction=0; InitialCPR=0; InitialCNR=80
          Report: same as New Zealand.Iversen_121.Simulation5.paddock.Report
          Manager LucerneSowingRule
            RowSpacing = 150
            SowingDepth = 20
            SowingRate = 300
            CultivarName = Kaituna
            SowingDate = 10/24/2000 00:00:00
            script: same as in New Zealand.Iversen_8.Iversen_8LL.paddock.LucerneSowingRule
          Operations IrrigationEvents: same as New Zealand.Iversen_121.Simulation5.paddock.IrrigationEvents
          Plant Lucerne
          Manager Mower
            DefoliationHeight = 450
            Year = 0
            Rotation = 0
            YearRotation = 0
            HarvestFlag = False
            YearTransation = 1-Jul
            BudsDays = 0
            FloDays = 0
```csharp
using APSIM.Shared.Utilities;
using System.Xml.Serialization;
using Models.PMF.Interfaces;
using Models.PMF;
using Models.Core;
using System.Collections.Generic;
using System;

namespace Models
{
    [Serializable] 
    [System.Xml.Serialization.XmlInclude(typeof(Model))]
    public class Script : Model
    {
        [Link] Plant Lucerne;
        [Link] Clock clock;
        [Link] Zone zone;
        [XmlIgnore] private RemovalFractions Remove { get; set; }
[Description("Defoliation Height (mm)")]
public double DefoliationHeight { get; set; }  
public double Year { get;set;}
public double Rotation { get;set;}
public double YearRotation { get;set;}
bool YearPassed { get;set;}
public bool HarvestFlag { get;set;}
[Description("Change to the next growth year")]
public string YearTransation { get;set;}
public double BudsDays { get;set;}
public double FloDays { get;set;}
[EventSubscribe("StartOfSimulation")]
        private void OnSimulationCommencing(object sender, EventArgs e)
        {   Year = 1;
            Rotation =1;
            YearRotation= Year + Rotation;
            HarvestFlag=false;
            YearPassed= false;
            Remove = new RemovalFractions();
        }
        [EventSubscribe("EndOfDay")]
        private void OnEndOfDay(object sender, EventArgs e)
        {
        if (DateUtilities.WithinDates(YearTransation, clock.Today, YearTransation))
         YearPassed= true;
         HarvestFlag= false;
         BudsDays= (double)zone.Get("Lucerne.Phenology.BudsVisableDaysAfterCutting.Value()");
         FloDays= (double)zone.Get("Lucerne.Phenology.FloweringDaysAfterCutting.Value()");
        }
        [EventSubscribe("DoManagement")]
        private void OnDoManagement(object sender, EventArgs e)
        {
            if (Lucerne.Leaf.Height>=DefoliationHeight || DateUtilities.DatesEqual(YearTransation, clock.Today))
           {
            Remove.SetPhenologyStage = 4;
            Lucerne.RemoveBiomass("Cut", Remove);
            Rotation+=1;
            HarvestFlag= true;
            if (YearPassed)
            {Year+=1;
            Rotation=1;
            YearPassed=false;}
       }
    }
  }
}
```
          Operations Cutting
          Soil: same as New Zealand.Iversen_8.Iversen_8LL.paddock.Soil
    Experiment Alex_testing
      DisabledSimNames=[Iversen_12SowingDateSD10, Iversen_12SowingDateSD9, Iversen_12SowingDateSD8, Iversen_12SowingDateSD7, Iversen_12SowingDateSD6, Iversen_12SowingDateSD5, Iversen_12SowingDateSD4, Iversen_12SowingDateSD3, Iversen_12SowingDateSD2]
      Factors
        Factor SowingDate
          CompositeFactor SD0
            Specifications:
              [LucerneSowingRule].Script.SowingDate = 1989-10-04
              [Clock].StartDate = 1989-10-04
              [Clock].EndDate = 1991-06-10
          CompositeFactor SD1
            Specifications:
              [LucerneSowingRule].Script.SowingDate = 1990-10-04
              [Clock].StartDate = 1990-10-04
              [Clock].EndDate = 1992-06-10
          CompositeFactor SD2
            Specifications:
              [LucerneSowingRule].Script.SowingDate = 1991-10-04
              [Clock].StartDate = 1991-10-04
              [Clock].EndDate = 1993-06-10
          CompositeFactor SD3
            Specifications:
              [LucerneSowingRule].Script.SowingDate = 1992-10-04
              [Clock].StartDate = 1992-10-04
              [Clock].EndDate = 1994-06-10
          CompositeFactor SD4
            Specifications:
              [LucerneSowingRule].Script.SowingDate = 1993-10-04
              [Clock].StartDate = 1993-10-04
              [Clock].EndDate = 1995-06-10
          CompositeFactor SD5
            Specifications:
              [LucerneSowingRule].Script.SowingDate = 1994-10-04
              [Clock].StartDate = 1994-10-04
              [Clock].EndDate = 1996-06-10
          CompositeFactor SD6
            Specifications:
              [LucerneSowingRule].Script.SowingDate = 1995-10-04
              [Clock].StartDate = 1995-10-04
              [Clock].EndDate = 1997-06-10
          CompositeFactor SD7
            Specifications:
              [LucerneSowingRule].Script.SowingDate = 1996-10-04
              [Clock].StartDate = 1996-10-04
              [Clock].EndDate = 1998-06-10
          CompositeFactor SD8
            Specifications:
              [LucerneSowingRule].Script.SowingDate = 1997-10-04
              [Clock].StartDate = 1997-10-04
              [Clock].EndDate = 1999-06-10
          CompositeFactor SD9
            Specifications:
              [LucerneSowingRule].Script.SowingDate = 1998-10-04
              [Clock].StartDate = 1998-10-04
              [Clock].EndDate = 2000-06-10
          CompositeFactor SD10
            Specifications:
              [LucerneSowingRule].Script.SowingDate = 1999-10-04
              [Clock].StartDate = 1999-10-04
              [Clock].EndDate = 2001-06-10
          CompositeFactor SD11
            Specifications:
              [LucerneSowingRule].Script.SowingDate = 2000-10-04
              [Clock].StartDate = 2000-10-04
              [Clock].EndDate = 2002-06-10
          CompositeFactor SD12
            Specifications:
              [LucerneSowingRule].Script.SowingDate = 2001-10-04
              [Clock].StartDate = 2001-10-04
              [Clock].EndDate = 2003-06-10
          CompositeFactor SD13
            Specifications:
              [LucerneSowingRule].Script.SowingDate = 2002-10-04
              [Clock].StartDate = 2002-10-04
              [Clock].EndDate = 2004-06-10
          CompositeFactor SD14
            Specifications:
              [LucerneSowingRule].Script.SowingDate = 2003-10-04
              [Clock].StartDate = 2003-10-04
              [Clock].EndDate = 2005-06-10
          CompositeFactor SD15
            Specifications:
              [LucerneSowingRule].Script.SowingDate = 2004-10-04
              [Clock].StartDate = 2004-10-04
              [Clock].EndDate = 2006-06-10
          CompositeFactor SD16
            Specifications:
              [LucerneSowingRule].Script.SowingDate = 2005-10-04
              [Clock].StartDate = 2005-10-04
              [Clock].EndDate = 2007-06-10
          CompositeFactor SD17
            Specifications:
              [LucerneSowingRule].Script.SowingDate = 2006-10-04
              [Clock].StartDate = 2006-10-04
              [Clock].EndDate = 2008-06-10
          CompositeFactor SD18
            Specifications:
              [LucerneSowingRule].Script.SowingDate = 2007-10-04
              [Clock].StartDate = 2007-10-04
              [Clock].EndDate = 2009-06-10
          CompositeFactor SD19
            Specifications:
              [LucerneSowingRule].Script.SowingDate = 2008-10-04
              [Clock].StartDate = 2008-10-04
              [Clock].EndDate = 2010-06-10
          CompositeFactor SD20
            Specifications:
              [LucerneSowingRule].Script.SowingDate = 2009-10-04
              [Clock].StartDate = 2009-10-04
              [Clock].EndDate = 2011-06-10
          CompositeFactor SD21
            Specifications:
              [LucerneSowingRule].Script.SowingDate = 2010-10-04
              [Clock].StartDate = 2010-10-04
              [Clock].EndDate = 2012-06-10
          CompositeFactor SD22
            Specifications:
              [LucerneSowingRule].Script.SowingDate = 2011-10-04
              [Clock].StartDate = 2011-10-04
              [Clock].EndDate = 2013-06-10
          CompositeFactor SD23
            Specifications:
              [LucerneSowingRule].Script.SowingDate = 2012-10-04
              [Clock].StartDate = 2012-10-04
              [Clock].EndDate = 2014-06-10
          CompositeFactor SD24
            Specifications:
              [LucerneSowingRule].Script.SowingDate = 2013-10-04
              [Clock].StartDate = 2013-10-04
              [Clock].EndDate = 2015-06-10
          CompositeFactor SD25
            Specifications:
              [LucerneSowingRule].Script.SowingDate = 2014-10-04
              [Clock].StartDate = 2014-10-04
              [Clock].EndDate = 2016-06-10
          CompositeFactor SD26
            Specifications:
              [LucerneSowingRule].Script.SowingDate = 2015-10-04
              [Clock].StartDate = 2015-10-04
              [Clock].EndDate = 2017-06-10
          CompositeFactor SD27
            Specifications:
              [LucerneSowingRule].Script.SowingDate = 2016-10-04
              [Clock].StartDate = 2016-10-04
              [Clock].EndDate = 2018-06-10
          CompositeFactor SD28
            Specifications:
              [LucerneSowingRule].Script.SowingDate = 2017-10-04
              [Clock].StartDate = 2017-10-04
              [Clock].EndDate = 2019-06-10
          CompositeFactor SD29
            Specifications:
              [LucerneSowingRule].Script.SowingDate = 2018-10-04
              [Clock].StartDate = 2018-10-04
              [Clock].EndDate = 2020-06-10
          CompositeFactor SD30
            Specifications:
              [LucerneSowingRule].Script.SowingDate = 2019-10-04
              [Clock].StartDate = 2019-10-04
              [Clock].EndDate = 2020-06-10
      Simulation AlexSimulation
        Clock: Start=2010-09-27; End=2020-04-08
        Summary summaryfile
        Weather: FileName=Lauder.met
        SoilArbitrator Soil Arbitrator
        Zone paddock: Area=1; Slope=0; AspectAngle=0; Altitude=50
          MicroClimate: a_interception=0; b_interception=1; c_interception=0; d_interception=0; soil_albedo=0.23; SoilHeatFluxFraction=0.4; MinimumHeightDiffForNewLayer=0; NightInterceptionFraction=0.5; ReferenceHeight=2
          Irrigation
          Fertiliser
          Manager DiagnosticsVariables: same as SimulationTesting.Iversen_testing.Simulationtesting.paddock.DiagnosticsVariables
          SurfaceOrganicMatter surface organic matter: InitialResidueName=wheat; InitialResidueType=wheat; InitialResidueMass=0; InitialStandingFraction=0; InitialCPR=0; InitialCNR=80
          Report: same as New Zealand.Iversen_121.Simulation5.paddock.Report
          Manager LucerneSowingRule: same as SimulationTesting.Iversen_testing.Simulationtesting.paddock.LucerneSowingRule
          Operations IrrigationEvents: same as New Zealand.Iversen_121.Simulation5.paddock.IrrigationEvents
          Plant Lucerne
          Manager Mower
            DefoliationHeight = 300
            Year = 0
            Rotation = 0
            YearRotation = 0
            HarvestFlag = False
            YearTransation = 1-Jun
            BudsDays = 0
            FloDays = 0
            script: same as in SimulationTesting.Iversen_testing.Simulationtesting.paddock.Mower
          Operations Cutting
          Soil: same as New Zealand.Iversen_8.Iversen_8LL.paddock.Soil
    Experiment Napier_testing
      DisabledSimNames=[Iversen_12SowingDateSD10, Iversen_12SowingDateSD9, Iversen_12SowingDateSD8, Iversen_12SowingDateSD7, Iversen_12SowingDateSD6, Iversen_12SowingDateSD5, Iversen_12SowingDateSD4, Iversen_12SowingDateSD3, Iversen_12SowingDateSD2]
      Factors: same as SimulationTesting.Alex_testing.Factors
      Simulation NapierSimulation
        Clock: Start=2010-09-27; End=2012-07-12
        Summary summaryfile
        Weather: FileName=Napier.met
        SoilArbitrator Soil Arbitrator
        Zone paddock: Area=1; Slope=0; AspectAngle=0; Altitude=50
          MicroClimate: a_interception=0; b_interception=1; c_interception=0; d_interception=0; soil_albedo=0.23; SoilHeatFluxFraction=0.4; MinimumHeightDiffForNewLayer=0; NightInterceptionFraction=0.5; ReferenceHeight=2
          Irrigation
          Fertiliser
          Manager DiagnosticsVariables: same as SimulationTesting.Iversen_testing.Simulationtesting.paddock.DiagnosticsVariables
          SurfaceOrganicMatter surface organic matter: InitialResidueName=wheat; InitialResidueType=wheat; InitialResidueMass=0; InitialStandingFraction=0; InitialCPR=0; InitialCNR=80
          Report: EventNames=[Clock].DoReport
            VariableNames:
              [Clock].Today
              [DiagnosticsVariables].Script.AccumPlantN
              [DiagnosticsVariables].Script.AccumMineralisation
              [DiagnosticsVariables].Script.AccumDenit
              [DiagnosticsVariables].Script.AccumFert
              [DiagnosticsVariables].Script.AccumLeach
              [DiagnosticsVariables].Script.AccumDetach
              [DiagnosticsVariables].Script.DeltaSoilOMN
              [DiagnosticsVariables].Script.DeltaSurfaceOMN
              [DiagnosticsVariables].Script.DeltaSoilMineralN
              [Lucerne].Root.NSupply
              [Soil].SoilWater.Eo
              [Soil].SoilWater.Es
              [DiagnosticsVariables].Script.SWC
              [DiagnosticsVariables].Script.DUL
              [Soil].SoilWater.Drainage
              [Soil].SoilWater.Runoff
              [DiagnosticsVariables].Script.OutFlowLat
              [Soil].SoilWater.pond
              [DiagnosticsVariables].Script.AccumEO
              [DiagnosticsVariables].Script.AccumEP
              [DiagnosticsVariables].Script.AccumES
              [DiagnosticsVariables].Script.AccumDrainage
              [DiagnosticsVariables].Script.AccumRunoff
              [DiagnosticsVariables].Script.AccumRainfall
              [DiagnosticsVariables].Script.AccumIrrigation
              [DiagnosticsVariables].Script.AccumOutflowLat
              [DiagnosticsVariables].Script.SoilWaterDeficit
              [Lucerne].Grain.Live.Wt
              [Lucerne].Shell.Live.Wt
              [Lucerne].Stem.Live.Wt
              [Lucerne].Stem.Live.Wt
              [Lucerne].Grain.Live.N
              [Lucerne].Shell.Live.N
              [Lucerne].Leaf.Live.Wt
              [Lucerne].Root.Live.Wt
              [Lucerne].Leaf.Live.N
              [Mower].Script.BudsDays as BudsDays
              [Mower].Script.FloDays as FloDays
              [Mower].Script.HarvestFlag
              [Mower].Script.Rotation as Rotation
              [Mower].Script.Year as GrowthSeason
              [Lucerne].Root.Live.N
              [Lucerne].Leaf.Live.NConc
              [Lucerne].Root.Live.NConc
              [Lucerne].Root.WaterSupply
              [Lucerne].Root.WaterUptake
              [Lucerne].Leaf.Transpiration
              [Lucerne].Leaf.WaterDemand
              [Lucerne].Root.Depth
              [Lucerne].Leaf.CoverTotal
              [Lucerne].Leaf.CoverDead
              [Lucerne].Leaf.LAI
              [Lucerne].Leaf.Height
              [Soil].SoilWater.SWmm
              [Soil].SoilNitrogen.NO3.kgha
              [DiagnosticsVariables].Script.SoilNitrogenContent
              [Lucerne].Arbitrator.N.TotalPlantDemand
              [DiagnosticsVariables].Script.FomN
              [DiagnosticsVariables].Script.HumN
              [DiagnosticsVariables].Script.BiomN
              [DiagnosticsVariables].Script.DltNMinRes
              [DiagnosticsVariables].Script.DltNMinTot
              [Lucerne].Leaf.Fw
              [Lucerne].Leaf.Fn
              [Lucerne].Phenology.CurrentPhase.Name
              [Lucerne].Phenology.CurrentStageName
              [Lucerne].Phenology.Stage
              [Lucerne].Pod.Wt
              [Lucerne].Pod.N
              [Lucerne].AboveGround.Wt *10 as shootbiomass
              [Lucerne].Shell.PodNumber
              [Lucerne].Leaf.LAIFunction
              [Mower].Script.BudsDays as BudsDays
              [Mower].Script.FloDays as FloDays
              [Mower].Script.HarvestFlag
              [Mower].Script.Rotation as Rotation
              [Mower].Script.Year as GrowthSeason
          Manager LucerneSowingRule: same as SimulationTesting.Iversen_testing.Simulationtesting.paddock.LucerneSowingRule
          Operations IrrigationEvents: same as New Zealand.Iversen_121.Simulation5.paddock.IrrigationEvents
          Plant Lucerne
          Manager Mower: same as SimulationTesting.Iversen_testing.Simulationtesting.paddock.Mower
          Operations Cutting
          Soil: same as New Zealand.Iversen_8.Iversen_8LL.paddock.Soil
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