Simulations: Version=103
  DataStore Database
    ExcelInput ObsAllData: FileNames=[C:\Data\Master\03processed-data\20200630Whole.xlsx]; SheetNames=[Observed]
    PredictedObserved: PredictedTableName=Report; ObservedTableName=Observed; FieldNameUsedForMatch=Clock.Today
  Replacements
    Plant Lucerne: CropType=Lucerne; IsAlive=false; IsEnding=false; DaysAfterEnding=0
      Memo Memo1
        ## References

        ### **Ayaz S, McKenzie BA, McNeil DL, Hill GD.2004**. Light interception and utilization of four grain legumes sown at different plant populations and depths. _Journal of Agricultural Science,_**142**: 297-308.
         **Ayaz S, McKenzie BA, Hill GD, McNeil DL.2004**. Variability in yield of four grain legume species in a subhumid temperate environment. II. Yield components. _Journal of Agricultural Science,_**142**: 21-28.
         **Ayaz S, McKenzie BA, Hill GD, McNeil DL.2004**. Nitrogen distribution in four grain legumes. _Journal of Agricultural Science,_**142**: 309-317.
         **Wilson DR, Robertson MJ.1996.**Pea phenology responses to temperature and photoperiod. _Australian Agronomy Society_.
      OrganArbitrator Arbitrator
        BiomassTypeArbitrator DMArbitration
          Folder PotentialPartitioningMethods
            ReallocationMethod
            AllocateFixationMethod
            RetranslocationMethod
            SendPotentialDMAllocationsMethod
          Folder AllocationMethods
            NutrientConstrainedAllocationMethod
            DryMatterAllocationsMethod
          RelativeAllocation ArbitrationMethod
        BiomassTypeArbitrator NArbitration
          Folder PotentialPartitioningMethods
            ReallocationMethod
          Folder ActualPartitioningMethods
            AllocateFixationMethod
            RetranslocationMethod
          Folder AllocationMethods
            NitrogenAllocationsMethod
          RelativeAllocation ArbitrationMethod
          AllocateUptakesMethod
        WaterUptakeMethod
        NitrogenUptakeMethod
      Phenology
        HourlyInterpolation ThermalTime: agregationMethod=0
          XYPairs Response: X=[1, 15, 30, 40]; Y=[0, 10, 25, 0]
          ThreeHourSin InterpolationMethod
        HourlyInterpolation ThermalTime1: agregationMethod=0
          XYPairs Response: X=[2, 15, 30, 40]; Y=[0, 10, 25, 0]
          ThreeHourSin InterpolationMethod
        PhotoperiodFunction Photoperiod: Twilight=-6; DayLength=0
        PhotoperiodDeltaFunction DeltaPhotoperiod: Twilight=-6
        GerminatingPhase Germinating: Start=Sowing; End=Germination
        EmergingPhase Emerging: ShootLag=15; ShootRate=10; Start=Germination; End=Emergence; TTForTimeStep=0
          VariableReference Progression: VariableName=[Phenology].ThermalTime
        GenericPhase Juvenile: Start=Emergence; End=EndJuvenile
          VariableReference Progression: VariableName=[Phenology].ThermalTime
          LinearInterpolationFunction Target
            XYPairs: X=[10, 14, 18]; Y=[521, 521, 90]
            VariableReference XValue: VariableName=[Phenology].Photoperiod
        GenericPhase Inductive: Start=EndJuvenile; End=FloralInitiation
          VariableReference Progression: VariableName=[Phenology].ThermalTime
          LinearInterpolationFunction Target
            XYPairs: X=[10, 14, 18]; Y=[646, 265, 265]
            VariableReference XValue: VariableName=[Phenology].Photoperiod
        GenericPhase Induced: Start=FloralInitiation; End=StartFlowering
          Constant Target: FixedValue=310
          VariableReference Progression: VariableName=[Phenology].ThermalTime
        GenericPhase Flowering: Start=StartFlowering; End=StartPodfill
          VariableReference Progression: VariableName=[Phenology].ThermalTime
          Constant Target: FixedValue=1500
        GenericPhase Podfilling: Start=StartPodfill; End=Maturity
          Constant Target: FixedValue=1500
          VariableReference Progression: VariableName=[Phenology].ThermalTime
        GenericPhase Ripening: Start=Maturity; End=HarvestRipe
          Constant Target: FixedValue=1500
          VariableReference Progression: VariableName=[Phenology].ThermalTime
        EndPhase ReadyForHarvesting: Start=HarvestRipe; End=Unused
          VariableReference Progression: VariableName=[Phenology].ThermalTime
        AccumulateFunction DaysAfterCutting: StartStageName=Emergence; EndStageName=HarvestRipe; FractionRemovedOnCut=1; FractionRemovedOnHarvest=1; FractionRemovedOnGraze=1; FractionRemovedOnPrune=1
          Constant: FixedValue=1
        OnEventFunction FloweringDaysAfterCutting: SetEvent=StartFlowering; ReSetEvent=Harvesting
          Constant PreEventValue: FixedValue=0
          VariableReference PostEventValue: VariableName=[Phenology].DaysAfterCutting
        AccumulateFunction ThermalTimeAfterCutting: StartStageName=Emergence; EndStageName=Maturity; FractionRemovedOnCut=1; FractionRemovedOnHarvest=1; FractionRemovedOnGraze=1; FractionRemovedOnPrune=1
          VariableReference ThermalTime: VariableName=[Phenology].ThermalTime
        OnEventFunction BudsVisableDaysAfterCutting: SetEvent=FloralInitiation; ReSetEvent=Harvesting
          Constant PreEventValue: FixedValue=0
          VariableReference PostEventValue: VariableName=[Phenology].DaysAfterCutting
        AccumulateFunction ThermalTimeAfterFlowering: StartStageName=StartFlowering; EndStageName=Maturity; FractionRemovedOnCut=1; FractionRemovedOnHarvest=1; FractionRemovedOnGraze=1; FractionRemovedOnPrune=1
          VariableReference ThermalTime: VariableName=[Phenology].ThermalTime
        AccumulateResetAtStage ThermalTimeAfterBudsVisible: ResetStageName=FloralInitiation
          VariableReference ThermalTime: VariableName=[Phenology].ThermalTime
      LinearInterpolationFunction StemPopulation
        XYPairs: X=[100, 200, 300]; Y=[500, 800, 1500]
        VariableReference XValue: VariableName=[Lucerne].Population
      Root: GrowthRespiration=0; MaintenanceRespiration=0
        RootShapeCylindre RootShape
        LinearInterpolationFunction KLModifier
          XYPairs: X=[0, 3]; Y=[1, 1]
          VariableReference XValue: VariableName=[Leaf].LAI
        HourlyInterpolation TemperatureEffect: agregationMethod=0
          XYPairs Response: X=[0, 26, 35]; Y=[1, 1, 1]
          ThreeHourSin InterpolationMethod
        Constant MaxDailyNUptake: FixedValue=6
        Constant SenescenceRate: FixedValue=0
        Constant MaximumRootDepth: FixedValue=1000000
        PhaseLookup RootFrontVelocity
          PhaseLookupValue PreEmergence: Start=Germination; End=Emergence
            Constant Function: FixedValue=3
          PhaseLookupValue early: Start=Emergence; End=StartFlowering
            Constant Function: FixedValue=15
          PhaseLookupValue late: Start=StartFlowering; End=Maturity
            Constant Function: FixedValue=17
        Constant MaximumNConc: FixedValue=0.01
        Constant MinimumNConc: FixedValue=0.005
        PhaseBasedSwitch NitrogenDemandSwitch: Start=Emergence; End=Maturity
        LinearInterpolationFunction KNO3
          XYPairs: X=[0, 0.003]; Y=[0.02, 0.02]
          VariableReference XValue: VariableName=[Root].LengthDensity
        LinearInterpolationFunction KNH4
          XYPairs: X=[0, 0.003]; Y=[0, 0]
          VariableReference XValue: VariableName=[Root].LengthDensity
        BiomassRemoval BiomassRemovalDefaults
          OrganBiomassRemovalType Harvest: FractionLiveToRemove=0.3; FractionDeadToRemove=0; FractionLiveToResidue=0.3; FractionDeadToResidue=0
          OrganBiomassRemovalType Cut: FractionLiveToRemove=0; FractionDeadToRemove=0; FractionLiveToResidue=0; FractionDeadToResidue=0
          OrganBiomassRemovalType Prune: FractionLiveToRemove=0; FractionDeadToRemove=0; FractionLiveToResidue=0.6; FractionDeadToResidue=0
          OrganBiomassRemovalType Graze: FractionLiveToRemove=0.6; FractionDeadToRemove=0; FractionLiveToResidue=0.1; FractionDeadToResidue=0
        LinearInterpolationFunction NUptakeSWFactor
          XYPairs: X=[0, 1]; Y=[0, 1]
          VariableReference XValue: VariableName=[Root].RWC
        Constant SpecificRootLength: FixedValue=40; Units=m/g
        PartitionFractionDemandFunction DMDemandFunction
          PhaseLookup PartitionFraction
            PhaseLookupValue Early: Start=Emergence; End=StartFlowering
              Constant Function: FixedValue=0.1
            PhaseLookupValue Middle: Start=StartFlowering; End=StartPodfill
              Constant Function: FixedValue=0.2
            PhaseLookupValue Late: Start=StartPodfill; End=Maturity
              Constant Function: FixedValue=0
        Constant DMConversionEfficiency: FixedValue=1
        Constant MaintenanceRespirationFunction: FixedValue=1
        Constant RemobilisationCost: FixedValue=0
        Constant CarbonConcentration: FixedValue=0.4
        BiomassDemand DMDemands
          PartitionFractionDemandFunction Structural: same as Replacements.Lucerne.Root.DMDemandFunction
          Constant Storage: FixedValue=0
          Constant Metabolic: FixedValue=0
        BiomassDemand NDemands
          MultiplyFunction Structural
            VariableReference MinNconc: VariableName=[Root].minimumNconc
            VariableReference PotentialDMAllocation: VariableName=[Root].potentialDMAllocation.Structural
          MultiplyFunction Metabolic
            SubtractFunction MetabolicNconc
              VariableReference CritNconc: VariableName=[Root].criticalNConc
              VariableReference MinNconc: VariableName=[Root].minimumNconc
            VariableReference PotentialDMAllocation: VariableName=[Root].potentialDMAllocation.Structural
          StorageNDemandFunction Storage
            VariableReference NitrogenDemandSwitch: VariableName=[Root].nitrogenDemandSwitch
            VariableReference MaxNconc: VariableName=[Root].maximumNconc
        XYPairs: X=[500, 600]; Y=[0.8, 1]
        VariableReference CriticalNConc: VariableName=[Root].MinimumNConc
        BiomassDemand InitialWt
          Constant Structural: FixedValue=0.2; Units=g/plant
          Constant Metabolic: FixedValue=0
          Constant Storage: FixedValue=0
      Constant MortalityRate: FixedValue=0
      Nodule
        Constant FixationMetabolicCost: FixedValue=0
        Constant DMDemandFunction: FixedValue=0.01
        Constant MaximumNConc: FixedValue=0.02
        Constant MinimumNConc: FixedValue=0.01
        Constant SenescenceRate: FixedValue=0
        Constant NReallocationFactor: FixedValue=0
        PhaseBasedSwitch NitrogenDemandSwitch: Start=Emergence; End=Maturity
        BiomassRemoval BiomassRemovalDefaults
          OrganBiomassRemovalType Harvest: FractionLiveToRemove=0.5; FractionDeadToRemove=0; FractionLiveToResidue=0.1; FractionDeadToResidue=0
          OrganBiomassRemovalType Cut: FractionLiveToRemove=0; FractionDeadToRemove=0; FractionLiveToResidue=0; FractionDeadToResidue=0
          OrganBiomassRemovalType Prune: FractionLiveToRemove=0; FractionDeadToRemove=0; FractionLiveToResidue=0.6; FractionDeadToResidue=0
          OrganBiomassRemovalType Graze: FractionLiveToRemove=0.6; FractionDeadToRemove=0; FractionLiveToResidue=0.2; FractionDeadToResidue=0
        Constant StructuralFraction: FixedValue=1; Units=g/g
        Constant InitialWtFunction: FixedValue=0; Units=g/m^2
        Constant DetachmentRateFunction: FixedValue=0; Units=/d
        Constant MaintenanceRespirationFunction: FixedValue=0; Units=0-1
        Constant DMConversionEfficiency: FixedValue=1; Units=0-1
        MultiplyFunction FixationRate1
          Memo Description
            The rate of N fixation in legumes is highly regulated by the host plant, but in its basis it is defined by the presence and quantity of symbiont bacteria.  The RedClover model uses an approach whereby the basic fixation rate is directly proportional to the biomass of nodules ([RysAndPhung1985]; [LedgardEtAl1990]; [WarembourgEtAl1997]; [HoghJensenEtAl2002]; [RusselleEtAl2008]). This is then regulated by environmental factors and the plant ([CrushChapter1987]; [RusselleEtAl2008]).  The plants control N fixation by limiting the supply of sugars and oxygen to the nodules ([PuppoEtAl2005]; [RusselleEtAl2008]; [HaagEtAl2013]).  In the model, this is simulated as a function of N deficiency, with fixation rate being inversely proportional to the plant's N deficiency factor.  The mechanism regulating N fixation is quite fast, with fixation nearly ceasing soon after fertilisation or defoliation (e.g. [CarrollGresshoff1983]; [RusselleEtAl2008]).  By linking potential fixation to nodule biomass, the model is capable of describing both a upper limit for fixation and the temporal lag between the inception of N stress and an elevated N fixation rate.
          Constant MaxFixationRate: FixedValue=0.1; Units=gN/gDM nodule/day
          VariableReference NoduleBiomass: VariableName=[Nodule].Live.Wt
          LinearInterpolationFunction NDeficiencyFactor
            XYPairs: X=[0, 0.5, 0.75, 0.9, 1]; Y=[1, 1, 0.9, 0.5, 0]
            VariableReference XValue: VariableName=[Leaf].FN
        MultiplyFunction FixationRate
          Constant FixationCoefficiency: FixedValue=0.02; Units=g/m^2/d
          VariableReference: VariableName=[Leaf].Photosynthesis
        Constant NRetranslocationFactor: FixedValue=0
        Constant DMReallocationFactor: FixedValue=0
        Constant DMRetranslocationFactor: FixedValue=0
        VariableReference CriticalNConc: VariableName=[Nodule].MinimumNConc
        Constant RemobilisationCost: FixedValue=0
        Constant CarbonConcentration: FixedValue=0.4
        BiomassDemand DMDemands
          Constant Structural: FixedValue=0.01
          Constant Storage: FixedValue=0
          Constant Metabolic: FixedValue=0
        BiomassDemand NDemands
          MultiplyFunction Structural
            VariableReference MinNconc: VariableName=[Nodule].minimumNconc
            VariableReference PotentialDMAllocation: VariableName=[Nodule].potentialDMAllocation.Structural
          MultiplyFunction Metabolic
            SubtractFunction MetabolicNconc
              VariableReference CritNconc: VariableName=[Nodule].criticalNConc
              VariableReference MinNconc: VariableName=[Nodule].minimumNconc
            VariableReference PotentialDMAllocation: VariableName=[Nodule].potentialDMAllocation.Structural
          StorageNDemandFunction Storage
            VariableReference NitrogenDemandSwitch: VariableName=[Nodule].nitrogenDemandSwitch
            VariableReference MaxNconc: VariableName=[Nodule].maximumNconc
      SimpleLeaf Leaf: Albedo=0.18; Gsmax350=0.006; R50=100; LeafInitialisationStage=Emergence; Height=0; BaseHeight=0; Width=0; FRGR=0; PotentialEP=0; WaterDemand=0; KDead=0; LAIDead=0
        Memo Description
          Stover represents any part of the crop that is not removed at harvest (i.e not part of the product).
        RUEModel Photosynthesis
          Constant RUE: FixedValue=1.1
          WeightedTemperatureFunction FT: MaximumTemperatureWeighting=0.5
            XYPairs: X=[0, 18, 30, 40]; Y=[0, 1, 1, 0]
          LinearInterpolationFunction FW
            XYPairs: X=[0, 0.3, 0.4, 0.8, 1, 1.2]; Y=[0.15, 0.15, 0.15, 0.75, 0.9, 0.9]
            VariableReference XValue: VariableName=[Leaf].Fw
          RUECO2Function FCO2: PhotosyntheticPathway=C3
          VariableReference RadnInt: VariableName=[Leaf].RadIntTot
          Constant FVPD: FixedValue=1
          Constant FN: FixedValue=1
        AccumulateFunction NodeNumber: StartStageName=Emergence; EndStageName=Maturity; FractionRemovedOnCut=1; FractionRemovedOnHarvest=1; FractionRemovedOnGraze=1; FractionRemovedOnPrune=0
          VariableReference BasalBudNode: VariableName=[BasalBuds].NodeNumber
          DivideFunction DeltaNode
            VariableReference ThermalTime: VariableName=[Phenology].ThermalTime
            PhaseLookup Phyllochron
              PhaseLookupValue Juvenile: Start=Emergence; End=EndJuvenile
                Constant: FixedValue=50
              PhaseLookupValue Vegetative: Start=EndJuvenile; End=StartFlowering
                LessThanFunction Phyllochron
                  VariableReference DeltaPhotoperiod: VariableName=[Phenology].DeltaPhotoperiod
                  Constant Zero: FixedValue=0
                  LinearInterpolationFunction Decreasing
                    XYPairs: X=[10, 16.5]; Y=[49, 35]
                    VariableReference XValue: VariableName=[Phenology].Photoperiod
                  LinearInterpolationFunction Increasing
                    XYPairs: X=[10, 12, 16.5]; Y=[49, 31, 31]
                    VariableReference XValue: VariableName=[Phenology].Photoperiod
              PhaseLookupValue Reproductive: Start=StartFlowering; End=Maturity
                LinearInterpolationFunction Phyllochron
                  XYPairs: X=[12, 16]; Y=[69, 69]
                  VariableReference XValue: VariableName=[Phenology].Photoperiod
          MultiplyFunction FrostDeath
            VariableReference NodeNumber: VariableName=[Leaf].NodeNumber
            VariableReference FrostFraction: VariableName=[Leaf].FrostFraction
            Constant: FixedValue=-1
        BasialBuds BasalBuds: ResetStageName=FloralInitiation; NodeNumber=0; LAI=0
          PhaseLookup DeltaLAI
            PhaseLookupValue: Start=FloralInitiation; End=Maturity
              MultiplyFunction
                VariableReference DeltaLAI: VariableName=[Leaf].Area.LeafArea.DeltaLAI
                Constant BasalBudFactor: FixedValue=0.3
          PhaseLookup DeltaNodeNumber
            PhaseLookupValue: Start=FloralInitiation; End=Maturity
              MultiplyFunction
                VariableReference: VariableName=[Leaf].NodeNumber.DeltaNode
                Constant BasalBudFactor: FixedValue=0.01
        MaximumFunction Area
          AccumulateFunction LeafArea: StartStageName=Emergence; EndStageName=Maturity; FractionRemovedOnCut=1; FractionRemovedOnHarvest=1; FractionRemovedOnGraze=1; FractionRemovedOnPrune=1
            LessThanFunction BasalBudLAI
              VariableReference DaysAfterCutting: VariableName=[Phenology].DaysAfterCutting
              Constant Two: FixedValue=2
              VariableReference BasalBudLAIAtCutting: VariableName=[BasalBuds].LAI
              Constant Zero: FixedValue=0
            MultiplyFunction DeltaLAI
              PhaseLookup LAER
                PhaseLookupValue Juvenile: Start=Emergence; End=EndJuvenile
                  Constant: FixedValue=0.002
                PhaseLookupValue Vegetative: Start=EndJuvenile; End=StartFlowering
                  MultiplyFunction LAER
                    LessThanFunction LAERBASE
                      VariableReference DeltaPhotoperiod: VariableName=[Phenology].DeltaPhotoperiod
                      Constant Zero: FixedValue=0
                      LinearInterpolationFunction Decreasing
                        XYPairs: X=[8, 10, 16.5]; Y=[0, 0.0056, 0.015]
                        VariableReference XValue: VariableName=[Phenology].Photoperiod
                      LinearInterpolationFunction Increasing
                        XYPairs: X=[8, 11.5, 12, 16.5]; Y=[0, 0, 0.018, 0.02]
                        VariableReference XValue: VariableName=[Phenology].Photoperiod
                    VariableReference Fw: VariableName=[Leaf].Fw
                PhaseLookupValue Reproductive: Start=StartFlowering; End=Maturity
                  Constant: FixedValue=0
              VariableReference ThermalTime: VariableName=[Phenology].ThermalTime1
              LinearInterpolationFunction Seedling
                XYPairs: X=[1, 2]; Y=[0.98, 1]
                VariableReference XValue: VariableName=[Mower].Script.Year
              LessThanFunction Earlylag
                VariableReference DeltaPhotoperiod: VariableName=[Phenology].DeltaPhotoperiod
                Constant Zero: FixedValue=0
                LinearInterpolationFunction Decreasing
                  XYPairs: X=[0, 150, 200]; Y=[0, 1, 1]
                  VariableReference XValue: VariableName=[Phenology].ThermalTimeAfterCutting
                LinearInterpolationFunction Increasing
                  XYPairs: X=[0, 150, 200]; Y=[0, 0.5, 1]
                  VariableReference XValue: VariableName=[Phenology].ThermalTimeAfterCutting
            MultiplyFunction FrostDeath
              VariableReference LAI: VariableName=[Leaf].LAI
              VariableReference FrostFraction: VariableName=[Leaf].FrostFraction
              Constant: FixedValue=-1
            MultiplyFunction Senescence
              Memo Description
                Red clover has, similar to otehr clovers, a relatively high rate of leaf senescence, with leaf area estabilising when LAI reaches about 5.0 m2/m2 ([Brougham1958_LeafDev]; [JoggiEtAl1983_RedClover]; [MurrayThesis2012]).  Generic relationships to enviromental factors, such as temperature and soil moisture, are assumed based on other plant models.
              Constant ReferenceRate: FixedValue=-0.2; Units=/day
              LinearInterpolationFunction StageFactor
                XYPairs: X=[3, 4, 5, 6, 7, 8]; Y=[0, 0, 0.3, 0.5, 0.6, 1]
                VariableReference XValue: VariableName=[Phenology].Stage
              LinearInterpolationFunction CoverFactor
                XYPairs: X=[0, 2, 4, 5, 7]; Y=[0, 0, 0.5, 0.5, 1.5]
                VariableReference XValue: VariableName=[Leaf].LAI
              WeightedTemperatureFunction TemperatureFactor: MaximumTemperatureWeighting=0.5
                XYPairs: X=[-20, -5, 0, 5, 17, 28, 37.5]; Y=[1.5, 0.25, 0.1, 0.1, 1, 1, 1.5]
              LinearInterpolationFunction SoilMoistureFactor
                XYPairs: X=[0, 0.5, 1]; Y=[1, 1, 1]
                VariableReference XValue: VariableName=[Leaf].Fw
          Constant: FixedValue=0; Units=m^2/m^2
        LessThanFunction FrostFraction
          VariableReference DeltaPhotoperiod: VariableName=[Phenology].DeltaPhotoperiod
          Constant Zero: FixedValue=0
          LinearInterpolationFunction Decreasing
            XYPairs: X=[-15, -5]; Y=[1, 0]
            VariableReference XValue: VariableName=[Weather].MinT
          LinearInterpolationFunction Increasing
            XYPairs: X=[-10, -5]; Y=[1, 0]
            VariableReference XValue: VariableName=[Weather].MinT
        MinimumFunction FRGR
          HourlyInterpolation FRGRFunctionTemp: agregationMethod=0
            XYPairs Response: X=[0, 10, 25, 40]; Y=[0, 1, 1, 0]
            ThreeHourSin InterpolationMethod
        PhaseLookup ExtinctionCoefficient
          PhaseLookupValue Juvenile: Start=Emergence; End=EndJuvenile
            Constant: FixedValue=0.81
          PhaseLookupValue Vegetative: Start=EndJuvenile; End=StartFlowering
            Constant: FixedValue=0.81
          PhaseLookupValue Reproductive: Start=StartFlowering; End=Maturity
            Constant: FixedValue=0.81
          Memo Description
            The extinction coefficient is used to calculate a LAI value (needed by MicroClimate) from the canopy cover
        AccumulateFunction Tallness: StartStageName=Emergence; EndStageName=StartPodfill; FractionRemovedOnCut=1; FractionRemovedOnHarvest=1; FractionRemovedOnGraze=1; FractionRemovedOnPrune=1
          DivideFunction DeltaHeight
            VariableReference ThermalTime: VariableName=[Phenology].ThermalTime
            PhaseLookup Heightchron
              PhaseLookupValue Juvenile: Start=Emergence; End=EndJuvenile
                Constant: FixedValue=3
              PhaseLookupValue Vegetative: Start=EndJuvenile; End=StartFlowering
                MultiplyFunction Heightchron
                  LinearInterpolationFunction Heightchron
                    XYPairs
                      X=[10, 10.5, 11, 11.5, 12, 12.5, 13, 13.5, 14, 15, 15.5, 16, 16.5]
                      Y=[4, 3.234, 2.5, 2.1, 1.75, 1.4, 1.083, 0.938, 0.822, 0.675, 0.644, 0.642, 0.64]
                    VariableReference XValue: VariableName=[Phenology].Photoperiod
              PhaseLookupValue Reproductive: Start=StartFlowering; End=Maturity
                LinearInterpolationFunction Heightchron
                  XYPairs: X=[12, 16]; Y=[2.2, 1.8]
                  VariableReference XValue: VariableName=[Phenology].Photoperiod
          MultiplyFunction FrostDeath
            VariableReference Height: VariableName=[Leaf].Height
            VariableReference FrostFraction: VariableName=[Leaf].FrostFraction
            Constant: FixedValue=-1
        Constant NReallocationFactor: FixedValue=0
        Constant DetachmentRate: FixedValue=0; Units=/d
        Constant StructuralFraction: FixedValue=1; Units=0-1
        Constant InitialWt: FixedValue=0.1
        Constant LaiDead: FixedValue=0; Units=m^2/m^2
        LinearInterpolationFunction MaximumNConc
          XYPairs: X=[0, 50, 100, 200]; Y=[0.068, 0.062, 0.055, 0.05]
          VariableReference XValue: VariableName=[Leaf].Live.Wt
        VariableReference CriticalNConc: VariableName=[Leaf].MinimumNConc
        LinearInterpolationFunction MinimumNConc
          XYPairs: X=[0, 50, 100, 150]; Y=[0.06, 0.055, 0.05, 0.04]
          VariableReference XValue: VariableName=[Leaf].Live.Wt
        Constant SenescenceRate: FixedValue=0
        VariableReference SenescenceRate0: VariableName=[Leaf].Area.LeafArea.Senescence.SenescenceFrac
        Constant NitrogenDemandSwitch: FixedValue=0
        Constant MaintenanceRespiration: FixedValue=0; Units=0-1
        Constant DMConversionEfficiency: FixedValue=1; Units=0-1
        BiomassRemoval BiomassRemovalDefaults
          OrganBiomassRemovalType Harvest: FractionLiveToRemove=0; FractionDeadToRemove=0; FractionLiveToResidue=0.3; FractionDeadToResidue=0
          OrganBiomassRemovalType Cut: FractionLiveToRemove=0.95; FractionDeadToRemove=0; FractionLiveToResidue=0; FractionDeadToResidue=0
          OrganBiomassRemovalType Prune: FractionLiveToRemove=0; FractionDeadToRemove=0; FractionLiveToResidue=0.6; FractionDeadToResidue=0
          OrganBiomassRemovalType Graze: FractionLiveToRemove=0.6; FractionDeadToRemove=0; FractionLiveToResidue=0.1; FractionDeadToResidue=0
        Constant NRetranslocationFactor: FixedValue=0
        Constant DMReallocationFactor: FixedValue=0
        Constant DMRetranslocationFactor: FixedValue=0
        Constant RemobilisationCost: FixedValue=0
        Constant CarbonConcentration: FixedValue=0.4
        BiomassDemand DMDemands
          AllometricDemandFunction Structural: Const=39.4; Power=0.85
            VariableReference XValue: VariableName=[Leaf].LAI
            VariableReference YValue: VariableName=[Leaf].Live.Wt
          Constant Storage: FixedValue=0
          Constant Metabolic: FixedValue=0
        BiomassDemand NDemands
          MultiplyFunction Structural
            VariableReference MinNconc: VariableName=[Leaf].minimumNconc
            VariableReference PotentialDMAllocation: VariableName=[Leaf].potentialDMAllocation.Structural
          MultiplyFunction Metabolic
            SubtractFunction MetabolicNconc
              VariableReference CritNconc: VariableName=[Leaf].criticalNConc
              VariableReference MinNconc: VariableName=[Leaf].minimumNconc
            VariableReference PotentialDMAllocation: VariableName=[Leaf].potentialDMAllocation.Structural
          StorageNDemandFunction Storage
            VariableReference NitrogenDemandSwitch: VariableName=[Leaf].nitrogenDemandSwitch
            VariableReference MaxNconc: VariableName=[Leaf].maximumNconc
        Constant StomatalConductanceCO2Modifier: FixedValue=1
      GenericOrgan Stem: IsAboveGround=true
        Constant NReallocationFactor: FixedValue=0
        Constant NRetranslocationFactor: FixedValue=0
        Constant DMRetranslocationFactor: FixedValue=0.1
        LinearInterpolationFunction MaximumNConc
          XYPairs
            X=[4, 6, 8, 10, 20, 30, 50, 100, 500, 800]
            Y=[0.05, 0.046, 0.038, 0.034, 0.025, 0.021, 0.017, 0.013, 0.0064, 0.0052]
          VariableReference XValue: VariableName=[Stem].Live.Wt
        LinearInterpolationFunction MinimumNConc
          XYPairs
            X=[2, 4, 6, 10, 20, 30, 100, 500, 800]
            Y=[0.047, 0.035, 0.029, 0.024, 0.017, 0.014, 0.0088, 0.0044, 0.0036]
          VariableReference XValue: VariableName=[Stem].Live.Wt
        PhaseBasedSwitch NitrogenDemandSwitch: Start=Emergence; End=Maturity
        Constant StructuralFraction: FixedValue=1
        BiomassRemoval BiomassRemovalDefaults
          OrganBiomassRemovalType Harvest: FractionLiveToRemove=0.5; FractionDeadToRemove=0; FractionLiveToResidue=0.1; FractionDeadToResidue=0
          OrganBiomassRemovalType Cut: FractionLiveToRemove=0.95; FractionDeadToRemove=0; FractionLiveToResidue=0; FractionDeadToResidue=0
          OrganBiomassRemovalType Prune: FractionLiveToRemove=0; FractionDeadToRemove=0; FractionLiveToResidue=0.6; FractionDeadToResidue=0
          OrganBiomassRemovalType Graze: FractionLiveToRemove=0.6; FractionDeadToRemove=0; FractionLiveToResidue=0.2; FractionDeadToResidue=0
        Constant SenescenceRate: FixedValue=0; Units=/d
        Constant DetachmentRateFunction: FixedValue=0; Units=/d
        Constant MaintenanceRespirationFunction: FixedValue=0; Units=0-1
        Constant DMConversionEfficiency: FixedValue=1; Units=0-1
        AllometricDemandFunction DMDemandFunction: Const=0.1452028; Power=1.23213787
          VariableReference XValue: VariableName=[AboveGround].Wt
          VariableReference YValue: VariableName=[Stem].Live.Wt
        Constant Phyollchorn: FixedValue=0
        Constant DMReallocationFactor: FixedValue=0
        VariableReference CriticalNConc: VariableName=[Stem].MinimumNConc
        Constant RemobilisationCost: FixedValue=0
        Constant CarbonConcentration: FixedValue=0.4
        BiomassDemand DMDemands
          AllometricDemandFunction Structural: Const=0.1452028; Power=1.23213787
            VariableReference XValue: VariableName=[AboveGround].Wt
            VariableReference YValue: VariableName=[Stem].Live.Wt
          Constant Storage: FixedValue=0
          Constant Metabolic: FixedValue=0
        BiomassDemand NDemands
          MultiplyFunction Structural
            VariableReference MinNconc: VariableName=[Stem].minimumNconc
            VariableReference PotentialDMAllocation: VariableName=[Stem].potentialDMAllocation.Structural
          MultiplyFunction Metabolic
            SubtractFunction MetabolicNconc
              VariableReference CritNconc: VariableName=[Stem].criticalNConc
              VariableReference MinNconc: VariableName=[Stem].minimumNconc
            VariableReference PotentialDMAllocation: VariableName=[Stem].potentialDMAllocation.Structural
          StorageNDemandFunction Storage
            VariableReference NitrogenDemandSwitch: VariableName=[Stem].nitrogenDemandSwitch
            VariableReference MaxNconc: VariableName=[Stem].maximumNconc
        RetranslocateNonStructural RetranslocateNitrogen
        BiomassDemand InitialWt
          Constant Structural: FixedValue=0; Units=g/m^2
          Constant Metabolic: FixedValue=0
          Constant Storage: FixedValue=0
      GenericOrgan Shell: IsAboveGround=true
        Constant NReallocationFactor: FixedValue=0
        Constant NRetranslocationFactor: FixedValue=0.1
        Constant DMRetranslocationFactor: FixedValue=0.1
        Constant MaximumNConc: FixedValue=0.03
        Constant MinimumNConc: FixedValue=0.01
        PhaseBasedSwitch NitrogenDemandSwitch: Start=Emergence; End=Maturity
        Constant StructuralFraction: FixedValue=1
        BiomassRemoval BiomassRemovalDefaults
          OrganBiomassRemovalType Harvest: FractionLiveToRemove=0.5; FractionDeadToRemove=0; FractionLiveToResidue=0.1; FractionDeadToResidue=0
          OrganBiomassRemovalType Cut: FractionLiveToRemove=0.8; FractionDeadToRemove=0; FractionLiveToResidue=0; FractionDeadToResidue=0
          OrganBiomassRemovalType Prune: FractionLiveToRemove=0; FractionDeadToRemove=0; FractionLiveToResidue=0.6; FractionDeadToResidue=0
          OrganBiomassRemovalType Graze: FractionLiveToRemove=0.6; FractionDeadToRemove=0; FractionLiveToResidue=0.2; FractionDeadToResidue=0
        Constant SenescenceRate: FixedValue=0; Units=/d
        Constant DetachmentRateFunction: FixedValue=0; Units=/d
        Constant MaintenanceRespirationFunction: FixedValue=0; Units=0-1
        Constant DMConversionEfficiency: FixedValue=1; Units=0-1
        PartitionFractionDemandFunction DMDemandFunction
          PhaseLookup PartitionFraction
            PhaseLookupValue: Start=StartPodfill; End=Maturity
              Constant: FixedValue=0.2
        Constant DMReallocationFactor: FixedValue=0
        VariableReference CriticalNConc: VariableName=[Shell].MinimumNConc
        Constant RemobilisationCost: FixedValue=0
        Constant CarbonConcentration: FixedValue=0.4
        BiomassDemand DMDemands
          PartitionFractionDemandFunction Structural: same as Replacements.Lucerne.Shell.DMDemandFunction
          Constant Storage: FixedValue=0
          Constant Metabolic: FixedValue=0
        BiomassDemand NDemands
          MultiplyFunction Structural
            VariableReference MinNconc: VariableName=[Shell].minimumNconc
            VariableReference PotentialDMAllocation: VariableName=[Shell].potentialDMAllocation.Structural
          MultiplyFunction Metabolic
            SubtractFunction MetabolicNconc
              VariableReference CritNconc: VariableName=[Shell].criticalNConc
              VariableReference MinNconc: VariableName=[Shell].minimumNconc
            VariableReference PotentialDMAllocation: VariableName=[Shell].potentialDMAllocation.Structural
          StorageNDemandFunction Storage
            VariableReference NitrogenDemandSwitch: VariableName=[Shell].nitrogenDemandSwitch
            VariableReference MaxNconc: VariableName=[Shell].maximumNconc
        RetranslocateNonStructural RetranslocateNitrogen
        BiomassDemand InitialWt
          Constant Structural: FixedValue=0; Units=g/m^2
          Constant Metabolic: FixedValue=0
          Constant Storage: FixedValue=0
      GenericOrgan Grain: IsAboveGround=true
        Constant NReallocationFactor: FixedValue=0
        Constant NRetranslocationFactor: FixedValue=0.1
        Constant DMRetranslocationFactor: FixedValue=0.1
        Constant MaximumNConc: FixedValue=0.03
        Constant MinimumNConc: FixedValue=0.01
        PhaseBasedSwitch NitrogenDemandSwitch: Start=Emergence; End=Maturity
        Constant StructuralFraction: FixedValue=1
        BiomassRemoval BiomassRemovalDefaults: same as Replacements.Lucerne.Shell.BiomassRemovalDefaults
        Constant SenescenceRate: FixedValue=0; Units=/d
        Constant DetachmentRateFunction: FixedValue=0; Units=/d
        Constant MaintenanceRespirationFunction: FixedValue=0; Units=0-1
        Constant DMConversionEfficiency: FixedValue=1; Units=0-1
        PartitionFractionDemandFunction DMDemandFunction: same as Replacements.Lucerne.Shell.DMDemandFunction
        Constant DMReallocationFactor: FixedValue=0
        VariableReference CriticalNConc: VariableName=[Grain].MinimumNConc
        Constant RemobilisationCost: FixedValue=0
        Constant CarbonConcentration: FixedValue=0.4
        BiomassDemand DMDemands: same as Replacements.Lucerne.Shell.DMDemands
        BiomassDemand NDemands
          MultiplyFunction Structural
            VariableReference MinNconc: VariableName=[Grain].minimumNconc
            VariableReference PotentialDMAllocation: VariableName=[Grain].potentialDMAllocation.Structural
          MultiplyFunction Metabolic
            SubtractFunction MetabolicNconc
              VariableReference CritNconc: VariableName=[Grain].criticalNConc
              VariableReference MinNconc: VariableName=[Grain].minimumNconc
            VariableReference PotentialDMAllocation: VariableName=[Grain].potentialDMAllocation.Structural
          StorageNDemandFunction Storage
            VariableReference NitrogenDemandSwitch: VariableName=[Grain].nitrogenDemandSwitch
            VariableReference MaxNconc: VariableName=[Grain].maximumNconc
        RetranslocateNonStructural RetranslocateNitrogen
        BiomassDemand InitialWt
          Constant Structural: FixedValue=0; Units=g/m^2
          Constant Metabolic: FixedValue=0
          Constant Storage: FixedValue=0
      GenericOrgan TapRoot: IsAboveGround=false
        Constant NReallocationFactor: FixedValue=1
        PhaseLookup NRetranslocationFactor
          PhaseLookupValue Juvenile: Start=Emergence; End=EndJuvenile
            Constant: FixedValue=0
          PhaseLookupValue Vegetative: Start=EndJuvenile; End=StartFlowering
            MultiplyFunction
              LessThanFunction AnnualEffect
                VariableReference DeltaPhotoperiod: VariableName=[Phenology].DeltaPhotoperiod
                Constant Zero: FixedValue=-0.02
                Constant Decreasing: FixedValue=0.001
                Constant Increasing: FixedValue=0.05
              LinearInterpolationFunction RegrowthEffect
                XYPairs: X=[0, 350, 400]; Y=[1.5, 1.5, 0]
                VariableReference XValue: VariableName=[Phenology].ThermalTimeAfterCutting
          PhaseLookupValue Reproductive: Start=StartFlowering; End=Maturity
            Constant: FixedValue=0
          Memo Description
            The extinction coefficient is used to calculate a LAI value (needed by MicroClimate) from the canopy cover
        PhaseLookup DMRetranslocationFactor
          PhaseLookupValue Juvenile: Start=Emergence; End=EndJuvenile
            Constant: FixedValue=0
          PhaseLookupValue Vegetative: Start=EndJuvenile; End=StartFlowering
            MultiplyFunction
              LessThanFunction AnnualEffect
                VariableReference DeltaPhotoperiod: VariableName=[Phenology].DeltaPhotoperiod
                Constant Zero: FixedValue=-0.02
                Constant Decreasing: FixedValue=0.001
                Constant Increasing: FixedValue=0.075
              LinearInterpolationFunction RegrowthEffect
                XYPairs: X=[0, 300, 350]; Y=[1.5, 1.5, 0]
                VariableReference XValue: VariableName=[Phenology].ThermalTimeAfterCutting
          PhaseLookupValue Reproductive: Start=StartFlowering; End=Maturity
            Constant: FixedValue=0
          Memo Description
            The extinction coefficient is used to calculate a LAI value (needed by MicroClimate) from the canopy cover
        LinearInterpolationFunction MaximumNConc
          XYPairs: X=[0, 500, 1000]; Y=[0.015, 0.02, 0.025]
          VariableReference XValue: VariableName=[Taproot].Live.Wt
        LinearInterpolationFunction MinimumNConc
          XYPairs: X=[0, 500, 1000]; Y=[0.012, 0.012, 0.012]
          VariableReference XValue: VariableName=[Taproot].Live.Wt
        PhaseBasedSwitch NitrogenDemandSwitch: Start=Emergence; End=Maturity
          LinearInterpolationFunction
            XYPairs: X=[10.5, 12.5]; Y=[51, 34]
            VariableReference XValue: VariableName=[Phenology].Photoperiod
        Constant StructuralFraction: FixedValue=0.4
        BiomassRemoval BiomassRemovalDefaults
          OrganBiomassRemovalType Harvest: FractionLiveToRemove=0; FractionDeadToRemove=0; FractionLiveToResidue=0; FractionDeadToResidue=0
          OrganBiomassRemovalType Cut: FractionLiveToRemove=0; FractionDeadToRemove=0; FractionLiveToResidue=0; FractionDeadToResidue=0
          OrganBiomassRemovalType Prune: FractionLiveToRemove=0; FractionDeadToRemove=0; FractionLiveToResidue=0; FractionDeadToResidue=0
          OrganBiomassRemovalType Graze: FractionLiveToRemove=0; FractionDeadToRemove=0; FractionLiveToResidue=0; FractionDeadToResidue=0
        MultiplyFunction MaintenanceRespirationFunction
          Constant: FixedValue=1
          ExponentialFunction: A=0; B=1; C=1
            DivideFunction
              SubtractFunction
                SoilTemperatureDepthFunction: Depth=100
                Constant: FixedValue=20
              Constant: FixedValue=10
          PhaseLookup RespirationCoefficient
            PhaseLookupValue Juvenile: Start=Emergence; End=EndJuvenile
              Constant: FixedValue=0
            PhaseLookupValue Vegetative: Start=EndJuvenile; End=StartFlowering
              Constant: FixedValue=0.0005
            PhaseLookupValue Reproductive: Start=StartFlowering; End=Maturity
              Constant: FixedValue=0.0005
            Memo Description
              The extinction coefficient is used to calculate a LAI value (needed by MicroClimate) from the canopy cover
        Constant SenescenceRate: FixedValue=0; Units=/d
        Constant DetachmentRateFunction: FixedValue=0; Units=/d
        Constant DMConversionEfficiency: FixedValue=1; Units=0-1
        Constant DMReallocationFactor: FixedValue=0
        VariableReference CriticalNConc: VariableName=[Taproot].MinimumNConc
        Constant RemobilisationCost: FixedValue=0
        Constant CarbonConcentration: FixedValue=0.4
        BiomassDemand NDemands
          MultiplyFunction Structural
            VariableReference MinNconc: VariableName=[TapRoot].minimumNconc
            VariableReference PotentialDMAllocation: VariableName=[TapRoot].potentialDMAllocation.Structural
          MultiplyFunction Metabolic
            SubtractFunction MetabolicNconc
              VariableReference CritNconc: VariableName=[TapRoot].criticalNConc
              VariableReference MinNconc: VariableName=[TapRoot].minimumNconc
            VariableReference PotentialDMAllocation: VariableName=[TapRoot].potentialDMAllocation.Structural
          StorageNDemandFunction Storage
            VariableReference NitrogenDemandSwitch: VariableName=[TapRoot].nitrogenDemandSwitch
            VariableReference MaxNconc: VariableName=[TapRoot].maximumNconc
        BiomassDemand DMDemands
          MultiplyFunction Structural
            AddFunction
              SubtractFunction Structural
                MaximumFunction MaximumTapRootStructuralDM
                  Constant: FixedValue=250
                  VariableReference TapRootStructuralDM: VariableName=[TapRoot].Live.StructuralWt
                VariableReference TapRootStructuralDM: VariableName=[TapRoot].Live.StructuralWt
            Constant multiplier: FixedValue=0.01
          MultiplyFunction Storage
            SubtractFunction Capacity
              MultiplyFunction Maxium
                VariableReference Structural: VariableName=[TapRoot].Live.StructuralWt
                PhaseLookup MultiplyFunction
                  PhaseLookupValue Juvenile: Start=Emergence; End=EndJuvenile
                    Constant: FixedValue=3
                  PhaseLookupValue Vegetative: Start=EndJuvenile; End=StartFlowering
                    Constant: FixedValue=1.6
                  PhaseLookupValue Reproductive: Start=StartFlowering; End=Maturity
                    Constant: FixedValue=2.3
                Constant: FixedValue=1
              VariableReference Current: VariableName=[TapRoot].Live.StorageWt
            MultiplyFunction
              LessThanFunction Photoperiod
                VariableReference DeltaPhotoperiod: VariableName=[Phenology].DeltaPhotoperiod
                Constant Zero: FixedValue=-0.02
                Constant Decreasing: FixedValue=1
                Constant Increasing: FixedValue=0
              LinearInterpolationFunction RegrowthEffect
                XYPairs: X=[0, 300, 350]; Y=[0, 0, 1.5]
                VariableReference XValue: VariableName=[Phenology].ThermalTimeAfterCutting
          Constant Metabolic: FixedValue=0
        RetranslocateNonStructural RetranslocateNitrogen
        BiomassDemand InitialWt
          Constant Structural: FixedValue=0; Units=g/m^2
          Constant Metabolic: FixedValue=0
          Constant Storage: FixedValue=0
      CompositeBiomass AboveGround: DMDOfStructural=0.6
        Propertys=[[Leaf].Live, [Leaf].Dead, [Stem].Live, [Stem].Dead, [Grain].Live, [Grain].Dead, [Shell].Live, [Shell].Dead]
      CompositeBiomass BelowGround: DMDOfStructural=0.6
        Propertys=[[Root].Live, [Root].Dead, [Nodule].Live, [Nodule].Dead, [TapRoot].Live, [TapRoot].Dead]
      CompositeBiomass Total: DMDOfStructural=0.6
        Propertys=[[Leaf].Live, [Leaf].Dead, [Stem].Live, [Stem].Dead, [Grain].Live, [Grain].Dead, [Shell].Live, [Shell].Dead, [Root].Live, [Root].Dead, [Nodule].Live, [Nodule].Dead, [TapRoot].Live, [TapRoot].Dead]
      CompositeBiomass TotalLive: DMDOfStructural=0.6
        Propertys=[[Leaf].Live, [Stem].Live, [Grain].Live, [Shell].Live, [Root].Live, [Nodule].Live, [TapRoot].Live]
      CompositeBiomass TotalDead: DMDOfStructural=0.6
        Propertys=[[Leaf].Dead, [Stem].Dead, [Grain].Dead, [Shell].Dead, [Root].Dead, [Nodule].Dead, [TapRoot].Dead]
      CompositeBiomass Pod: Propertys=[[Shell].Live, [Shell].Dead, [Grain].Live, [Grain].Dead]; DMDOfStructural=0.6
      Memo
        ## References

        ### **Ayaz S, McKenzie BA, McNeil DL, Hill GD.** **2004**. Light interception and utilization of four grain legumes sown at different plant populations and depths. _Journal of Agricultural Science,_ **142**: 297-308.
         **Ayaz S, McKenzie BA, Hill GD, McNeil DL.** **2004**. Variability in yield of four grain legume species in a subhumid temperate environment. II. Yield components. _Journal of Agricultural Science,_ **142**: 21-28.
         **Ayaz S, McKenzie BA, Hill GD, McNeil DL.** **2004**. Nitrogen distribution in four grain legumes. _Journal of Agricultural Science,_ **142**: 309-317.
         **Wilson DR, Robertson MJ.** **1996.** Pea phenology responses to temperature and photoperiod. _Australian Agronomy Society_.
      CultivarFolder
        Cultivar Kaituna
        Cultivar Trifecta
        Cultivar HunterRiver
        Cultivar Sceptre
        Cultivar SuperMonarca
        Cultivar WL611
        Cultivar southern_special
        Cultivar WL6112
        Cultivar WL6113
        Cultivar WL6114
        Cultivar FD2
          Command:
            [Leaf].Area.LeafArea.DeltaLAI.LAER.Vegetative.LAER.Decreasing.XYPairs.Y = 0, 0.0064, 0.015
            [Leaf].Area.LeafArea.DeltaLAI.LAER.Vegetative.LAER.Increasing.XYPairs.Y = 0, 0.015, 0.015,0.02
            [Leaf].Tallness.DeltaHeight.Heightchron.Vegetative.Heightchron.Heightchron.XYPairs.X = 10, 10.5, 11, 11.5, 12, 12.5, 13, 13.5, 14, 15, 15.5, 16, 16.5
            [Leaf].Tallness.DeltaHeight.Heightchron.Vegetative.Heightchron.Heightchron.XYPairs.Y = 2.82, 2.82, 2.82, 2.45, 2.13, 1.84, 1.6, 1.41, 1.0, 0.9, 0.9, 0.9, 0.9
            [TapRoot].DMDemands.Storage.Capacity.Maxium.Constant.FixedValue=1
            [TapRoot].DMRetranslocationFactor.Vegetative.MultiplyFunction.RegrowthEffect.XYPairs.X =0, 0, 50
            [TapRoot].DMRetranslocationFactor.Vegetative.MultiplyFunction.RegrowthEffect.XYPairs.Y =2.5, 2.5, 0
            [TapRoot].DMDemands.Storage.MultiplyFunction.RegrowthEffect.XYPairs.X = 0, 0, 50
            [TapRoot].DMDemands.Storage.MultiplyFunction.RegrowthEffect.XYPairs.Y = 0, 0, 2.5
            [TapRoot].NRetranslocationFactor.Vegetative.MultiplyFunction.RegrowthEffect.XYPairs.X =0, 200, 250
            [TapRoot].NRetranslocationFactor.Vegetative.MultiplyFunction.RegrowthEffect.XYPairs.Y =2, 2, 0
        Cultivar FD10
          Command:
            [Leaf].Area.LeafArea.DeltaLAI.LAER.Vegetative.LAER.Decreasing.XYPairs.Y = 0.01, 0.01, 0.01
            [Leaf].Area.LeafArea.DeltaLAI.LAER.Vegetative.LAER.Increasing.XYPairs.Y = 0, 0.01, 0.015,0.015
            [Leaf].Tallness.DeltaHeight.Heightchron.Vegetative.Heightchron.Heightchron.XYPairs.X = 10, 10.5, 11, 11.5, 12, 12.5, 13, 13.5, 14, 15, 15.5, 16, 16.5
            [Leaf].Tallness.DeltaHeight.Heightchron.Vegetative.Heightchron.Heightchron.XYPairs.Y= 1.6, 1.44, 1.3, 1.17, 1.07, 0.97, 0.87, 0.76, 0.75, 0.75, 0.75,0.75, 0.75
            [TapRoot].DMDemands.Storage.Capacity.Maxium.Constant.FixedValue=1
            [TapRoot].DMRetranslocationFactor.Vegetative.MultiplyFunction.RegrowthEffect.XYPairs.X =0, 200, 250
            [TapRoot].DMRetranslocationFactor.Vegetative.MultiplyFunction.RegrowthEffect.XYPairs.Y =0.5, 0.5, 0
            [TapRoot].DMDemands.Storage.MultiplyFunction.RegrowthEffect.XYPairs.X = 0, 200, 250
            [TapRoot].DMDemands.Storage.MultiplyFunction.RegrowthEffect.XYPairs.Y = 0, 0, 0.5
            [TapRoot].NRetranslocationFactor.Vegetative.MultiplyFunction.RegrowthEffect.XYPairs.X =0, 450, 400
            [TapRoot].NRetranslocationFactor.Vegetative.MultiplyFunction.RegrowthEffect.XYPairs.Y =2, 2, 0
        Cultivar FD5
          Command:
            [TapRoot].DMRetranslocationFactor.Vegetative.MultiplyFunction.RegrowthEffect.XYPairs.X =0, 350, 400
            [TapRoot].DMRetranslocationFactor.Vegetative.MultiplyFunction.RegrowthEffect.XYPairs.Y =1.5, 1.5, 0
            [TapRoot].DMDemands.Storage.MultiplyFunction.RegrowthEffect.XYPairs.X = 0, 350, 400
            [TapRoot].DMDemands.Storage.MultiplyFunction.RegrowthEffect.XYPairs.Y = 0, 0, 1.5
        Cultivar Dupuits
        Cultivar SARDI7
        Cultivar SARDI10
        Cultivar CRIOULA
        Cultivar ESTANZUELACHANA
    Manager Mower
      Year = 0
      Rotation = 0
      YearRotation = 0
      HarvestFlag = False
      YearTransation = 1-Jun
      BudsDays = 0
      FloDays = 0
```csharp
using APSIM.Shared.Utilities;
using System.Xml.Serialization;
using Models.PMF.Interfaces;
using Models.PMF;
using Models.Core;
using System.Collections.Generic;
using System;

namespace Models
{
    [Serializable] 
    [System.Xml.Serialization.XmlInclude(typeof(Model))]
    public class Script : Model
    {
        [Link] Plant Lucerne;
        [Link] Clock clock;
        [Link] Zone zone;
        [XmlIgnore] private RemovalFractions Remove { get; set; }
    public double Year { get;set;}
    public double Rotation { get;set;}
    public double YearRotation { get;set;}
    bool YearPassed { get;set;}
    public bool HarvestFlag { get;set;}
    [Description("Change to the next growth year")]
    public string YearTransation { get;set;}
    public double BudsDays { get;set;}
    public double FloDays { get;set;}
        [EventSubscribe("StartOfSimulation")]
        private void OnSimulationCommencing(object sender, EventArgs e)
        {   Year = 1;
            Rotation =1;
            YearRotation= Year + Rotation;
            HarvestFlag=false;
            YearPassed= false;
            Remove = new RemovalFractions();
        }
        [EventSubscribe("EndOfDay")]
        private void OnEndOfDay(object sender, EventArgs e)
        {
        if (DateUtilities.WithinDates(YearTransation, clock.Today, YearTransation))
         YearPassed= true;
         HarvestFlag= false;
         BudsDays= (double)zone.Get("Lucerne.Phenology.BudsVisableDaysAfterCutting.Value()");
         FloDays= (double)zone.Get("Lucerne.Phenology.FloweringDaysAfterCutting.Value()");
        }
        public void Cut()
        {   /*double TtFlo=(double)zone.Get("Lucerne.Phenology.ThermalTimeAfterFlowering.Value()");
            double LeafWt= (double)zone.Get("Lucerne.Leaf.Wt");
            double NewLeaf= Math.Min(5,TtFlo*0.025);
            double LeafRemove= (LeafWt-NewLeaf)/LeafWt;
            double StemWt= (double)zone.Get("Lucerne.Stem.Wt");
            double NewStem= Math.Min(3,TtFlo*0.015);
            double StemRemove= (StemWt-NewStem)/StemWt;
            Remove.SetFractionToRemove("Leaf",LeafRemove*0.9);
            Remove.SetFractionToResidue("Leaf", LeafRemove*0.1);
            Remove.SetFractionToRemove("Stem", StemRemove*0.5);
            Remove.SetFractionToResidue("Stem",StemRemove*0.5);
            object LAIRemove= 1-Math.Min(0.1,TtFlo*0.0005);
            zone.Set("Lucerne.Leaf.Area.FractionRemovedOnCut",LAIRemove);*/
            Remove.SetPhenologyStage = 4;  
            Lucerne.RemoveBiomass("Cut", Remove);
            Rotation+=1;
            HarvestFlag= true;
            if (YearPassed)
            {Year+=1;
            Rotation=1;
            YearPassed=false;}

        }
    }
}
```
    Report: EventNames=[Clock].DoReport
      VariableNames:
        [Clock].Today
        /// Root and Canopy
        [Lucerne].Root.Depth as RootDepth
        [Lucerne].Leaf.Height as Height
        [Lucerne].Leaf.LAI as LAI
        [Lucerne].Leaf.CoverTotal as LightInterception
        [Lucerne].Leaf.ExtinctionCoefficient as k
        /// Water supply
        [Soil].SoilWater.SW as SW
        sum([Soil].SoilWater.SWmm) as SWC
        [Soil].SoilWater.WaterTable as WaterTable
        [Lucerne].Root.WaterUptake  as WaterUptake
        /// Demand
        ([Lucerne].Leaf.Transpiration + [Soil].SoilWater.Es) as ET
        [Lucerne].Leaf.WaterDemand as WaterDemand
        /// Biomass
        [Lucerne].AboveGround.Wt * 10 as Total.DM
        [Lucerne].BelowGround.Wt as BelowGroundBiomass
        /// Stress factors
        [Lucerne].Leaf.Fw as Fw
        /// Harvest indicator
        [Mower].Script.HarvestFlag as HarvestFlag
        [Mower].Script.Rotation as Rotation
        [Mower].Script.Year as GrowthSeason
        ([Mower].Script.Year + [Mower].Script.Rotation) as YearRotation
        [Lucerne].Root.RootFrontVelocity as RFV
        [Soil].Physical.LucerneSoil.KL as kl
  Folder NewZealand
    Experiment Iversen12
      DisabledSimNames=[Iversen12SowingDateSD4, Iversen12SowingDateSD5, Iversen12SowingDateSD6, Iversen12SowingDateSD8, Iversen12SowingDateSD7, Iversen12SowingDateSD10, Iversen12SowingDateSD9]
      Factors
        Factor SowingDate
          CompositeFactor SD1
            Specifications:
              [LucerneSowingRule].Script.SowingDate = 2010-10-04
              [Cutting]
              [Clock].StartDate = 2010-10-04
              [Soil]
              [Lucerne].Root.RootFrontVelocity.PreEmergence.Function.FixedValue = 15
              [Lucerne].Root.RootFrontVelocity.early.Function.FixedValue = 5
              [Lucerne].Root.RootFrontVelocity.late.Function.FixedValue = 5
            Operations Cutting
              2010-12-29  [Mower].Script.Cut();
              2011-02-09  [Mower].Script.Cut();
              2011-04-21  [Mower].Script.Cut();
              2011-06-20  [Mower].Script.Cut();
              2011-10-12  [Mower].Script.Cut();
              2011-11-18  [Mower].Script.Cut();
              2011-12-21  [Mower].Script.Cut();
              2012-01-27  [Mower].Script.Cut();
              2012-03-16  [Mower].Script.Cut();
              2012-05-02  [Mower].Script.Cut();
              2012-07-11  [Mower].Script.Cut();
            Soil: SoilType=Udic Haplustept (US), Pallic orthic brown soil (NZ); Site=Ashley Dene: Lincoln University Research Farm; NearestTown=Lincoln; Country=New Zealand; Latitude=999999; Longitude=999999
              Comments=Soil water characterised from NNM (2 years). Stone content and BD  from Di and Cameron 2002. Soil saturation from Cichota 2013.
              Chemical
                Thickness  NO3N  NH4N  PH
                200        31    8     6
                100        1.5   0.05  -
                100        1     0.03  -
                100        1     0.01  -
                100        1     0.01  -
                100        0.7   0.01  -
                100        0.5   0.01  -
                100        0.5   0.01  -
                100        0.5   0.01  -
                100        0.5   0.01  -
                100        0.5   0.01  -
                100        0.5   0.01  -
                100        0.5   0.01  -
                100        0.5   0.01  -
                100        0.5   0.01  -
                100        0.5   0.01  -
                100        0.5   0.01  -
                100        0.05  0.01  -
                100        0.05  0.01  -
                100        0.05  0.01  -
                100        0.05  0.01  -
                100        0     0     -
              Physical
                Thickness  BD    AirDry  LL15   DUL    SAT
                200        1.15  0.092   0.092  0.361  0.361
                100        1.15  0.138   0.138  0.358  0.358
                100        1.31  0.128   0.128  0.305  0.305
                100        1.31  0.108   0.108  0.288  0.288
                100        1.95  0.092   0.092  0.29   0.29
                100        1.95  0.09    0.09   0.3    0.3
                100        1.95  0.094   0.094  0.306  0.306
                100        1.95  0.113   0.113  0.323  0.323
                100        1.95  0.139   0.139  0.329  0.329
                100        1.95  0.126   0.126  0.322  0.322
                100        1.95  0.11    0.11   0.31   0.31
                100        1.95  0.094   0.094  0.293  0.293
                100        1.95  0.102   0.102  0.309  0.309
                100        1.95  0.11    0.11   0.341  0.341
                100        1.95  0.162   0.162  0.346  0.346
                100        1.95  0.213   0.213  0.353  0.353
                100        1.95  0.226   0.226  0.37   0.37
                100        1.95  0.249   0.249  0.379  0.379
                100        1.95  0.259   0.259  0.369  0.369
                100        1.95  0.269   0.269  0.37   0.37
                100        1.95  0.275   0.275  0.368  0.368
                100        1.95  0.281   0.281  0.368  0.368
                SoilCrop LucerneSoil
                  LL=[0.092, 0.138, 0.128, 0.108, 0.092, 0.09, 0.094, 0.113, 0.139, 0.126, 0.11, 0.094, 0.102, 0.11, 0.162, 0.213, 0.226, 0.249, 0.259, 0.269, 0.275, 0.281]
                  KL=[0.065, 0.005, 0.085, 0.11, 0.11, 0.11, 0.105, 0.105, 0.1, 0.01, 0.105, 0.11, 0.11, 0.11, 0.08, 0.005, 0.005, 0.005, 0.005, 0.005, 0.005, 0.005]
                  XF=[1, 1, 1, 1, 1, 1, 1, 1, 1, 1, 1, 1, 1, 1, 1, 1, 1, 1, 1, 1, 1, 1]
              WaterBalance SoilWater: SummerDate=1-Oct; SummerU=5; SummerCona=4.4; WinterDate=1-Mar; WinterU=5; WinterCona=2.5; DiffusConst=88; DiffusSlope=35.4; Salb=0.18; CN2Bare=68; CNRed=20; CNCov=0.8
                Thickness=[200, 100, 100, 100, 100, 100, 100, 100, 100, 100, 100, 100, 100, 100, 100, 100, 100, 100, 100, 100, 100, 100]
                SWCON=[0.99, 0.99, 0.99, 0.99, 0.99, 0.99, 0.99, 0.99, 0.99, 0.99, 0.99, 0.99, 0.99, 0.99, 0.99, 0.99, 0.99, 0.99, 0.99, 0.99, 0.99, 0.99]
              SoilNitrogen: fom_types=[default, manure, mucuna, lablab, shemp, stable]; fract_carb=[0.2, 0.3, 0.54, 0.57, 0.45, 0]; fract_cell=[0.7, 0.3, 0.37, 0.37, 0.47, 0.1]; fract_lign=[0.1, 0.4, 0.09, 0.06, 0.08, 0.9]
                SoilNitrogenNO3 NO3
                SoilNitrogenNH4 NH4
                SoilNitrogenUrea Urea
                SoilNitrogenPlantAvailableNO3 PlantAvailableNO3
                SoilNitrogenPlantAvailableNH4 PlantAvailableNH4
              Organic: FOMCNRatio=50
                Thickness  Carbon  SoilCNRatio  FBiom  FInert  FOM
                200        3.57    14.5         0.025  0.45    194.46
                100        1.47    14.5         0.025  0.6     170.68
                100        1.2     14.5         0.015  0.75    149.808
                100        1.03    14.5         0.01   0.9     131.489
                100        0.47    14.5         0.01   0.96    115.409
                100        0.47    14.5         0.01   0.96    101.296
                100        0.47    14.5         0.01   0.96    88.9093
                100        0.47    14.5         0.01   0.96    78.0369
                100        0.47    14.5         0.01   0.96    68.4941
                100        0.47    14.5         0.01   0.96    60.1182
                100        0.47    14.5         0.01   0.96    52.7666
                100        0.47    14.5         0.01   0.96    46.3139
                100        0.47    14.5         0.01   0.96    40.6504
                100        0.47    14.5         0.01   0.96    35.6794
                100        0.47    14.5         0.01   0.96    31.3163
                100        0.47    14.5         0.01   0.96    27.4867
                100        0.47    14.5         0.01   0.96    24.1255
                100        0.47    14.5         0.01   0.96    21.1753
                100        0.47    14.5         0.01   0.96    18.5858
                100        0.47    14.5         0.01   0.96    16.313
                100        0.47    14.5         0.01   0.96    14.3182
                100        0.47    14.5         0.01   0.96    12.5673
              Sample Initial nitrogen: SWUnits=Volumetric; OCUnits=Total; PHUnits=Water
                Thickness=[200, 100, 100, 100, 100, 100, 100, 100, 100, 100, 100, 100, 100, 100, 100, 100, 100, 100, 100, 100, 100, 100, -]
              CERESSoilTemperature
              Sample InitialConditions: SWUnits=Volumetric; OCUnits=Total; PHUnits=Water
                Thickness=[200, 100, 100, 100, 100, 100, 100, 100, 100, 100, 100, 100, 100, 100, 100, 100, 100, 100, 100, 100, 100, 100]
                SW=[0.244, 0.299, 0.274, 0.262, 0.27, 0.292, 0.306, 0.314, 0.297, 0.316, 0.309, 0.288, 0.303, 0.339, 0.343, 0.352, 0.365, 0.366, 0.363, 0.366, 0.358, 0.362]
          CompositeFactor SD2
            Specifications:
              [LucerneSowingRule].Script.SowingDate = 2010-11-04
              [Cutting]
              [Clock].StartDate = 2010-11-04
              [Soil]
              [Lucerne].Root.RootFrontVelocity.PreEmergence.Function.FixedValue = 5
              [Lucerne].Root.RootFrontVelocity.early.Function.FixedValue = 5
              [Lucerne].Root.RootFrontVelocity.late.Function.FixedValue = 5
            Operations Cutting
              2011-01-18  [Mower].Script.Cut();
              2011-03-11  [Mower].Script.Cut();
              2011-05-14  [Mower].Script.Cut();
              2011-06-20  [Mower].Script.Cut();
              2011-10-12  [Mower].Script.Cut();
              2011-11-18  [Mower].Script.Cut();
              2011-12-21  [Mower].Script.Cut();
              2012-01-27  [Mower].Script.Cut();
              2012-03-16  [Mower].Script.Cut();
              2012-05-02  [Mower].Script.Cut();
            Soil: SoilType=Udic Haplustept (US), Pallic orthic brown soil (NZ); Site=Ashley Dene: Lincoln University Research Farm; NearestTown=Lincoln; Country=New Zealand; Latitude=999999; Longitude=999999
              Comments=Soil water characterised from NNM (2 years). Stone content and BD  from Di and Cameron 2002. Soil saturation from Cichota 2013.
              Chemical
                Thickness  NO3N  NH4N
                200        31    8
                100        1.5   0.05
                100        1     0.03
                100        1     0.01
                100        1     0.01
                100        0.7   0.01
                100        0.5   0.01
                100        0.5   0.01
                100        0.5   0.01
                100        0.5   0.01
                100        0.5   0.01
                100        0.5   0.01
                100        0.5   0.01
                100        0.5   0.01
                100        0.5   0.01
                100        0.5   0.01
                100        0.5   0.01
                100        0.05  0.01
                100        0.05  0.01
                100        0.05  0.01
                100        0.05  0.01
                100        0     0
                PH=[6, -, -, -, -, -, -, -, -, -, -, -, -, -, -, -, -, -, -, -, -, -, -]
              Physical
                Thickness  BD    AirDry  LL15   DUL    SAT
                200        1.15  0.092   0.092  0.375  0.375
                100        1.15  0.143   0.143  0.366  0.366
                100        1.31  0.155   0.155  0.318  0.318
                100        1.31  0.142   0.142  0.292  0.292
                100        1.95  0.127   0.127  0.295  0.295
                100        1.95  0.133   0.133  0.303  0.303
                100        1.95  0.144   0.144  0.315  0.315
                100        1.95  0.133   0.133  0.327  0.327
                100        1.95  0.135   0.135  0.337  0.337
                100        1.95  0.145   0.145  0.336  0.336
                100        1.95  0.134   0.134  0.319  0.319
                100        1.95  0.124   0.124  0.31   0.31
                100        1.95  0.127   0.127  0.34   0.34
                100        1.95  0.131   0.131  0.341  0.341
                100        1.95  0.176   0.176  0.346  0.346
                100        1.95  0.22    0.22   0.36   0.36
                100        1.95  0.238   0.238  0.37   0.37
                100        1.95  0.256   0.256  0.375  0.375
                100        1.95  0.271   0.271  0.374  0.374
                100        1.95  0.286   0.286  0.364  0.364
                100        1.95  0.288   0.288  0.368  0.368
                100        1.95  0.29    0.29   0.368  0.368
                SoilCrop LucerneSoil
                  LL=[0.092, 0.143, 0.155, 0.142, 0.127, 0.133, 0.144, 0.133, 0.135, 0.145, 0.134, 0.124, 0.127, 0.131, 0.176, 0.22, 0.238, 0.256, 0.271, 0.286, 0.288, 0.29]
                  KL=[0.065, 0.105, 0.095, 0.11, 0.11, 0.11, 0.11, 0.105, 0.1, 0.06, 0.095, 0.105, 0.105, 0.1, 0.09, 0.005, 0.005, 0.005, 0.005, 0.005, 0.005, 0.005]
                  XF=[1, 1, 1, 1, 1, 1, 1, 1, 1, 1, 1, 1, 1, 1, 1, 1, 1, 1, 1, 1, 1, 1]
              WaterBalance SoilWater: same as NewZealand.Iversen12.Factors.SowingDate.SD1.Soil.SoilWater
              SoilNitrogen: same as NewZealand.Iversen12.Factors.SowingDate.SD1.Soil.SoilNitrogen
              Organic: same as NewZealand.Iversen12.Factors.SowingDate.SD1.Soil.Organic
              Sample Initial nitrogen: same as NewZealand.Iversen12.Factors.SowingDate.SD1.Soil.Initial nitrogen
              CERESSoilTemperature
              Sample InitialConditions: SWUnits=Volumetric; OCUnits=Total; PHUnits=Water
                Thickness=[200, 100, 100, 100, 100, 100, 100, 100, 100, 100, 100, 100, 100, 100, 100, 100, 100, 100, 100, 100, 100, 100]
                SW=[0.375, 0.189, 0.205, 0.206, 0.203, 0.241, 0.277, 0.302, 0.323, 0.326, 0.318, 0.307, 0.333, 0.339, 0.345, 0.353, 0.361, 0.37, 0.372, 0.355, 0.365, 0.355]
          CompositeFactor SD3
            Specifications:
              [LucerneSowingRule].Script.SowingDate = 2010-12-02
              [Cutting]
              [Clock].StartDate = 2010-12-02
              [Soil]
              [Lucerne].Root.RootFrontVelocity.PreEmergence.Function.FixedValue = 5
              [Lucerne].Root.RootFrontVelocity.early.Function.FixedValue = 5
              [Lucerne].Root.RootFrontVelocity.late.Function.FixedValue = 5
            Operations Cutting
              2011-02-16  [Mower].Script.Cut();
              2011-04-21  [Mower].Script.Cut();
              2011-06-20  [Mower].Script.Cut();
              2011-10-12  [Mower].Script.Cut();
              2011-11-18  [Mower].Script.Cut();
              2011-12-21  [Mower].Script.Cut();
              2012-01-27  [Mower].Script.Cut();
              2012-03-16  [Mower].Script.Cut();
              2012-05-02  [Mower].Script.Cut();
            Soil: SoilType=Udic Haplustept (US), Pallic orthic brown soil (NZ); Site=Ashley Dene: Lincoln University Research Farm; NearestTown=Lincoln; Country=New Zealand; Latitude=999999; Longitude=999999
              Comments=Soil water characterised from NNM (2 years). Stone content and BD  from Di and Cameron 2002. Soil saturation from Cichota 2013.
              Chemical: same as NewZealand.Iversen12.Factors.SowingDate.SD2.Soil.Chemical
              Physical
                Thickness  BD    AirDry  LL15   DUL    SAT
                200        1.15  0.107   0.107  0.368  0.368
                100        1.15  0.158   0.158  0.368  0.368
                100        1.31  0.166   0.166  0.327  0.327
                100        1.31  0.17    0.17   0.305  0.305
                100        1.95  0.173   0.173  0.311  0.311
                100        1.95  0.168   0.168  0.324  0.324
                100        1.95  0.159   0.159  0.335  0.335
                100        1.95  0.141   0.141  0.338  0.338
                100        1.95  0.122   0.122  0.319  0.319
                100        1.95  0.11    0.11   0.302  0.302
                100        1.95  0.1     0.1    0.277  0.277
                100        1.95  0.09    0.09   0.271  0.271
                100        1.95  0.132   0.132  0.289  0.289
                100        1.95  0.174   0.174  0.321  0.321
                100        1.95  0.159   0.159  0.34   0.34
                100        1.95  0.144   0.144  0.349  0.349
                100        1.95  0.192   0.192  0.373  0.373
                100        1.95  0.238   0.238  0.376  0.376
                100        1.95  0.261   0.261  0.38   0.38
                100        1.95  0.283   0.283  0.377  0.377
                100        1.95  0.282   0.282  0.352  0.352
                100        1.95  0.282   0.282  0.35   0.35
                SoilCrop LucerneSoil
                  LL=[0.107, 0.158, 0.166, 0.17, 0.173, 0.168, 0.159, 0.141, 0.122, 0.11, 0.1, 0.09, 0.132, 0.174, 0.159, 0.144, 0.192, 0.238, 0.261, 0.283, 0.282, 0.282]
                  KL=[0.055, 0.09, 0.105, 0.11, 0.11, 0.08, 0.045, 0.005, 0.06, 0.09, 0.11, 0.11, 0.11, 0.055, 0.03, 0.105, 0.005, 0.005, 0.005, 0.005, 0.005, 0.005]
                  XF=[1, 1, 1, 1, 1, 1, 1, 1, 1, 1, 1, 1, 1, 1, 1, 1, 1, 1, 1, 1, 1, 1]
              WaterBalance SoilWater: same as NewZealand.Iversen12.Factors.SowingDate.SD1.Soil.SoilWater
              SoilNitrogen: same as NewZealand.Iversen12.Factors.SowingDate.SD1.Soil.SoilNitrogen
              Organic: same as NewZealand.Iversen12.Factors.SowingDate.SD1.Soil.Organic
              Sample Initial nitrogen: same as NewZealand.Iversen12.Factors.SowingDate.SD1.Soil.Initial nitrogen
              CERESSoilTemperature
              Sample InitialConditions: SWUnits=Volumetric; OCUnits=Total; PHUnits=Water
                Thickness=[200, 100, 100, 100, 100, 100, 100, 100, 100, 100, 100, 100, 100, 100, 100, 100, 100, 100, 100, 100, 100, 100]
                SW=[0.233, 0.288, 0.268, 0.256, 0.269, 0.29, 0.305, 0.318, 0.298, 0.285, 0.274, 0.271, 0.288, 0.315, 0.34, 0.346, 0.368, 0.362, 0.366, 0.368, 0.341, 0.338]
          CompositeFactor SD4
            Specifications:
              [LucerneSowingRule].Script.SowingDate = 2011-01-10
              [Cutting]
              [Clock].StartDate = 2011-01-10
              [Soil]
            Operations Cutting
              2011-05-06  [Mower].Script.Cut();
              2011-06-20  [Mower].Script.Cut();
              2011-10-12  [Mower].Script.Cut();
              2011-11-18  [Mower].Script.Cut();
              2011-12-21  [Mower].Script.Cut();
              2012-01-27  [Mower].Script.Cut();
              2012-03-16  [Mower].Script.Cut();
              2012-05-02  [Mower].Script.Cut();
            Soil: SoilType=Udic Haplustept (US), Pallic orthic brown soil (NZ); Site=Ashley Dene: Lincoln University Research Farm; NearestTown=Lincoln; Country=New Zealand; Latitude=999999; Longitude=999999
              Comments=Soil water characterised from NNM (2 years). Stone content and BD  from Di and Cameron 2002. Soil saturation from Cichota 2013.
              Chemical: same as NewZealand.Iversen12.Factors.SowingDate.SD2.Soil.Chemical
              Physical
                Thickness  BD    AirDry  LL15   DUL    SAT
                200        1.15  0.158   0.158  0.37   0.37
                100        1.15  0.169   0.169  0.368  0.368
                100        1.31  0.15    0.15   0.314  0.314
                100        1.31  0.128   0.128  0.294  0.294
                100        1.95  0.12    0.12   0.297  0.297
                100        1.95  0.109   0.109  0.318  0.318
                100        1.95  0.106   0.106  0.322  0.322
                100        1.95  0.12    0.12   0.32   0.32
                100        1.95  0.104   0.104  0.3    0.3
                100        1.95  0.079   0.079  0.275  0.275
                100        1.95  0.086   0.086  0.264  0.264
                100        1.95  0.099   0.099  0.274  0.274
                100        1.95  0.121   0.121  0.295  0.295
                100        1.95  0.142   0.142  0.307  0.307
                100        1.95  0.167   0.167  0.324  0.324
                100        1.95  0.191   0.191  0.341  0.341
                100        1.95  0.2     0.2    0.338  0.338
                100        1.95  0.225   0.225  0.348  0.348
                100        1.95  0.258   0.258  0.368  0.368
                100        1.95  0.291   0.291  0.384  0.384
                100        1.95  0.289   0.289  0.381  0.381
                100        1.95  0.286   0.286  0.357  0.357
                SoilCrop LucerneSoil
                  LL=[0.158, 0.169, 0.15, 0.128, 0.12, 0.109, 0.106, 0.12, 0.104, 0.079, 0.086, 0.099, 0.121, 0.142, 0.167, 0.191, 0.2, 0.225, 0.258, 0.291, 0.289, 0.286]
                  KL=[0.045, 0.11, 0.105, 0.11, 0.11, 0.11, 0.105, 0.11, 0.105, 0.105, 0.11, 0.11, 0.11, 0.105, 0.06, 0.005, 0.11, 0.045, 0.005, 0.005, 0.005, 0.01]
                  XF=[1, 1, 1, 1, 1, 1, 1, 1, 1, 1, 1, 1, 1, 1, 1, 1, 1, 1, 1, 1, 1, 1]
              WaterBalance SoilWater: same as NewZealand.Iversen12.Factors.SowingDate.SD1.Soil.SoilWater
              SoilNitrogen: same as NewZealand.Iversen12.Factors.SowingDate.SD1.Soil.SoilNitrogen
              Organic: same as NewZealand.Iversen12.Factors.SowingDate.SD1.Soil.Organic
              Sample Initial nitrogen: same as NewZealand.Iversen12.Factors.SowingDate.SD1.Soil.Initial nitrogen
              CERESSoilTemperature
              Sample InitialConditions: SWUnits=Volumetric; OCUnits=Total; PHUnits=Water
                Thickness=[200, 100, 100, 100, 100, 100, 100, 100, 100, 100, 100, 100, 100, 100, 100, 100, 100, 100, 100, 100, 100, 100]
                SW=[0.261, 0.288, 0.247, 0.232, 0.231, 0.232, 0.249, 0.275, 0.272, 0.242, 0.227, 0.252, 0.295, 0.307, 0.324, 0.34, 0.331, 0.348, 0.368, 0.373, 0.372, 0.348]
          CompositeFactor SD5
            Specifications:
              [LucerneSowingRule].Script.SowingDate = 2011-02-07
              [Cutting]
              [Clock].StartDate = 2011-02-7
              [Soil]
            Operations Cutting
              2011-05-18  [Mower].Script.Cut();
              2011-06-20  [Mower].Script.Cut();
              2011-10-12  [Mower].Script.Cut();
              2011-11-18  [Mower].Script.Cut();
              2011-12-21  [Mower].Script.Cut();
              2012-01-27  [Mower].Script.Cut();
              2012-03-16  [Mower].Script.Cut();
              2012-05-02  [Mower].Script.Cut();
            Soil: SoilType=Udic Haplustept (US), Pallic orthic brown soil (NZ); Site=Ashley Dene: Lincoln University Research Farm; NearestTown=Lincoln; Country=New Zealand; Latitude=999999; Longitude=999999
              Comments=Soil water characterised from NNM (2 years). Stone content and BD  from Di and Cameron 2002. Soil saturation from Cichota 2013.
              Chemical: same as NewZealand.Iversen12.Factors.SowingDate.SD2.Soil.Chemical
              Physical
                Thickness  BD    AirDry  LL15   DUL    SAT
                200        1.15  0.154   0.154  0.369  0.369
                100        1.15  0.172   0.172  0.37   0.37
                100        1.31  0.176   0.176  0.326  0.326
                100        1.31  0.16    0.16   0.309  0.309
                100        1.95  0.13    0.13   0.307  0.307
                100        1.95  0.125   0.125  0.312  0.312
                100        1.95  0.114   0.114  0.308  0.308
                100        1.95  0.09    0.09   0.312  0.312
                100        1.95  0.091   0.091  0.314  0.314
                100        1.95  0.126   0.126  0.318  0.318
                100        1.95  0.115   0.115  0.312  0.312
                100        1.95  0.103   0.103  0.317  0.317
                100        1.95  0.138   0.138  0.303  0.303
                100        1.95  0.174   0.174  0.308  0.308
                100        1.95  0.181   0.181  0.329  0.329
                100        1.95  0.187   0.187  0.346  0.346
                100        1.95  0.18    0.18   0.334  0.334
                100        1.95  0.2     0.2    0.34   0.34
                100        1.95  0.227   0.227  0.361  0.361
                100        1.95  0.253   0.253  0.367  0.367
                100        1.95  0.268   0.268  0.356  0.356
                100        1.95  0.283   0.283  0.346  0.346
                SoilCrop LucerneSoil
                  LL=[0.154, 0.172, 0.176, 0.16, 0.13, 0.125, 0.114, 0.09, 0.091, 0.126, 0.115, 0.103, 0.138, 0.174, 0.181, 0.187, 0.18, 0.2, 0.227, 0.253, 0.268, 0.283]
                  KL=[0.065, 0.1, 0.105, 0.11, 0.11, 0.11, 0.11, 0.105, 0.1, 0.095, 0.11, 0.11, 0.11, 0.095, 0.1, 0.11, 0.105, 0.1, 0.085, 0.095, 0.005, 0.005]
                  XF=[1, 1, 1, 1, 1, 1, 1, 1, 1, 1, 1, 1, 1, 1, 1, 1, 1, 1, 1, 1, 1, 1]
              WaterBalance SoilWater: same as NewZealand.Iversen12.Factors.SowingDate.SD1.Soil.SoilWater
              SoilNitrogen: same as NewZealand.Iversen12.Factors.SowingDate.SD1.Soil.SoilNitrogen
              Organic: same as NewZealand.Iversen12.Factors.SowingDate.SD1.Soil.Organic
              Sample Initial nitrogen: same as NewZealand.Iversen12.Factors.SowingDate.SD1.Soil.Initial nitrogen
              CERESSoilTemperature
              Sample InitialConditions: SWUnits=Volumetric; OCUnits=Total; PHUnits=Water
                Thickness=[200, 100, 100, 100, 100, 100, 100, 100, 100, 100, 100, 100, 100, 100, 100, 100, 100, 100, 100, 100, 100, 100]
                SW=[0.197, 0.272, 0.256, 0.239, 0.226, 0.225, 0.245, 0.24, 0.225, 0.252, 0.266, 0.271, 0.25, 0.285, 0.32, 0.337, 0.332, 0.34, 0.361, 0.36, 0.355, 0.341]
          CompositeFactor SD6
            Specifications:
              [LucerneSowingRule].Script.SowingDate = 2011-10-10
              [Cutting]
              [Clock].StartDate = 2011-10-10
              [Soil]
            Operations Cutting
              2012-01-05  [Mower].Script.Cut();
              2012-02-22  [Mower].Script.Cut();
              2012-04-05  [Mower].Script.Cut();
              2012-06-21  [Mower].Script.Cut();
            Soil: SoilType=Udic Haplustept (US), Pallic orthic brown soil (NZ); Site=Ashley Dene: Lincoln University Research Farm; NearestTown=Lincoln; Country=New Zealand; Latitude=999999; Longitude=999999
              Comments=Soil water characterised from NNM (2 years). Stone content and BD  from Di and Cameron 2002. Soil saturation from Cichota 2013.
              Chemical: same as NewZealand.Iversen12.Factors.SowingDate.SD2.Soil.Chemical
              Physical
                Thickness  BD    AirDry  LL15   DUL    SAT
                200        1.15  0.116   0.116  0.37   0.37
                100        1.15  0.161   0.161  0.333  0.333
                100        1.31  0.168   0.168  0.309  0.309
                100        1.31  0.185   0.185  0.286  0.286
                100        1.95  0.174   0.174  0.28   0.28
                100        1.95  0.151   0.151  0.283  0.283
                100        1.95  0.152   0.152  0.295  0.295
                100        1.95  0.176   0.176  0.312  0.312
                100        1.95  0.176   0.176  0.316  0.316
                100        1.95  0.171   0.171  0.315  0.315
                100        1.95  0.204   0.204  0.32   0.32
                100        1.95  0.237   0.237  0.326  0.326
                100        1.95  0.226   0.226  0.337  0.337
                100        1.95  0.216   0.216  0.343  0.343
                100        1.95  0.237   0.237  0.344  0.344
                100        1.95  0.259   0.259  0.344  0.344
                100        1.95  0.262   0.262  0.359  0.359
                100        1.95  0.264   0.264  0.367  0.367
                100        1.95  0.29    0.29   0.38   0.38
                100        1.95  0.315   0.315  0.378  0.378
                100        1.95  0.313   0.313  0.373  0.373
                100        1.95  0.309   0.309  0.365  0.365
                SoilCrop LucerneSoil
                  LL=[0.116, 0.161, 0.168, 0.185, 0.174, 0.151, 0.152, 0.176, 0.176, 0.171, 0.204, 0.237, 0.226, 0.216, 0.237, 0.259, 0.262, 0.264, 0.29, 0.315, 0.313, 0.309]
                  KL=[0.05, 0.11, 0.105, 0.105, 0.11, 0.11, 0.11, 0.1, 0.105, 0.11, 0.105, 0.06, 0.11, 0.11, 0.105, 0.11, 0.11, 0.11, 0.105, 0.105, 0.11, 0.11]
                  XF=[1, 1, 1, 1, 1, 1, 1, 1, 1, 1, 1, 1, 1, 1, 1, 1, 1, 1, 1, 1, 1, 1]
              WaterBalance SoilWater: same as NewZealand.Iversen12.Factors.SowingDate.SD1.Soil.SoilWater
              SoilNitrogen: same as NewZealand.Iversen12.Factors.SowingDate.SD1.Soil.SoilNitrogen
              Organic: same as NewZealand.Iversen12.Factors.SowingDate.SD1.Soil.Organic
              Sample Initial nitrogen: same as NewZealand.Iversen12.Factors.SowingDate.SD1.Soil.Initial nitrogen
              CERESSoilTemperature
              Sample InitialConditions: SWUnits=Volumetric; OCUnits=Total; PHUnits=Water
                Thickness=[200, 100, 100, 100, 100, 100, 100, 100, 100, 100, 100, 100, 100, 100, 100, 100, 100, 100, 100, 100, 100, 100]
                SW=[0.257, 0.33, 0.305, 0.284, 0.277, 0.283, 0.295, 0.309, 0.313, 0.315, 0.319, 0.322, 0.336, 0.339, 0.342, 0.336, 0.355, 0.354, 0.37, 0.372, 0.366, 0.357]
          CompositeFactor SD7
            Specifications:
              [LucerneSowingRule].Script.SowingDate = 2011-11-07
              [Cutting]
              [Clock].StartDate = 2011-11-07
              [Soil]
            Operations Cutting
              2012-01-26  [Mower].Script.Cut();
              2012-03-13  [Mower].Script.Cut();
              2012-05-03  [Mower].Script.Cut();
            Soil: SoilType=Udic Haplustept (US), Pallic orthic brown soil (NZ); Site=Ashley Dene: Lincoln University Research Farm; NearestTown=Lincoln; Country=New Zealand; Latitude=999999; Longitude=999999
              Comments=Soil water characterised from NNM (2 years). Stone content and BD  from Di and Cameron 2002. Soil saturation from Cichota 2013.
              Chemical: same as NewZealand.Iversen12.Factors.SowingDate.SD2.Soil.Chemical
              Physical
                Thickness  BD    AirDry  LL15   DUL    SAT
                200        1.15  0.141   0.141  0.331  0.331
                100        1.15  0.171   0.171  0.356  0.356
                100        1.31  0.163   0.163  0.311  0.311
                100        1.31  0.156   0.156  0.3    0.3
                100        1.95  0.132   0.132  0.297  0.297
                100        1.95  0.134   0.134  0.293  0.293
                100        1.95  0.161   0.161  0.312  0.312
                100        1.95  0.177   0.177  0.316  0.316
                100        1.95  0.161   0.161  0.31   0.31
                100        1.95  0.161   0.161  0.31   0.31
                100        1.95  0.162   0.162  0.3    0.3
                100        1.95  0.161   0.161  0.286  0.286
                100        1.95  0.162   0.162  0.304  0.304
                100        1.95  0.163   0.163  0.322  0.322
                100        1.95  0.157   0.157  0.322  0.322
                100        1.95  0.152   0.152  0.35   0.35
                100        1.95  0.206   0.206  0.374  0.374
                100        1.95  0.258   0.258  0.364  0.364
                100        1.95  0.282   0.282  0.355  0.355
                100        1.95  0.302   0.302  0.358  0.358
                100        1.95  0.304   0.304  0.357  0.357
                100        1.95  0.305   0.305  0.345  0.345
                SoilCrop LucerneSoil
                  LL=[0.141, 0.171, 0.163, 0.156, 0.132, 0.134, 0.161, 0.177, 0.161, 0.161, 0.162, 0.161, 0.162, 0.163, 0.157, 0.152, 0.206, 0.258, 0.282, 0.302, 0.304, 0.305]
                  KL=[0.085, 0.09, 0.105, 0.11, 0.11, 0.105, 0.095, 0.005, 0.05, 0.105, 0.11, 0.11, 0.105, 0.105, 0.11, 0.11, 0.085, 0.005, 0.1, 0.105, 0.11, 0.11]
                  XF=[1, 1, 1, 1, 1, 1, 1, 1, 1, 1, 1, 1, 1, 1, 1, 1, 1, 1, 1, 1, 1, 1]
              WaterBalance SoilWater: same as NewZealand.Iversen12.Factors.SowingDate.SD1.Soil.SoilWater
              SoilNitrogen: same as NewZealand.Iversen12.Factors.SowingDate.SD1.Soil.SoilNitrogen
              Organic: same as NewZealand.Iversen12.Factors.SowingDate.SD1.Soil.Organic
              Sample Initial nitrogen: same as NewZealand.Iversen12.Factors.SowingDate.SD1.Soil.Initial nitrogen
              CERESSoilTemperature
              Sample InitialConditions: SWUnits=Volumetric; OCUnits=Total; PHUnits=Water
                Thickness=[200, 100, 100, 100, 100, 100, 100, 100, 100, 100, 100, 100, 100, 100, 100, 100, 100, 100, 100, 100, 100, 100]
                SW=[0.273, 0.335, 0.304, 0.286, 0.287, 0.289, 0.305, 0.313, 0.307, 0.308, 0.294, 0.284, 0.3, 0.319, 0.318, 0.348, 0.37, 0.36, 0.351, 0.353, 0.349, 0.343]
          CompositeFactor SD8
            Specifications:
              [LucerneSowingRule].Script.SowingDate = 2011-12-09
              [Cutting]
              [Clock].StartDate = 2011-12-09
              [Soil]
            Operations Cutting
              2012-02-28  [Mower].Script.Cut();
              2012-04-12  [Mower].Script.Cut();
            Soil: SoilType=Udic Haplustept (US), Pallic orthic brown soil (NZ); Site=Ashley Dene: Lincoln University Research Farm; NearestTown=Lincoln; Country=New Zealand; Latitude=999999; Longitude=999999
              Comments=Soil water characterised from NNM (2 years). Stone content and BD  from Di and Cameron 2002. Soil saturation from Cichota 2013.
              Chemical: same as NewZealand.Iversen12.Factors.SowingDate.SD2.Soil.Chemical
              Physical
                Thickness  BD    AirDry  LL15   DUL    SAT
                200        1.15  0.158   0.158  0.335  0.335
                100        1.15  0.181   0.181  0.313  0.313
                100        1.31  0.183   0.183  0.278  0.278
                100        1.31  0.164   0.164  0.257  0.257
                100        1.95  0.156   0.156  0.231  0.231
                100        1.95  0.18    0.18   0.239  0.239
                100        1.95  0.189   0.189  0.269  0.269
                100        1.95  0.193   0.193  0.275  0.275
                100        1.95  0.202   0.202  0.274  0.274
                100        1.95  0.191   0.191  0.286  0.286
                100        1.95  0.163   0.163  0.268  0.268
                100        1.95  0.134   0.134  0.235  0.235
                100        1.95  0.138   0.138  0.217  0.217
                100        1.95  0.142   0.142  0.236  0.236
                100        1.95  0.162   0.162  0.252  0.252
                100        1.95  0.207   0.207  0.264  0.264
                100        1.95  0.261   0.261  0.309  0.309
                100        1.95  0.311   0.311  0.36   0.36
                100        1.95  0.311   0.311  0.367  0.367
                100        1.95  0.311   0.311  0.358  0.358
                100        1.95  0.308   0.308  0.361  0.361
                100        1.95  0.31    0.31   0.356  0.356
                SoilCrop LucerneSoil
                  LL=[0.158, 0.181, 0.183, 0.164, 0.156, 0.18, 0.189, 0.193, 0.202, 0.191, 0.163, 0.134, 0.138, 0.142, 0.162, 0.207, 0.261, 0.311, 0.311, 0.311, 0.308, 0.31]
                  KL=[0.095, 0.065, 0.11, 0.11, 0.11, 0.02, 0.005, 0.005, 0.005, 0.005, 0.005, 0.075, 0.11, 0.11, 0.11, 0.085, 0.04, 0.08, 0.105, 0.11, 0.11, 0.11]
                  XF=[1, 1, 1, 1, 1, 1, 1, 1, 1, 1, 1, 1, 1, 1, 1, 1, 1, 1, 1, 1, 1, 1]
              WaterBalance SoilWater: same as NewZealand.Iversen12.Factors.SowingDate.SD1.Soil.SoilWater
              SoilNitrogen: same as NewZealand.Iversen12.Factors.SowingDate.SD1.Soil.SoilNitrogen
              Organic: same as NewZealand.Iversen12.Factors.SowingDate.SD1.Soil.Organic
              Sample Initial nitrogen: same as NewZealand.Iversen12.Factors.SowingDate.SD1.Soil.Initial nitrogen
              CERESSoilTemperature
              Sample InitialConditions: SWUnits=Volumetric; OCUnits=Total; PHUnits=Water
                Thickness=[200, 100, 100, 100, 100, 100, 100, 100, 100, 100, 100, 100, 100, 100, 100, 100, 100, 100, 100, 100, 100, 100]
                SW=[0.308, 0.223, 0.218, 0.209, 0.21, 0.239, 0.269, 0.275, 0.274, 0.28, 0.265, 0.23, 0.21, 0.23, 0.245, 0.263, 0.307, 0.357, 0.366, 0.357, 0.355, 0.355]
          CompositeFactor SD9
            Specifications:
              [LucerneSowingRule].Script.SowingDate = 2012-01-10
              [Cutting]
              [Clock].StartDate = 2012-01-10
              [Soil]
            Operations Cutting
              2012-04-26  [Mower].Script.Cut();
            Soil: SoilType=Udic Haplustept (US), Pallic orthic brown soil (NZ); Site=Ashley Dene: Lincoln University Research Farm; NearestTown=Lincoln; Country=New Zealand; Latitude=999999; Longitude=999999
              Comments=Soil water characterised from NNM (2 years). Stone content and BD  from Di and Cameron 2002. Soil saturation from Cichota 2013.
              Chemical: same as NewZealand.Iversen12.Factors.SowingDate.SD2.Soil.Chemical
              Physical
                Thickness  BD    AirDry  LL15   DUL    SAT
                200        1.15  0.193   0.193  0.342  0.342
                100        1.15  0.253   0.253  0.354  0.354
                100        1.31  0.223   0.223  0.306  0.306
                100        1.31  0.197   0.197  0.263  0.263
                100        1.95  0.184   0.184  0.242  0.242
                100        1.95  0.179   0.179  0.251  0.251
                100        1.95  0.194   0.194  0.263  0.263
                100        1.95  0.175   0.175  0.229  0.229
                100        1.95  0.182   0.182  0.223  0.223
                100        1.95  0.191   0.191  0.238  0.238
                100        1.95  0.183   0.183  0.236  0.236
                100        1.95  0.174   0.174  0.234  0.234
                100        1.95  0.189   0.189  0.24   0.24
                100        1.95  0.203   0.203  0.259  0.259
                100        1.95  0.238   0.238  0.3    0.3
                100        1.95  0.272   0.272  0.317  0.317
                100        1.95  0.287   0.287  0.348  0.348
                100        1.95  0.302   0.302  0.354  0.354
                100        1.95  0.307   0.307  0.351  0.351
                100        1.95  0.311   0.311  0.363  0.363
                100        1.95  0.309   0.309  0.365  0.365
                100        1.95  0.306   0.306  0.351  0.351
                SoilCrop LucerneSoil
                  LL=[0.193, 0.253, 0.223, 0.197, 0.184, 0.179, 0.194, 0.175, 0.182, 0.191, 0.183, 0.174, 0.189, 0.203, 0.238, 0.272, 0.287, 0.302, 0.307, 0.311, 0.309, 0.306]
                  KL=[0.06, 0.06, 0.049, 0.048, 0.055, 0.05, 0.048, 0.059, 0.076, 0.051, 0.094, 0.069, 0.033, 0.03, 0.043, 0.043, 0.056, 0.061, 0.03, 0.03, 0.03, 0.03]
                  XF=[1, 1, 1, 1, 1, 1, 1, 1, 1, 1, 1, 1, 1, 1, 1, 1, 1, 1, 1, 1, 1, 1]
              WaterBalance SoilWater: same as NewZealand.Iversen12.Factors.SowingDate.SD1.Soil.SoilWater
              SoilNitrogen: same as NewZealand.Iversen12.Factors.SowingDate.SD1.Soil.SoilNitrogen
              Organic: same as NewZealand.Iversen12.Factors.SowingDate.SD1.Soil.Organic
              Sample Initial nitrogen: same as NewZealand.Iversen12.Factors.SowingDate.SD1.Soil.Initial nitrogen
              CERESSoilTemperature
              Sample InitialConditions: SWUnits=Volumetric; OCUnits=Total; PHUnits=Water
                Thickness=[200, 100, 100, 100, 100, 100, 100, 100, 100, 100, 100, 100, 100, 100, 100, 100, 100, 100, 100, 100, 100, 100]
                SW=[0.246, 0.342, 0.296, 0.259, 0.24, 0.25, 0.257, 0.228, 0.22, 0.236, 0.232, 0.23, 0.236, 0.254, 0.289, 0.314, 0.347, 0.352, 0.351, 0.359, 0.359, 0.348]
          CompositeFactor SD10
            Specifications:
              [LucerneSowingRule].Script.SowingDate = 2012-02-17
              [Cutting]
              [Clock].StartDate = 2012-02-17
              [Soil]
            Operations Cutting
            Soil: SoilType=Udic Haplustept (US), Pallic orthic brown soil (NZ); Site=Ashley Dene: Lincoln University Research Farm; NearestTown=Lincoln; Country=New Zealand; Latitude=999999; Longitude=999999
              Comments=Soil water characterised from NNM (2 years). Stone content and BD  from Di and Cameron 2002. Soil saturation from Cichota 2013.
              Chemical: same as NewZealand.Iversen12.Factors.SowingDate.SD2.Soil.Chemical
              Physical
                Thickness  BD    AirDry  LL15   DUL    SAT
                200        1.15  0.226   0.226  0.351  0.351
                100        1.15  0.27    0.27   0.327  0.327
                100        1.31  0.24    0.24   0.296  0.296
                100        1.31  0.213   0.213  0.272  0.272
                100        1.95  0.2     0.2    0.257  0.257
                100        1.95  0.206   0.206  0.243  0.243
                100        1.95  0.21    0.21   0.236  0.236
                100        1.95  0.207   0.207  0.233  0.233
                100        1.95  0.202   0.202  0.226  0.226
                100        1.95  0.208   0.208  0.226  0.226
                100        1.95  0.213   0.213  0.23   0.23
                100        1.95  0.215   0.215  0.235  0.235
                100        1.95  0.194   0.194  0.225  0.225
                100        1.95  0.172   0.172  0.204  0.204
                100        1.95  0.208   0.208  0.22   0.22
                100        1.95  0.235   0.235  0.249  0.249
                100        1.95  0.261   0.261  0.277  0.277
                100        1.95  0.28    0.28   0.29   0.29
                100        1.95  0.291   0.291  0.306  0.306
                100        1.95  0.299   0.299  0.314  0.314
                100        1.95  0.3     0.3    0.318  0.318
                100        1.95  0.299   0.299  0.316  0.316
                SoilCrop LucerneSoil
                  LL=[0.226, 0.27, 0.24, 0.213, 0.2, 0.206, 0.21, 0.207, 0.202, 0.208, 0.213, 0.215, 0.194, 0.172, 0.208, 0.235, 0.261, 0.28, 0.291, 0.299, 0.3, 0.299]
                  XF=[1, 1, 1, 1, 1, 1, 1, 1, 1, 1, 1, 1, 1, 1, 1, 1, 1, 1, 1, 1, 1, 1]
              WaterBalance SoilWater: same as NewZealand.Iversen12.Factors.SowingDate.SD1.Soil.SoilWater
              SoilNitrogen: same as NewZealand.Iversen12.Factors.SowingDate.SD1.Soil.SoilNitrogen
              Organic: same as NewZealand.Iversen12.Factors.SowingDate.SD1.Soil.Organic
              Sample Initial nitrogen: same as NewZealand.Iversen12.Factors.SowingDate.SD1.Soil.Initial nitrogen
              CERESSoilTemperature
              Sample InitialConditions: SWUnits=Volumetric; OCUnits=Total; PHUnits=Water
                Thickness=[200, 100, 100, 100, 100, 100, 100, 100, 100, 100, 100, 100, 100, 100, 100, 100, 100, 100, 100, 100, 100, 100]
                SW=[0.248, 0.327, 0.284, 0.255, 0.244, 0.239, 0.236, 0.233, 0.226, 0.224, 0.228, 0.234, 0.223, 0.2, 0.211, 0.237, 0.267, 0.289, 0.306, 0.314, 0.318, 0.316]
      Simulation Iversen12
        Clock: Start=2010-09-27; End=2012-07-12
        Summary summaryfile
        Weather: FileName=C:\Data\Master\01raw-data\ClimateAndObserved\Iversen12.met
        SoilArbitrator Soil Arbitrator
        Zone paddock: Area=1; Slope=0; AspectAngle=0; Altitude=50
          MicroClimate: a_interception=0; b_interception=1; c_interception=0; d_interception=0; soil_albedo=0.23; SoilHeatFluxFraction=0.4; MinimumHeightDiffForNewLayer=0; NightInterceptionFraction=0.5; ReferenceHeight=2
          Irrigation
          Fertiliser
          Manager DiagnosticsVariables
```csharp
using APSIM.Shared.Utilities;
using System.Xml.Serialization;
using Models;
using Models.PMF;
using Models.Soils;
using System.Text;
using System.Collections.Generic;
using Models.Core;
using System;
using Models.Interfaces;
namespace Models
{
    [Serializable] 
    public class Script : Model
    {
        [Link] private Clock Clock;
        [Link] private Weather Met;
        [Link] private Fertiliser Fert;
        [Link] private Irrigation Irrig;
        [Link] private Plant Lucerne;
        [Link] private Zone zone;
        [Link(ByName = true)]
        private ISolute Urea;
        [Link(ByName = true)]
        private ISolute NO3;
        [Link(ByName = true)]
        private ISolute NH4;
        [Link(ByName = true)]
        private SoilNitrogen SoilNitrogen;
        [Link] Soils.Soil Soil;
        [Link] Models.Surface.SurfaceOrganicMatter SOM;
                    
        [XmlIgnore] public bool InitialDay { get; set; }
        
        [XmlIgnore] public double AccumPlantN { get; set; }
        [XmlIgnore] public double AccumMineralisation { get; set; }
        [XmlIgnore] public double AccumDenit { get; set; }
        [XmlIgnore] public double AccumFert { get; set; }
        [XmlIgnore] public double AccumLeach { get; set; }
        [XmlIgnore] public double AccumDetach { get; set; }
        [XmlIgnore] public double DeltaSoilOMN { get; set; }
        [XmlIgnore] public double DeltaSurfaceOMN { get; set; }
        [XmlIgnore] public double DeltaSoilMineralN { get; set; }
        [XmlIgnore] public double SoilNitrogenContent { get; set; }
        
        [XmlIgnore] public double AccumEO { get; set; }
        [XmlIgnore] public double AccumEP { get; set; }
        [XmlIgnore] public double AccumES { get; set; }
        [XmlIgnore] public double AccumDrainage { get; set; }
        [XmlIgnore] public double AccumRunoff { get; set; }
        [XmlIgnore] public double AccumOutflowLat { get; set; }
        [XmlIgnore] public double AccumIrrigation { get; set; }
        [XmlIgnore] public double AccumRainfall { get; set; }
        [XmlIgnore] public double SoilWaterDeficit { get; set; }
    
        [XmlIgnore] public double  InitialSoilOMN { get; set; }
        [XmlIgnore] public double  InitialSurfaceOMN { get; set; }
        [XmlIgnore] public double  InitialMineralN { get; set; }
        
        [XmlIgnore] public double SWC { get; set; }
        [XmlIgnore] public double DUL { get; set; }
        [XmlIgnore] public double OutFlowLat { get; set; }

        [XmlIgnore] public double FomN { get; set; }
        [XmlIgnore] public double BiomN { get; set; }
        [XmlIgnore] public double HumN { get; set; }
        [XmlIgnore] public double OrganicN { get; set; }
        [XmlIgnore] public double NO3N { get; set; }
        [XmlIgnore] public double NH4N { get; set; }
        [XmlIgnore] public double UreaN { get; set; }
        [XmlIgnore] public double MineralN { get; set; }
        [XmlIgnore] public double DltNMinRes { get; set; }
        [XmlIgnore] public double DltNMinTot { get; set; }
        
        [EventSubscribe("StartOfSimulation")]
        private void OnSimulationCommencing(object sender, EventArgs e)
        {
            InitialDay = true;
        }
        
        [EventSubscribe("DoManagement")]
        private void OnDoManagement(object sender, EventArgs e)
        {
            //!!!!!! Nitrogen balance components !!!!!!
            //!!!!!!^^^^^^^^^^^^^^^^^^^^^^^^^^^^^!!!!!!
            FomN = MathUtilities.Sum(SoilNitrogen.FOMN);
            HumN = MathUtilities.Sum(SoilNitrogen.HumicN);
            BiomN = MathUtilities.Sum(SoilNitrogen.MicrobialN);
            OrganicN = FomN + HumN + BiomN;
            NO3N = MathUtilities.Sum(NO3.kgha);
            NH4N = MathUtilities.Sum(NH4.kgha);
            UreaN = MathUtilities.Sum(Urea.kgha);
            MineralN = NO3N + NH4N + UreaN; 
            DltNMinRes = MathUtilities.Sum(SoilNitrogen.dlt_n_min_res);
            DltNMinTot = MathUtilities.Sum(SoilNitrogen.MineralisedN);
            int layers = Soil.Thickness.Length;
            if (InitialDay == true)
            {
                InitialSurfaceOMN = SOM.N;
                InitialSoilOMN = OrganicN;
                InitialMineralN = MineralN;
                InitialDay = false;
            }
            AccumFert += Fert.NitrogenApplied;
            DeltaSurfaceOMN = SOM.N - InitialSurfaceOMN;
            AccumLeach = AccumLeach - Soil.SoilWater.LeachNH4 - Soil.SoilWater.LeachNO3 - Soil.SoilWater.LeachUrea; //Fails
            AccumMineralisation += MathUtilities.Sum(SoilNitrogen.MineralisedN);
            AccumDenit -= MathUtilities.Sum(SoilNitrogen.Denitrification);
            AccumPlantN -= (double)zone.Get("Lucerne.Root.NUptake");
            DeltaSoilOMN = OrganicN - InitialSoilOMN;
            DeltaSoilMineralN = MineralN - InitialMineralN;
            SoilNitrogenContent = MineralN;
            
            //!!!!!! Water balance components !!!!!!
            //!!!!!!^^^^^^^^^^^^^^^^^^^^^^^^^^!!!!!!

            AccumIrrigation += Irrig.IrrigationApplied;
            AccumRainfall += Met.Rain;
            //AccumEP -= (double)zone.Get("[Lucerne].Leaf.Transpiration");
            AccumEP -= (double)zone.Get("Lucerne.Root.WaterUptake");
            SoilWaterDeficit = (SWC - DUL);
            double OutFlowLat = MathUtilities.Sum(Soil.SoilWater.LateralOutflow);
            AccumOutflowLat -= OutFlowLat;
        }
        
        [EventSubscribe("DoManagementCalculations")]
        private void OnDoManagementCalculations(object sender, EventArgs e)
        {
            FomN = MathUtilities.Sum(SoilNitrogen.FOMN);
            HumN = MathUtilities.Sum(SoilNitrogen.HumicN);
            BiomN = MathUtilities.Sum(SoilNitrogen.MicrobialN);
            
            
            AccumEO -= Soil.SoilWater.Eo;
            AccumES -= Soil.SoilWater.Es; 
            AccumDrainage -= Soil.SoilWater.Drainage;
            AccumRunoff -= Soil.SoilWater.Runoff;
            SWC = MathUtilities.Sum(Soil.SoilWater.SWmm);
            DUL = MathUtilities.Sum(Soil.DULmm);
        }
    }
}
```
          SurfaceOrganicMatter surface organic matter: InitialResidueName=wheat; InitialResidueType=wheat; InitialResidueMass=0; InitialStandingFraction=0; InitialCPR=0; InitialCNR=80
          Report: EventNames=[Clock].DoReport
            VariableNames:
              [Clock].Today
              [DiagnosticsVariables].Script.AccumPlantN
              [DiagnosticsVariables].Script.AccumMineralisation
              [DiagnosticsVariables].Script.AccumDenit
              [DiagnosticsVariables].Script.AccumFert
              [DiagnosticsVariables].Script.AccumLeach
              [DiagnosticsVariables].Script.AccumDetach
              [DiagnosticsVariables].Script.DeltaSoilOMN
              [DiagnosticsVariables].Script.DeltaSurfaceOMN
              [DiagnosticsVariables].Script.DeltaSoilMineralN
              [Lucerne].Root.NSupply
              [Soil].SoilWater.Eo
              [Soil].SoilWater.Es
              [DiagnosticsVariables].Script.SWC
              [DiagnosticsVariables].Script.DUL
              [Soil].SoilWater.Drainage
              [Soil].SoilWater.Runoff
              [DiagnosticsVariables].Script.OutFlowLat
              [Soil].SoilWater.pond
              [DiagnosticsVariables].Script.AccumEO
              [DiagnosticsVariables].Script.AccumEP
              [DiagnosticsVariables].Script.AccumES
              [DiagnosticsVariables].Script.AccumDrainage
              [DiagnosticsVariables].Script.AccumRunoff
              [DiagnosticsVariables].Script.AccumRainfall
              [DiagnosticsVariables].Script.AccumIrrigation
              [DiagnosticsVariables].Script.AccumOutflowLat
              [DiagnosticsVariables].Script.SoilWaterDeficit
              [Lucerne].Grain.Live.Wt
              [Lucerne].Shell.Live.Wt
              [Lucerne].Stem.Live.Wt
              [Lucerne].Stem.Live.Wt
              [Lucerne].Grain.Live.N
              [Lucerne].Shell.Live.N
              [Lucerne].Leaf.Live.Wt
              [Lucerne].Root.Live.Wt
              [Lucerne].Leaf.Live.N
              [Lucerne].Root.Live.N
              [Lucerne].Leaf.Live.NConc
              [Lucerne].Root.Live.NConc
              [Lucerne].Root.WaterSupply
              [Lucerne].Root.WaterUptake
              [Lucerne].Leaf.Transpiration
              [Lucerne].Leaf.WaterDemand
              [Lucerne].Root.Depth
              [Lucerne].Leaf.CoverTotal
              [Lucerne].Leaf.CoverDead
              [Lucerne].Leaf.LAI
              [Lucerne].Leaf.Height
              [Soil].SoilWater.SWmm
              [Soil].SoilNitrogen.NO3.kgha
              [DiagnosticsVariables].Script.SoilNitrogenContent
              [Lucerne].Arbitrator.N.TotalPlantDemand
              [DiagnosticsVariables].Script.FomN
              [DiagnosticsVariables].Script.HumN
              [DiagnosticsVariables].Script.BiomN
              [DiagnosticsVariables].Script.DltNMinRes
              [DiagnosticsVariables].Script.DltNMinTot
              [Lucerne].Leaf.Fw
              [Lucerne].Leaf.Fn
              [Lucerne].Phenology.CurrentPhaseName
              [Lucerne].Phenology.CurrentStageName
              [Lucerne].Phenology.Stage
              [Lucerne].Pod.Wt
              [Lucerne].Pod.N
              [Lucerne].AboveGround.Wt *10 as shootbiomass
              [Lucerne].Shell.PodNumber
              [Lucerne].Leaf.LAIFunction
              [Soil].Physical.LucerneSoil.KL
          Manager LucerneSowingRule
            RowSpacing = 150
            SowingDepth = 20
            SowingRate = 300
            CultivarName = Kaituna
            SowingDate = 10/24/2000 00:00:00
```csharp
using APSIM.Shared.Utilities;
using Models.PMF;
using Models.Core;
using System;
        
namespace Models
{
    [Serializable] 
    [System.Xml.Serialization.XmlInclude(typeof(Model))]
    public class Script : Model
    {
        [Link] Plant Lucerne;
        [Link] Clock Clock;

        [Description("Spacing (mm) between rows")]
        public double RowSpacing { get; set; }
        [Description("Depth (mm) Grains are planted")]
        public double SowingDepth { get; set; }
        [Description("Seeds sown (/m2)")]
        public double SowingRate { get; set; }
        [Description("Cultivar")]
        [Display(Type=DisplayType.CultivarName)]
        public string CultivarName { get; set; }
        [Description("Sowing Date")]
        public DateTime SowingDate { get; set; }

        [EventSubscribe("DoManagement")]
        private void OnDoManagement(object sender, EventArgs e)
        {
            if (Clock.Today.Date == SowingDate)
                Lucerne.Sow(population: SowingRate, cultivar: CultivarName, depth: SowingDepth, rowSpacing: RowSpacing, budNumber: 1);
            //Lucerne.Sow(... Contains the following arguements:
            //Population  double  Required  Seeds sowing/m2
            //Cultivar    string  Required  "NameOfCultivar"
            //Depth       double  Optional  Depth (mm) seed sown.   Default is 100mm 
            //MaxCover    double  Optional  Proportion (0-1) of the ground row crop will cover.   Default is 1.0
            //BudNumber   double  Optional  Number of mainstems per seed sown.  Default is 1.0
            //RowSpacing  double  Optional  Spaceing (mm) between drill rows when crop is sown.  Default is 150mm
            //CropClass   string  Optional  Crop class to instantiate when crop is sown.  Default is "Plant"
        }
    }
}
```
          Operations IrrigationEvents
          Plant Lucerne
          Manager Mower
```csharp
using System.Xml.Serialization;
using Models.PMF.Interfaces;
using Models.PMF;
using Models.Core;
using System.Collections.Generic;
using System;

namespace Models
{
    [Serializable] 
    [System.Xml.Serialization.XmlInclude(typeof(Model))]
    public class Script : Model
    {
        [Link] Plant Lucerne;
        
        [XmlIgnore] private RemovalFractions Remove { get; set; }
        
        [EventSubscribe("StartOfSimulation")]
        private void OnSimulationCommencing(object sender, EventArgs e)
        {
            Remove = new RemovalFractions();
        }
        
        public void Cut()
        {
            Remove.SetPhenologyStage = 4;
            Lucerne.RemoveBiomass("Cut", Remove);
        }
    }
}
```
          Operations Cutting
          Soil: Latitude=0; Longitude=0
            Chemical
              Thickness  NO3N     NH4N  PH
              100        172.222  0     6.6
              200        11.9048  0     6.2
              300        1.15741  0     5.7
              300        1.06157  0     5.5
              300        0        0     5.5
              300        0        0     5.5
            InitialWater Initial water: PercentMethod=1; FractionFull=0.998443
            Physical
              Thickness  BD    AirDry  LL15   DUL   SAT
              100        1.26  0.05    0.075  0.35  0.38
              100        1.26  0.06    0.078  0.35  0.38
              100        1.26  0.07    0.07   0.32  0.39
              100        1.44  0.07    0.07   0.29  0.32
              100        1.44  0.069   0.07   0.27  0.3
              100        1.44  0.07    0.07   0.31  0.32
              100        1.57  0.07    0.07   0.33  0.34
              100        1.57  0.07    0.07   0.35  0.35
              100        1.57  0.07    0.07   0.34  0.35
              100        1.58  0.07    0.07   0.34  0.35
              100        1.58  0.07    0.07   0.34  0.35
              100        1.58  0.07    0.07   0.34  0.35
              100        1.58  0.08    0.08   0.34  0.35
              100        1.59  0.078   0.08   0.33  0.35
              100        1.59  0.08    0.08   0.33  0.35
              100        1.59  0.087   0.09   0.32  0.34
              100        1.59  0.09    0.09   0.3   0.33
              100        1.59  0.09    0.09   0.3   0.33
              100        1.59  0.09    0.09   0.3   0.33
              100        1.59  0.08    0.08   0.31  0.33
              100        1.59  0.09    0.09   0.31  0.33
              100        1.59  0.09    0.09   0.32  0.34
              100        1.59  0.09    0.09   0.35  0.38
              SoilCrop LucerneSoil
                LL=[0.1, 0.13, 0.12, 0.12, 0.11, 0.08, 0.08, 0.08, 0.09, 0.11, 0.12, 0.15, 0.15, 0.15, 0.16, 0.2, 0.25, 0.25, 0.25, 0.25, 0.23, 0.15, 0.15]
                KL=[0.06, 0.06, 0.03, 0.03, 0.03, 0.03, 0.03, 0.03, 0.03, 0.03, 0.03, 0.03, 0.03, 0.03, 0.03, 0.03, 0.03, 0.03, 0.03, 0.03, 0.03, 0.03, 0.03]
                XF=[1, 1, 1, 1, 1, 1, 1, 1, 1, 1, 1, 1, 1, 1, 1, 1, 1, 1, 1, 1, 1, 1, 1]
            WaterBalance SoilWater: SummerDate=1-Oct; SummerU=6; SummerCona=3; WinterDate=1-Mar; WinterU=5; WinterCona=2.5; DiffusConst=189; DiffusSlope=21; Salb=0.13; CN2Bare=0; CNRed=0; CNCov=0.8; Thickness=[100, 200, 300, 300, 300, 300]; SWCON=[0.55, 0.55, 0.55, 0.55, 0.55, 0.55]
            SoilNitrogen: same as NewZealand.Iversen12.Factors.SowingDate.SD1.Soil.SoilNitrogen
            Organic: FOMCNRatio=30
              Thickness  Carbon  SoilCNRatio  FBiom  FInert  FOM
              100        1.82    11.5         0.025  0.3     1243.93
              200        1.47    11.5         0.025  0.4     833.832
              300        1.2     11.5         0.015  0.75    457.617
              300        1.03    11.5         0.01   0.9     251.145
              300        0.47    11.5         0.01   0.96    137.831
              300        0.47    11.5         0.01   0.96    75.6435
            Sample: Thickness=[100, 200, 300, 300, 300, 300]; SWUnits=Volumetric; OCUnits=Total; PHUnits=Water
            CERESSoilTemperature
    Experiment AshleyDene (disabled)
      DisabledSimNames=[AshleyDeneSowingDateSD6, AshleyDeneSowingDateSD7, AshleyDeneSowingDateSD8, AshleyDeneSowingDateSD10, AshleyDeneSowingDateSD9]
      Factors
        Factor SowingDate
          CompositeFactor SD1
            Specifications:
              [LucerneSowingRule].Script.SowingDate = 2010-10-21
              [Cutting]
              [Clock].StartDate = 2010-10-21
              [Soil]
            Operations Cutting
              2011-01-25  [Mower].Script.Cut();
              2011-04-08  [Mower].Script.Cut();
              2011-06-20  [Mower].Script.Cut();
              2011-11-03  [Mower].Script.Cut();
              2011-12-23  [Mower].Script.Cut();
              2012-03-04  [Mower].Script.Cut();
              2012-04-25  [Mower].Script.Cut();
            Soil: SoilType=Udic Haplustept (US), Pallic orthic brown soil (NZ); Site=Ashley Dene: Lincoln University Research Farm; NearestTown=Lincoln; Country=New Zealand; Latitude=999999; Longitude=999999
              Comments=Soil water characterised from NNM (2 years). Stone content and BD  from Di and Cameron 2002. Soil saturation from Cichota 2013.
              Chemical
                Thickness  NO3N  NH4N
                200        31    8
                100        1.5   0.05
                100        1     0.03
                100        1     0.01
                100        1     0.01
                100        0.7   0.01
                100        0.5   0.01
                100        0.5   0.01
                100        0.5   0.01
                100        0.5   0.01
                100        0.5   0.01
                100        0.5   0.01
                100        0.5   0.01
                100        0.5   0.01
                100        0.5   0.01
                100        0.5   0.01
                100        0.5   0.01
                100        0.05  0.01
                100        0.05  0.01
                100        0.05  0.01
                100        0.05  0.01
                100        0     0
                PH=[6, -, -, -, -, -, -, -, -, -, -, -, -, -, -, -, -, -, -, -, -, -, -]
              Physical
                Thickness  BD    AirDry  LL15   DUL    SAT
                200        1.15  0.063   0.063  0.27   0.27
                100        1.15  0.08    0.08   0.194  0.194
                100        1.31  0.074   0.074  0.158  0.158
                100        1.31  0.076   0.076  0.135  0.135
                100        1.95  0.069   0.069  0.118  0.118
                100        1.95  0.07    0.07   0.114  0.114
                100        1.95  0.07    0.07   0.111  0.111
                100        1.95  0.07    0.07   0.115  0.115
                100        1.95  0.069   0.069  0.115  0.115
                100        1.95  0.07    0.07   0.11   0.11
                100        1.95  0.073   0.073  0.106  0.106
                100        1.95  0.079   0.079  0.116  0.116
                100        1.95  0.084   0.084  0.114  0.114
                100        1.95  0.086   0.086  0.13   0.13
                100        1.95  0.092   0.092  0.138  0.138
                100        1.95  0.096   0.096  0.134  0.134
                100        1.95  0.094   0.094  0.126  0.126
                100        1.95  0.095   0.095  0.128  0.128
                100        1.95  0.095   0.095  0.122  0.122
                100        1.95  0.095   0.095  0.116  0.116
                100        1.95  0.098   0.098  0.128  0.128
                100        1.95  0.1     0.1    0.147  0.147
                SoilCrop LucerneSoil
                  LL=[0.063, 0.08, 0.074, 0.076, 0.069, 0.07, 0.07, 0.07, 0.069, 0.07, 0.073, 0.079, 0.084, 0.086, 0.092, 0.096, 0.094, 0.095, 0.095, 0.095, 0.098, 0.1]
                  KL=[0.055, 0.1, 0.11, 0.11, 0.11, 0.11, 0.105, 0.075, 0.11, 0.085, 0.105, 0.04, 0.045, 0.035, 0.03, 0.025, 0.04, 0.105, 0.1, 0.065, 0.055, 0.11]
                  XF=[1, 1, 1, 1, 1, 1, 1, 1, 1, 1, 1, 1, 1, 1, 1, 1, 1, 1, 1, 1, 1, 1]
              WaterBalance SoilWater: SummerDate=1-Oct; SummerU=5; SummerCona=4.4; WinterDate=1-Mar; WinterU=5; WinterCona=2.5; DiffusConst=88; DiffusSlope=35.4; Salb=0.18; CN2Bare=68; CNRed=20; CNCov=0.8
                Thickness=[200, 100, 100, 100, 100, 100, 100, 100, 100, 100, 100, 100, 100, 100, 100, 100, 100, 100, 100, 100, 100, 100]
                SWCON=[0.99, 0.99, 0.99, 0.99, 0.99, 0.99, 0.99, 0.99, 0.99, 0.99, 0.99, 0.99, 0.99, 0.99, 0.99, 0.99, 0.99, 0.99, 0.99, 0.99, 0.99, 0.99]
              SoilNitrogen: fom_types=[default, manure, mucuna, lablab, shemp, stable]; fract_carb=[0.2, 0.3, 0.54, 0.57, 0.45, 0]; fract_cell=[0.7, 0.3, 0.37, 0.37, 0.47, 0.1]; fract_lign=[0.1, 0.4, 0.09, 0.06, 0.08, 0.9]
                SoilNitrogenNO3 NO3
                SoilNitrogenNH4 NH4
                SoilNitrogenUrea Urea
                SoilNitrogenPlantAvailableNO3 PlantAvailableNO3
                SoilNitrogenPlantAvailableNH4 PlantAvailableNH4
              Organic: FOMCNRatio=50
                Thickness  Carbon  SoilCNRatio  FBiom  FInert  FOM
                200        3.57    14.5         0.025  0.45    194.46
                100        1.47    14.5         0.025  0.6     170.68
                100        1.2     14.5         0.015  0.75    149.808
                100        1.03    14.5         0.01   0.9     131.489
                100        0.47    14.5         0.01   0.96    115.409
                100        0.47    14.5         0.01   0.96    101.296
                100        0.47    14.5         0.01   0.96    88.9093
                100        0.47    14.5         0.01   0.96    78.0369
                100        0.47    14.5         0.01   0.96    68.4941
                100        0.47    14.5         0.01   0.96    60.1182
                100        0.47    14.5         0.01   0.96    52.7666
                100        0.47    14.5         0.01   0.96    46.3139
                100        0.47    14.5         0.01   0.96    40.6504
                100        0.47    14.5         0.01   0.96    35.6794
                100        0.47    14.5         0.01   0.96    31.3163
                100        0.47    14.5         0.01   0.96    27.4867
                100        0.47    14.5         0.01   0.96    24.1255
                100        0.47    14.5         0.01   0.96    21.1753
                100        0.47    14.5         0.01   0.96    18.5858
                100        0.47    14.5         0.01   0.96    16.313
                100        0.47    14.5         0.01   0.96    14.3182
                100        0.47    14.5         0.01   0.96    12.5673
              Sample Initial nitrogen: SWUnits=Volumetric; OCUnits=Total; PHUnits=Water
                Thickness=[200, 100, 100, 100, 100, 100, 100, 100, 100, 100, 100, 100, 100, 100, 100, 100, 100, 100, 100, 100, 100, 100, -]
              CERESSoilTemperature
              Sample InitialConditions: SWUnits=Volumetric; OCUnits=Total; PHUnits=Water
                Thickness=[200, 100, 100, 100, 100, 100, 100, 100, 100, 100, 100, 100, 100, 100, 100, 100, 100, 100, 100, 100, 100, 100]
                SW=[0.204, 0.168, 0.134, 0.11, 0.102, 0.098, 0.1, 0.103, 0.101, 0.097, 0.096, 0.1, 0.106, 0.106, 0.114, 0.117, 0.112, 0.109, 0.11, 0.11, 0.114, 0.118]
          CompositeFactor SD2
            Specifications:
              [LucerneSowingRule].Script.SowingDate = 2010-11-09
              [Cutting]
              [Clock].StartDate = 2010-11-09
              [Soil]
            Operations Cutting
              2011-02-18  [Mower].Script.Cut();
              2011-05-04  [Mower].Script.Cut();
              2011-06-20  [Mower].Script.Cut();
              2011-11-04  [Mower].Script.Cut();
              2011-12-23  [Mower].Script.Cut();
              2012-03-04  [Mower].Script.Cut();
              2012-04-25  [Mower].Script.Cut();
            Soil: SoilType=Udic Haplustept (US), Pallic orthic brown soil (NZ); Site=Ashley Dene: Lincoln University Research Farm; NearestTown=Lincoln; Country=New Zealand; Latitude=999999; Longitude=999999
              Comments=Soil water characterised from NNM (2 years). Stone content and BD  from Di and Cameron 2002. Soil saturation from Cichota 2013.
              Chemical: same as NewZealand.AshleyDene.Factors.SowingDate.SD1.Soil.Chemical
              Physical
                Thickness  BD    AirDry  LL15   DUL    SAT
                200        1.15  0.076   0.076  0.275  0.275
                100        1.15  0.096   0.096  0.221  0.221
                100        1.31  0.084   0.084  0.168  0.168
                100        1.31  0.073   0.073  0.135  0.135
                100        1.95  0.074   0.074  0.121  0.121
                100        1.95  0.072   0.072  0.118  0.118
                100        1.95  0.068   0.068  0.112  0.112
                100        1.95  0.064   0.064  0.108  0.108
                100        1.95  0.064   0.064  0.102  0.102
                100        1.95  0.064   0.064  0.101  0.101
                100        1.95  0.064   0.064  0.101  0.101
                100        1.95  0.064   0.064  0.111  0.111
                100        1.95  0.068   0.068  0.12   0.12
                100        1.95  0.064   0.064  0.123  0.123
                100        1.95  0.07    0.07   0.114  0.114
                100        1.95  0.07    0.07   0.109  0.109
                100        1.95  0.073   0.073  0.108  0.108
                100        1.95  0.076   0.076  0.112  0.112
                100        1.95  0.079   0.079  0.115  0.115
                100        1.95  0.082   0.082  0.114  0.114
                100        1.95  0.087   0.087  0.118  0.118
                100        1.95  0.102   0.102  0.12   0.12
                SoilCrop LucerneSoil
                  LL=[0.076, 0.096, 0.084, 0.073, 0.074, 0.072, 0.068, 0.064, 0.064, 0.064, 0.064, 0.064, 0.068, 0.064, 0.07, 0.07, 0.073, 0.076, 0.079, 0.082, 0.087, 0.102]
                  KL=[0.075, 0.1, 0.105, 0.11, 0.11, 0.11, 0.11, 0.1, 0.075, 0.08, 0.04, 0.03, 0.015, 0.01, 0.02, 0.025, 0.02, 0.02, 0.015, 0.02, 0.015, 0.005]
                  XF=[1, 1, 1, 1, 1, 1, 1, 1, 1, 1, 1, 1, 1, 1, 1, 1, 1, 1, 1, 1, 1, 1]
              WaterBalance SoilWater: same as NewZealand.AshleyDene.Factors.SowingDate.SD1.Soil.SoilWater
              SoilNitrogen: same as NewZealand.AshleyDene.Factors.SowingDate.SD1.Soil.SoilNitrogen
              Organic: same as NewZealand.AshleyDene.Factors.SowingDate.SD1.Soil.Organic
              Sample Initial nitrogen: same as NewZealand.AshleyDene.Factors.SowingDate.SD1.Soil.Initial nitrogen
              CERESSoilTemperature
              Sample InitialConditions: SWUnits=Volumetric; OCUnits=Total; PHUnits=Water
                Thickness=[200, 100, 100, 100, 100, 100, 100, 100, 100, 100, 100, 100, 100, 100, 100, 100, 100, 100, 100, 100, 100, 100]
                SW=[0.205, 0.189, 0.143, 0.114, 0.103, 0.101, 0.096, 0.093, 0.095, 0.087, 0.09, 0.095, 0.102, 0.103, 0.098, 0.095, 0.094, 0.102, 0.107, 0.107, 0.109, 0.114]
          CompositeFactor SD3
            Specifications:
              [LucerneSowingRule].Script.SowingDate = 2010-12-08
              [Cutting]
              [Clock].StartDate = 2010-12-08
              [Soil]
            Operations Cutting
              2011-04-02  [Mower].Script.Cut();
              2011-06-20  [Mower].Script.Cut();
              2011-11-04  [Mower].Script.Cut();
              2011-12-23  [Mower].Script.Cut();
              2012-03-04  [Mower].Script.Cut();
              2012-04-25  [Mower].Script.Cut();
            Soil: SoilType=Udic Haplustept (US), Pallic orthic brown soil (NZ); Site=Ashley Dene: Lincoln University Research Farm; NearestTown=Lincoln; Country=New Zealand; Latitude=999999; Longitude=999999
              Comments=Soil water characterised from NNM (2 years). Stone content and BD  from Di and Cameron 2002. Soil saturation from Cichota 2013.
              Chemical: same as NewZealand.AshleyDene.Factors.SowingDate.SD1.Soil.Chemical
              Physical
                Thickness  BD    AirDry  LL15   DUL    SAT
                200        1.15  0.074   0.074  0.278  0.278
                100        1.15  0.086   0.086  0.212  0.212
                100        1.31  0.081   0.081  0.166  0.166
                100        1.31  0.079   0.079  0.143  0.143
                100        1.95  0.074   0.074  0.133  0.133
                100        1.95  0.07    0.07   0.119  0.119
                100        1.95  0.072   0.072  0.127  0.127
                100        1.95  0.069   0.069  0.117  0.117
                100        1.95  0.064   0.064  0.107  0.107
                100        1.95  0.063   0.063  0.104  0.104
                100        1.95  0.065   0.065  0.105  0.105
                100        1.95  0.067   0.067  0.109  0.109
                100        1.95  0.069   0.069  0.115  0.115
                100        1.95  0.072   0.072  0.117  0.117
                100        1.95  0.074   0.074  0.117  0.117
                100        1.95  0.076   0.076  0.114  0.114
                100        1.95  0.081   0.081  0.114  0.114
                100        1.95  0.088   0.088  0.113  0.113
                100        1.95  0.094   0.094  0.12   0.12
                100        1.95  0.1     0.1    0.123  0.123
                100        1.95  0.099   0.099  0.125  0.125
                100        1.95  0.095   0.095  0.123  0.123
                SoilCrop LucerneSoil
                  LL=[0.074, 0.086, 0.081, 0.079, 0.074, 0.07, 0.072, 0.069, 0.064, 0.063, 0.065, 0.067, 0.069, 0.072, 0.074, 0.076, 0.081, 0.088, 0.094, 0.1, 0.099, 0.095]
                  KL=[0.095, 0.095, 0.11, 0.11, 0.105, 0.105, 0.08, 0.07, 0.065, 0.07, 0.045, 0.035, 0.035, 0.015, 0.025, 0.04, 0.045, 0.055, 0.025, 0.01, 0.015, 0.02]
                  XF=[1, 1, 1, 1, 1, 1, 1, 1, 1, 1, 1, 1, 1, 1, 1, 1, 1, 1, 1, 1, 1, 1]
              WaterBalance SoilWater: same as NewZealand.AshleyDene.Factors.SowingDate.SD1.Soil.SoilWater
              SoilNitrogen: same as NewZealand.AshleyDene.Factors.SowingDate.SD1.Soil.SoilNitrogen
              Organic: same as NewZealand.AshleyDene.Factors.SowingDate.SD1.Soil.Organic
              Sample Initial nitrogen: same as NewZealand.AshleyDene.Factors.SowingDate.SD1.Soil.Initial nitrogen
              CERESSoilTemperature
              Sample InitialConditions: SWUnits=Volumetric; OCUnits=Total; PHUnits=Water
                Thickness=[200, 100, 100, 100, 100, 100, 100, 100, 100, 100, 100, 100, 100, 100, 100, 100, 100, 100, 100, 100, 100, 100]
                SW=[0.133, 0.139, 0.116, 0.109, 0.099, 0.094, 0.105, 0.096, 0.088, 0.088, 0.085, 0.091, 0.096, 0.1, 0.102, 0.098, 0.101, 0.102, 0.107, 0.111, 0.111, 0.121]
          CompositeFactor SD4
            Specifications:
              [LucerneSowingRule].Script.SowingDate = 2011-01-13
              [Cutting]
              [Clock].StartDate = 2011-01-13
              [Soil]
            Operations Cutting
              2011-05-05  [Mower].Script.Cut();
              2011-06-20  [Mower].Script.Cut();
              2011-11-03  [Mower].Script.Cut();
              2011-12-23  [Mower].Script.Cut();
              2012-03-04  [Mower].Script.Cut();
              2012-04-25  [Mower].Script.Cut();
            Soil: SoilType=Udic Haplustept (US), Pallic orthic brown soil (NZ); Site=Ashley Dene: Lincoln University Research Farm; NearestTown=Lincoln; Country=New Zealand; Latitude=999999; Longitude=999999
              Comments=Soil water characterised from NNM (2 years). Stone content and BD  from Di and Cameron 2002. Soil saturation from Cichota 2013.
              Chemical: same as NewZealand.AshleyDene.Factors.SowingDate.SD1.Soil.Chemical
              Physical
                Thickness  BD    AirDry  LL15   DUL    SAT
                200        1.15  0.07    0.07   0.3    0.3
                100        1.15  0.083   0.083  0.243  0.243
                100        1.31  0.075   0.075  0.181  0.181
                100        1.31  0.07    0.07   0.151  0.151
                100        1.95  0.068   0.068  0.129  0.129
                100        1.95  0.067   0.067  0.12   0.12
                100        1.95  0.068   0.068  0.114  0.114
                100        1.95  0.068   0.068  0.114  0.114
                100        1.95  0.068   0.068  0.111  0.111
                100        1.95  0.071   0.071  0.11   0.11
                100        1.95  0.075   0.075  0.109  0.109
                100        1.95  0.08    0.08   0.116  0.116
                100        1.95  0.083   0.083  0.121  0.121
                100        1.95  0.086   0.086  0.117  0.117
                100        1.95  0.093   0.093  0.116  0.116
                100        1.95  0.101   0.101  0.12   0.12
                100        1.95  0.106   0.106  0.122  0.122
                100        1.95  0.11    0.11   0.123  0.123
                100        1.95  0.108   0.108  0.122  0.122
                100        1.95  0.105   0.105  0.117  0.117
                100        1.95  0.107   0.107  0.117  0.117
                100        1.95  0.106   0.106  0.118  0.118
                SoilCrop LucerneSoil
                  LL=[0.07, 0.083, 0.075, 0.07, 0.068, 0.067, 0.068, 0.068, 0.068, 0.071, 0.075, 0.08, 0.083, 0.086, 0.093, 0.101, 0.106, 0.11, 0.108, 0.105, 0.107, 0.106]
                  KL=[0.11, 0.08, 0.105, 0.11, 0.11, 0.11, 0.11, 0.095, 0.105, 0.095, 0.075, 0.05, 0.045, 0.065, 0.06, 0.06, 0.06, 0.07, 0.11, 0.11, 0.11, 0.11]
                  XF=[1, 1, 1, 1, 1, 1, 1, 1, 1, 1, 1, 1, 1, 1, 1, 1, 1, 1, 1, 1, 1, 1]
              WaterBalance SoilWater: same as NewZealand.AshleyDene.Factors.SowingDate.SD1.Soil.SoilWater
              SoilNitrogen: same as NewZealand.AshleyDene.Factors.SowingDate.SD1.Soil.SoilNitrogen
              Organic: same as NewZealand.AshleyDene.Factors.SowingDate.SD1.Soil.Organic
              Sample Initial nitrogen: same as NewZealand.AshleyDene.Factors.SowingDate.SD1.Soil.Initial nitrogen
              CERESSoilTemperature
              Sample InitialConditions: SWUnits=Volumetric; OCUnits=Total; PHUnits=Water
                Thickness=[200, 100, 100, 100, 100, 100, 100, 100, 100, 100, 100, 100, 100, 100, 100, 100, 100, 100, 100, 100, 100, 100]
                SW=[0.194, 0.18, 0.134, 0.111, 0.098, 0.091, 0.091, 0.094, 0.09, 0.091, 0.09, 0.1, 0.102, 0.105, 0.106, 0.109, 0.112, 0.118, 0.118, 0.113, 0.115, 0.116]
          CompositeFactor SD5
            Specifications:
              [LucerneSowingRule].Script.SowingDate = 2011-02-03
              [Cutting]
              [Clock].StartDate = 2011-02-03
              [Soil]
            Operations Cutting
              2011-06-20  [Mower].Script.Cut();
              2011-11-03  [Mower].Script.Cut();
              2011-12-23  [Mower].Script.Cut();
              2012-03-04  [Mower].Script.Cut();
              2012-04-25  [Mower].Script.Cut();
            Soil: SoilType=Udic Haplustept (US), Pallic orthic brown soil (NZ); Site=Ashley Dene: Lincoln University Research Farm; NearestTown=Lincoln; Country=New Zealand; Latitude=999999; Longitude=999999
              Comments=Soil water characterised from NNM (2 years). Stone content and BD  from Di and Cameron 2002. Soil saturation from Cichota 2013.
              Chemical: same as NewZealand.AshleyDene.Factors.SowingDate.SD1.Soil.Chemical
              Physical
                Thickness  BD    AirDry  LL15   DUL    SAT
                200        1.15  0.066   0.066  0.283  0.283
                100        1.15  0.077   0.077  0.206  0.206
                100        1.31  0.077   0.077  0.162  0.162
                100        1.31  0.072   0.072  0.144  0.144
                100        1.95  0.07    0.07   0.126  0.126
                100        1.95  0.07    0.07   0.114  0.114
                100        1.95  0.065   0.065  0.11   0.11
                100        1.95  0.063   0.063  0.106  0.106
                100        1.95  0.064   0.064  0.108  0.108
                100        1.95  0.068   0.068  0.104  0.104
                100        1.95  0.07    0.07   0.111  0.111
                100        1.95  0.073   0.073  0.108  0.108
                100        1.95  0.077   0.077  0.11   0.11
                100        1.95  0.082   0.082  0.114  0.114
                100        1.95  0.085   0.085  0.119  0.119
                100        1.95  0.088   0.088  0.117  0.117
                100        1.95  0.089   0.089  0.116  0.116
                100        1.95  0.09    0.09   0.115  0.115
                100        1.95  0.087   0.087  0.109  0.109
                100        1.95  0.087   0.087  0.11   0.11
                100        1.95  0.089   0.089  0.107  0.107
                100        1.95  0.091   0.091  0.111  0.111
                SoilCrop LucerneSoil
                  LL=[0.066, 0.077, 0.077, 0.072, 0.07, 0.07, 0.065, 0.063, 0.064, 0.068, 0.07, 0.073, 0.077, 0.082, 0.085, 0.088, 0.089, 0.09, 0.087, 0.087, 0.089, 0.091]
                  KL=[0.1, 0.105, 0.11, 0.11, 0.11, 0.11, 0.11, 0.11, 0.11, 0.105, 0.075, 0.075, 0.11, 0.11, 0.085, 0.105, 0.11, 0.11, 0.11, 0.11, 0.11, 0.035]
                  XF=[1, 1, 1, 1, 1, 1, 1, 1, 1, 1, 1, 1, 1, 1, 1, 1, 1, 1, 1, 1, 1, 1]
              WaterBalance SoilWater: same as NewZealand.AshleyDene.Factors.SowingDate.SD1.Soil.SoilWater
              SoilNitrogen: same as NewZealand.AshleyDene.Factors.SowingDate.SD1.Soil.SoilNitrogen
              Organic: same as NewZealand.AshleyDene.Factors.SowingDate.SD1.Soil.Organic
              Sample Initial nitrogen: same as NewZealand.AshleyDene.Factors.SowingDate.SD1.Soil.Initial nitrogen
              CERESSoilTemperature
              Sample InitialConditions: SWUnits=Volumetric; OCUnits=Total; PHUnits=Water
                Thickness=[200, 100, 100, 100, 100, 100, 100, 100, 100, 100, 100, 100, 100, 100, 100, 100, 100, 100, 100, 100, 100, 100]
                SW=[0.167, 0.15, 0.118, 0.106, 0.099, 0.088, 0.087, 0.087, 0.087, 0.087, 0.091, 0.089, 0.093, 0.095, 0.1, 0.101, 0.101, 0.101, 0.102, 0.096, 0.099, 0.1]
          CompositeFactor SD6
            Specifications:
              [LucerneSowingRule].Script.SowingDate = 2011-10-10
              [Cutting]
              [Clock].StartDate = 2011-10-10
              [Soil]
            Operations Cutting
              2012-01-23  [Mower].Script.Cut();
              2012-03-04  [Mower].Script.Cut();
              2012-04-25  [Mower].Script.Cut();
            Soil: SoilType=Udic Haplustept (US), Pallic orthic brown soil (NZ); Site=Ashley Dene: Lincoln University Research Farm; NearestTown=Lincoln; Country=New Zealand; Latitude=999999; Longitude=999999
              Comments=Soil water characterised from NNM (2 years). Stone content and BD  from Di and Cameron 2002. Soil saturation from Cichota 2013.
              Chemical: same as NewZealand.AshleyDene.Factors.SowingDate.SD1.Soil.Chemical
              Physical
                Thickness  BD    AirDry  LL15   DUL    SAT
                200        1.15  0.074   0.074  0.259  0.259
                100        1.15  0.086   0.086  0.172  0.172
                100        1.31  0.078   0.078  0.133  0.133
                100        1.31  0.073   0.073  0.108  0.108
                100        1.95  0.072   0.072  0.102  0.102
                100        1.95  0.073   0.073  0.103  0.103
                100        1.95  0.074   0.074  0.102  0.102
                100        1.95  0.077   0.077  0.099  0.099
                100        1.95  0.076   0.076  0.099  0.099
                100        1.95  0.074   0.074  0.094  0.094
                100        1.95  0.074   0.074  0.093  0.093
                100        1.95  0.073   0.073  0.09   0.09
                100        1.95  0.076   0.076  0.089  0.089
                100        1.95  0.079   0.079  0.09   0.09
                100        1.95  0.085   0.085  0.098  0.098
                100        1.95  0.091   0.091  0.099  0.099
                100        1.95  0.093   0.093  0.106  0.106
                100        1.95  0.095   0.095  0.104  0.104
                100        1.95  0.096   0.096  0.102  0.102
                100        1.95  0.097   0.097  0.102  0.102
                100        1.95  0.098   0.098  0.108  0.108
                100        1.95  0.106   0.106  0.114  0.114
                SoilCrop LucerneSoil
                  LL=[0.074, 0.086, 0.078, 0.073, 0.072, 0.073, 0.074, 0.077, 0.076, 0.074, 0.074, 0.073, 0.076, 0.079, 0.085, 0.091, 0.093, 0.095, 0.096, 0.097, 0.098, 0.106]
                  KL=[0.08, 0.11, 0.11, 0.11, 0.11, 0.11, 0.11, 0.06, 0.04, 0.045, 0.045, 0.06, 0.1, 0.085, 0.035, 0.065, 0.03, 0.105, 0.11, 0.11, 0.095, 0.005]
                  XF=[1, 1, 1, 1, 1, 1, 1, 1, 1, 1, 1, 1, 1, 1, 1, 1, 1, 1, 1, 1, 1, 1]
              WaterBalance SoilWater: same as NewZealand.AshleyDene.Factors.SowingDate.SD1.Soil.SoilWater
              SoilNitrogen: same as NewZealand.AshleyDene.Factors.SowingDate.SD1.Soil.SoilNitrogen
              Organic: same as NewZealand.AshleyDene.Factors.SowingDate.SD1.Soil.Organic
              Sample Initial nitrogen: same as NewZealand.AshleyDene.Factors.SowingDate.SD1.Soil.Initial nitrogen
              CERESSoilTemperature
              Sample InitialConditions: SWUnits=Volumetric; OCUnits=Total; PHUnits=Water
                Thickness=[200, 100, 100, 100, 100, 100, 100, 100, 100, 100, 100, 100, 100, 100, 100, 100, 100, 100, 100, 100, 100, 100]
                SW=[0.184, 0.16, 0.121, 0.102, 0.093, 0.089, 0.091, 0.093, 0.098, 0.094, 0.091, 0.089, 0.089, 0.089, 0.096, 0.098, 0.105, 0.102, 0.102, 0.099, 0.104, 0.109]
          CompositeFactor SD7
            Specifications:
              [LucerneSowingRule].Script.SowingDate = 2011-11-07
              [Cutting]
              [Clock].StartDate = 2011-11-07
              [Soil]
            Operations Cutting
              2012-02-08  [Mower].Script.Cut();
              2012-04-25  [Mower].Script.Cut();
            Soil: SoilType=Udic Haplustept (US), Pallic orthic brown soil (NZ); Site=Ashley Dene: Lincoln University Research Farm; NearestTown=Lincoln; Country=New Zealand; Latitude=999999; Longitude=999999
              Comments=Soil water characterised from NNM (2 years). Stone content and BD  from Di and Cameron 2002. Soil saturation from Cichota 2013.
              Chemical: same as NewZealand.AshleyDene.Factors.SowingDate.SD1.Soil.Chemical
              Physical
                Thickness  BD    AirDry  LL15   DUL    SAT
                200        1.15  0.091   0.091  0.276  0.276
                100        1.15  0.108   0.108  0.21   0.21
                100        1.31  0.091   0.091  0.159  0.159
                100        1.31  0.087   0.087  0.134  0.134
                100        1.95  0.083   0.083  0.121  0.121
                100        1.95  0.081   0.081  0.118  0.118
                100        1.95  0.079   0.079  0.108  0.108
                100        1.95  0.077   0.077  0.099  0.099
                100        1.95  0.076   0.076  0.1    0.1
                100        1.95  0.077   0.077  0.101  0.101
                100        1.95  0.077   0.077  0.102  0.102
                100        1.95  0.075   0.075  0.097  0.097
                100        1.95  0.079   0.079  0.094  0.094
                100        1.95  0.083   0.083  0.098  0.098
                100        1.95  0.087   0.087  0.102  0.102
                100        1.95  0.09    0.09   0.108  0.108
                100        1.95  0.095   0.095  0.106  0.106
                100        1.95  0.099   0.099  0.108  0.108
                100        1.95  0.1     0.1    0.111  0.111
                100        1.95  0.099   0.099  0.106  0.106
                100        1.95  0.104   0.104  0.114  0.114
                100        1.95  0.104   0.104  0.113  0.113
                SoilCrop LucerneSoil
                  LL=[0.091, 0.108, 0.091, 0.087, 0.083, 0.081, 0.079, 0.077, 0.076, 0.077, 0.077, 0.075, 0.079, 0.083, 0.087, 0.09, 0.095, 0.099, 0.1, 0.099, 0.104, 0.104]
                  KL=[0.075, 0.1, 0.11, 0.11, 0.11, 0.11, 0.11, 0.1, 0.085, 0.09, 0.11, 0.11, 0.11, 0.11, 0.11, 0.11, 0.11, 0.11, 0.11, 0.11, 0.11, 0.045]
                  XF=[1, 1, 1, 1, 1, 1, 1, 1, 1, 1, 1, 1, 1, 1, 1, 1, 1, 1, 1, 1, 1, 1]
              WaterBalance SoilWater: same as NewZealand.AshleyDene.Factors.SowingDate.SD1.Soil.SoilWater
              SoilNitrogen: same as NewZealand.AshleyDene.Factors.SowingDate.SD1.Soil.SoilNitrogen
              Organic: same as NewZealand.AshleyDene.Factors.SowingDate.SD1.Soil.Organic
              Sample Initial nitrogen: same as NewZealand.AshleyDene.Factors.SowingDate.SD1.Soil.Initial nitrogen
              CERESSoilTemperature
              Sample InitialConditions: SWUnits=Volumetric; OCUnits=Total; PHUnits=Water
                Thickness=[200, 100, 100, 100, 100, 100, 100, 100, 100, 100, 100, 100, 100, 100, 100, 100, 100, 100, 100, 100, 100, 100]
                SW=[0.193, 0.208, 0.148, 0.129, 0.115, 0.109, 0.101, 0.095, 0.096, 0.097, 0.095, 0.09, 0.087, 0.092, 0.098, 0.099, 0.102, 0.106, 0.107, 0.102, 0.109, 0.109]
          CompositeFactor SD8
            Specifications:
              [LucerneSowingRule].Script.SowingDate = 2011-12-09
              [Cutting]
              [Clock].StartDate = 2011-12-09
              [Soil]
            Operations Cutting
              2012-03-27  [Mower].Script.Cut();
            Soil: SoilType=Udic Haplustept (US), Pallic orthic brown soil (NZ); Site=Ashley Dene: Lincoln University Research Farm; NearestTown=Lincoln; Country=New Zealand; Latitude=999999; Longitude=999999
              Comments=Soil water characterised from NNM (2 years). Stone content and BD  from Di and Cameron 2002. Soil saturation from Cichota 2013.
              Chemical: same as NewZealand.AshleyDene.Factors.SowingDate.SD1.Soil.Chemical
              Physical
                Thickness  BD    AirDry  LL15   DUL    SAT
                200        1.15  0.095   0.095  0.253  0.253
                100        1.15  0.091   0.091  0.168  0.168
                100        1.31  0.086   0.086  0.14   0.14
                100        1.31  0.08    0.08   0.118  0.118
                100        1.95  0.077   0.077  0.108  0.108
                100        1.95  0.076   0.076  0.105  0.105
                100        1.95  0.073   0.073  0.101  0.101
                100        1.95  0.074   0.074  0.097  0.097
                100        1.95  0.079   0.079  0.097  0.097
                100        1.95  0.08    0.08   0.096  0.096
                100        1.95  0.084   0.084  0.096  0.096
                100        1.95  0.085   0.085  0.096  0.096
                100        1.95  0.089   0.089  0.103  0.103
                100        1.95  0.093   0.093  0.11   0.11
                100        1.95  0.094   0.094  0.109  0.109
                100        1.95  0.098   0.098  0.109  0.109
                100        1.95  0.097   0.097  0.108  0.108
                100        1.95  0.098   0.098  0.108  0.108
                100        1.95  0.101   0.101  0.115  0.115
                100        1.95  0.11    0.11   0.123  0.123
                100        1.95  0.113   0.113  0.13   0.13
                100        1.95  0.115   0.115  0.125  0.125
                SoilCrop LucerneSoil
                  LL=[0.095, 0.091, 0.086, 0.08, 0.077, 0.076, 0.073, 0.074, 0.079, 0.08, 0.084, 0.085, 0.089, 0.093, 0.094, 0.098, 0.097, 0.098, 0.101, 0.11, 0.113, 0.115]
                  KL=[0.095, 0.11, 0.11, 0.11, 0.075, 0.01, 0.005, 0.005, 0.005, 0.005, 0.015, 0.04, 0.01, 0.005, 0.005, 0.005, 0.005, 0.06, 0.005, 0.005, 0.005, 0.005]
                  XF=[1, 1, 1, 1, 1, 1, 1, 1, 1, 1, 1, 1, 1, 1, 1, 1, 1, 1, 1, 1, 1, 1]
              WaterBalance SoilWater: same as NewZealand.AshleyDene.Factors.SowingDate.SD1.Soil.SoilWater
              SoilNitrogen: same as NewZealand.AshleyDene.Factors.SowingDate.SD1.Soil.SoilNitrogen
              Organic: same as NewZealand.AshleyDene.Factors.SowingDate.SD1.Soil.Organic
              Sample Initial nitrogen: same as NewZealand.AshleyDene.Factors.SowingDate.SD1.Soil.Initial nitrogen
              CERESSoilTemperature
              Sample InitialConditions: SWUnits=Volumetric; OCUnits=Total; PHUnits=Water
                Thickness=[200, 100, 100, 100, 100, 100, 100, 100, 100, 100, 100, 100, 100, 100, 100, 100, 100, 100, 100, 100, 100, 100]
                SW=[0.19, 0.109, 0.098, 0.094, 0.088, 0.09, 0.091, 0.089, 0.092, 0.094, 0.094, 0.095, 0.098, 0.102, 0.103, 0.105, 0.106, 0.104, 0.109, 0.119, 0.12, 0.121]
          CompositeFactor SD9
            Specifications:
              [LucerneSowingRule].Script.SowingDate = 2012-01-10
              [Cutting]
              [Clock].StartDate = 2012-01-10
              [Soil]
            Operations Cutting
              2012-04-26  [Mower].Script.Cut();
            Soil: SoilType=Udic Haplustept (US), Pallic orthic brown soil (NZ); Site=Ashley Dene: Lincoln University Research Farm; NearestTown=Lincoln; Country=New Zealand; Latitude=999999; Longitude=999999
              Comments=Soil water characterised from NNM (2 years). Stone content and BD  from Di and Cameron 2002. Soil saturation from Cichota 2013.
              Chemical: same as NewZealand.AshleyDene.Factors.SowingDate.SD1.Soil.Chemical
              Physical
                Thickness  BD    AirDry  LL15   DUL    SAT
                200        1.15  0.11    0.11   0.27   0.27
                100        1.15  0.133   0.133  0.235  0.235
                100        1.31  0.102   0.102  0.169  0.169
                100        1.31  0.089   0.089  0.129  0.129
                100        1.95  0.084   0.084  0.116  0.116
                100        1.95  0.085   0.085  0.106  0.106
                100        1.95  0.088   0.088  0.101  0.101
                100        1.95  0.091   0.091  0.1    0.1
                100        1.95  0.092   0.092  0.098  0.098
                100        1.95  0.092   0.092  0.101  0.101
                100        1.95  0.093   0.093  0.101  0.101
                100        1.95  0.092   0.092  0.098  0.098
                100        1.95  0.094   0.094  0.104  0.104
                100        1.95  0.098   0.098  0.111  0.111
                100        1.95  0.104   0.104  0.117  0.117
                100        1.95  0.104   0.104  0.121  0.121
                100        1.95  0.102   0.102  0.113  0.113
                100        1.95  0.099   0.099  0.106  0.106
                100        1.95  0.096   0.096  0.104  0.104
                100        1.95  0.093   0.093  0.102  0.102
                100        1.95  0.099   0.099  0.11   0.11
                100        1.95  0.102   0.102  0.119  0.119
                SoilCrop LucerneSoil
                  LL=[0.11, 0.133, 0.102, 0.089, 0.084, 0.085, 0.088, 0.091, 0.092, 0.092, 0.093, 0.092, 0.094, 0.098, 0.104, 0.104, 0.102, 0.099, 0.096, 0.093, 0.099, 0.102]
                  KL=[0.035, 0.11, 0.11, 0.105, 0.11, 0.11, 0.005, 0.005, 0.005, 0.005, 0.005, 0.005, 0.005, 0.005, 0.005, 0.005, 0.005, 0.005, 0.005, 0.005, 0.005, 0.005]
                  XF=[1, 1, 1, 1, 1, 1, 1, 1, 1, 1, 1, 1, 1, 1, 1, 1, 1, 1, 1, 1, 1, 1]
              WaterBalance SoilWater: same as NewZealand.AshleyDene.Factors.SowingDate.SD1.Soil.SoilWater
              SoilNitrogen: same as NewZealand.AshleyDene.Factors.SowingDate.SD1.Soil.SoilNitrogen
              Organic: same as NewZealand.AshleyDene.Factors.SowingDate.SD1.Soil.Organic
              Sample Initial nitrogen: same as NewZealand.AshleyDene.Factors.SowingDate.SD1.Soil.Initial nitrogen
              CERESSoilTemperature
              Sample InitialConditions: SWUnits=Volumetric; OCUnits=Total; PHUnits=Water
                Thickness=[200, 100, 100, 100, 100, 100, 100, 100, 100, 100, 100, 100, 100, 100, 100, 100, 100, 100, 100, 100, 100, 100]
                SW=[0.167, 0.199, 0.144, 0.112, 0.097, 0.091, 0.091, 0.093, 0.095, 0.093, 0.095, 0.094, 0.094, 0.099, 0.105, 0.106, 0.105, 0.099, 0.096, 0.094, 0.099, 0.103]
          CompositeFactor SD10
            Specifications:
              [LucerneSowingRule].Script.SowingDate = 2012-02-17
              [Cutting]
              [Clock].StartDate = 2012-02-17
              [Soil]
            Operations Cutting
            Soil: SoilType=Udic Haplustept (US), Pallic orthic brown soil (NZ); Site=Ashley Dene: Lincoln University Research Farm; NearestTown=Lincoln; Country=New Zealand; Latitude=999999; Longitude=999999
              Comments=Soil water characterised from NNM (2 years). Stone content and BD  from Di and Cameron 2002. Soil saturation from Cichota 2013.
              Chemical: same as NewZealand.AshleyDene.Factors.SowingDate.SD1.Soil.Chemical
              Physical
                Thickness  BD    AirDry  LL15   DUL    SAT
                200        1.15  0.136   0.136  0.284  0.284
                100        1.15  0.167   0.167  0.239  0.239
                100        1.31  0.131   0.131  0.182  0.182
                100        1.31  0.103   0.103  0.134  0.134
                100        1.95  0.09    0.09   0.117  0.117
                100        1.95  0.082   0.082  0.111  0.111
                100        1.95  0.079   0.079  0.106  0.106
                100        1.95  0.075   0.075  0.107  0.107
                100        1.95  0.083   0.083  0.117  0.117
                100        1.95  0.101   0.101  0.118  0.118
                100        1.95  0.099   0.099  0.116  0.116
                100        1.95  0.088   0.088  0.112  0.112
                100        1.95  0.083   0.083  0.107  0.107
                100        1.95  0.085   0.085  0.103  0.103
                100        1.95  0.09    0.09   0.108  0.108
                100        1.95  0.093   0.093  0.113  0.113
                100        1.95  0.094   0.094  0.111  0.111
                100        1.95  0.098   0.098  0.11   0.11
                100        1.95  0.1     0.1    0.113  0.113
                100        1.95  0.103   0.103  0.115  0.115
                100        1.95  0.109   0.109  0.119  0.119
                100        1.95  0.113   0.113  0.123  0.123
                SoilCrop LucerneSoil
                  LL=[0.136, 0.167, 0.131, 0.103, 0.09, 0.082, 0.079, 0.075, 0.083, 0.101, 0.099, 0.088, 0.083, 0.085, 0.09, 0.093, 0.094, 0.098, 0.1, 0.103, 0.109, 0.113]
                  KL=[0.01, 0.105, 0.11, 0.095, 0.11, 0.11, 0.095, 0.005, 0.005, 0.005, 0.005, 0.005, 0.005, 0.005, 0.005, 0.005, 0.005, 0.005, 0.005, 0.005, 0.005, 0.005]
                  XF=[1, 1, 1, 1, 1, 1, 1, 1, 1, 1, 1, 1, 1, 1, 1, 1, 1, 1, 1, 1, 1, 1]
              WaterBalance SoilWater: same as NewZealand.AshleyDene.Factors.SowingDate.SD1.Soil.SoilWater
              SoilNitrogen: same as NewZealand.AshleyDene.Factors.SowingDate.SD1.Soil.SoilNitrogen
              Organic: same as NewZealand.AshleyDene.Factors.SowingDate.SD1.Soil.Organic
              Sample Initial nitrogen: same as NewZealand.AshleyDene.Factors.SowingDate.SD1.Soil.Initial nitrogen
              CERESSoilTemperature
              Sample InitialConditions: SWUnits=Volumetric; OCUnits=Total; PHUnits=Water
                Thickness=[200, 100, 100, 100, 100, 100, 100, 100, 100, 100, 100, 100, 100, 100, 100, 100, 100, 100, 100, 100, 100, 100]
                SW=[0.188, 0.197, 0.154, 0.113, 0.09, 0.082, 0.079, 0.075, 0.083, 0.101, 0.099, 0.088, 0.083, 0.085, 0.09, 0.093, 0.094, 0.098, 0.1, 0.103, 0.109, 0.113]
      Simulation AshleyDene
        Clock: Start=2010-10-03; End=2012-07-30
        Summary summaryfile
        Weather: FileName=C:\Data\Master\01raw-data\ClimateAndObserved\AshleyDene.met
        SoilArbitrator Soil Arbitrator
        Zone paddock: Area=1; Slope=0; AspectAngle=0; Altitude=50
          MicroClimate: a_interception=0; b_interception=1; c_interception=0; d_interception=0; soil_albedo=0.23; SoilHeatFluxFraction=0.4; MinimumHeightDiffForNewLayer=0; NightInterceptionFraction=0.5; ReferenceHeight=2
          Irrigation
          Fertiliser
          Manager DiagnosticsVariables
            script: same as in NewZealand.Iversen12.Iversen12.paddock.DiagnosticsVariables
          SurfaceOrganicMatter surface organic matter: InitialResidueName=wheat; InitialResidueType=wheat; InitialResidueMass=0; InitialStandingFraction=0; InitialCPR=0; InitialCNR=80
          Report: EventNames=[Clock].DoReport
            VariableNames:
              [Clock].Today
              [DiagnosticsVariables].Script.AccumPlantN
              [DiagnosticsVariables].Script.AccumMineralisation
              [DiagnosticsVariables].Script.AccumDenit
              [DiagnosticsVariables].Script.AccumFert
              [DiagnosticsVariables].Script.AccumLeach
              [DiagnosticsVariables].Script.AccumDetach
              [DiagnosticsVariables].Script.DeltaSoilOMN
              [DiagnosticsVariables].Script.DeltaSurfaceOMN
              [DiagnosticsVariables].Script.DeltaSoilMineralN
              [Lucerne].Root.NSupply
              [Soil].SoilWater.Es
              [DiagnosticsVariables].Script.SWC
              [DiagnosticsVariables].Script.DUL
              [Soil].SoilWater.Drainage
              [Soil].SoilWater.Runoff
              [DiagnosticsVariables].Script.OutFlowLat
              [Soil].SoilWater.pond
              [DiagnosticsVariables].Script.AccumEO
              [DiagnosticsVariables].Script.AccumEP
              [DiagnosticsVariables].Script.AccumES
              [DiagnosticsVariables].Script.AccumDrainage
              [DiagnosticsVariables].Script.AccumRunoff
              [DiagnosticsVariables].Script.AccumRainfall
              [DiagnosticsVariables].Script.AccumIrrigation
              [DiagnosticsVariables].Script.AccumOutflowLat
              [DiagnosticsVariables].Script.SoilWaterDeficit
              [Lucerne].Grain.Live.Wt
              [Lucerne].Shell.Live.Wt
              [Lucerne].Stem.Live.Wt
              [Lucerne].Stem.Live.Wt
              [Lucerne].Grain.Live.N
              [Lucerne].Shell.Live.N
              [Lucerne].Leaf.Live.Wt
              [Lucerne].Root.Live.Wt
              [Lucerne].Leaf.Live.N
              [Lucerne].Root.Live.N
              [Lucerne].Leaf.Live.NConc
              [Lucerne].Root.Live.NConc
              [Lucerne].Root.WaterSupply
              [Lucerne].Root.WaterUptake
              [Lucerne].Leaf.Transpiration
              [Lucerne].Leaf.WaterDemand
              [Lucerne].Root.Depth
              [Lucerne].Leaf.CoverTotal
              [Lucerne].Leaf.CoverDead
              [Lucerne].Leaf.LAI
              [Lucerne].Leaf.Height
              [Soil].SoilWater.SWmm
              [Soil].SoilNitrogen.NO3.kgha
              [DiagnosticsVariables].Script.SoilNitrogenContent
              [Lucerne].Arbitrator.N.TotalPlantDemand
              [DiagnosticsVariables].Script.FomN
              [DiagnosticsVariables].Script.HumN
              [DiagnosticsVariables].Script.BiomN
              [DiagnosticsVariables].Script.DltNMinRes
              [DiagnosticsVariables].Script.DltNMinTot
              [Lucerne].Leaf.Fw
              [Lucerne].Leaf.Fn
              [Lucerne].Phenology.CurrentPhaseName
              [Lucerne].Phenology.CurrentStageName
              [Lucerne].Phenology.Stage
              [Lucerne].Pod.Wt
              [Lucerne].Pod.N
              [Lucerne].AboveGround.Wt *10 as shootbiomass
              [Lucerne].Shell.PodNumber
              [Lucerne].Leaf.LAIFunction
          Manager LucerneSowingRule
            RowSpacing = 150
            SowingDepth = 20
            SowingRate = 100
            CultivarName = Kaituna
            SowingDate = 10/24/2000 00:00:00
            script: same as in NewZealand.Iversen12.Iversen12.paddock.LucerneSowingRule
          Operations IrrigationEvents
          Plant Lucerne
          Manager Mower
            script: same as in NewZealand.Iversen12.Iversen12.paddock.Mower
          Operations Cutting
          Soil: SoilType=Udic Haplustept (US), Pallic orthic brown soil (NZ); Site=Ashley Dene: Lincoln University Research Farm; NearestTown=Lincoln; Country=New Zealand; Latitude=999999; Longitude=999999
            Comments=Soil water characterised from NNM (2 years). Stone content and BD  from Di and Cameron 2002. Soil saturation from Cichota 2013.
            Chemical: same as NewZealand.AshleyDene.Factors.SowingDate.SD1.Soil.Chemical
            Physical
              Thickness  BD    AirDry  LL15    DUL     SAT
              200        1.15  0.075   0.075   0.2653  0.2653
              100        1.15  0.0829  0.0829  0.1907  0.1907
              100        1.31  0.0778  0.0778  0.1543  0.1543
              100        1.31  0.0766  0.0766  0.1296  0.1296
              100        1.95  0.0723  0.0723  0.1155  0.1155
              100        1.95  0.0726  0.0726  0.1083  0.1083
              100        1.95  0.0718  0.0718  0.1081  0.1081
              100        1.95  0.0733  0.0733  0.1133  0.1133
              100        1.95  0.0722  0.0722  0.1104  0.1104
              100        1.95  0.0728  0.0728  0.1064  0.1064
              100        1.95  0.0759  0.0759  0.1048  0.1048
              100        1.95  0.0858  0.0858  0.113   0.113
              100        1.95  0.0868  0.0868  0.1139  0.1139
              100        1.95  0.091   0.091   0.1215  0.1215
              100        1.95  0.1     0.1     0.1303  0.1303
              100        1.95  0.1023  0.1023  0.1263  0.1263
              100        1.95  0.0983  0.0983  0.1224  0.1224
              100        1.95  0.0978  0.0978  0.116   0.116
              100        1.95  0.0972  0.0972  0.1132  0.1132
              100        1.95  0.0999  0.0999  0.1094  0.1094
              100        1.95  0.1018  0.1018  0.12    0.12
              100        1.95  0.1069  0.1069  0.1099  0.1099
              SoilCrop LucerneSoil
                LL=[0.075, 0.0829, 0.0778, 0.0766, 0.0723, 0.0726, 0.0718, 0.0733, 0.0722, 0.0728, 0.0759, 0.0858, 0.0868, 0.091, 0.1, 0.1023, 0.0983, 0.0978, 0.0972, 0.0999, 0.1018, 0.1069]
                KL=[0.06, 0.06, 0.049, 0.048, 0.055, 0.05, 0.048, 0.059, 0.076, 0.051, 0.094, 0.069, 0.033, 0.03, 0.043, 0.043, 0.056, 0.061, 0.03, 0.03, 0.03, 0.03]
                XF=[1, 1, 1, 1, 1, 1, 1, 1, 1, 1, 1, 1, 1, 1, 1, 1, 1, 1, 1, 1, 1, 1]
            WaterBalance SoilWater: same as NewZealand.AshleyDene.Factors.SowingDate.SD1.Soil.SoilWater
            SoilNitrogen: same as NewZealand.AshleyDene.Factors.SowingDate.SD1.Soil.SoilNitrogen
            Organic: same as NewZealand.AshleyDene.Factors.SowingDate.SD1.Soil.Organic
            Sample Initial nitrogen: same as NewZealand.AshleyDene.Factors.SowingDate.SD1.Soil.Initial nitrogen
            InitialWater Initial water: PercentMethod=0; FractionFull=0.73
            CERESSoilTemperature
  Manager Test
```csharp
using APSIM.Shared.Utilities;
using Models.Storage;
using Models.Core;
using System;
namespace Models
{
    public class Script : Model, ITest
    {
        public void Run()
        {
            /*
            DataStore store = Apsim.Find(this, typeof(DataStore)) as DataStore;

            var data = store.Reader.GetData("PredictedObserved");
            var predictedShootWt = DataTableUtilities.GetColumnAsDoubles(data, "Predicted.ShootWt");
            var observedShootWt = DataTableUtilities.GetColumnAsDoubles(data, "Observed.ShootWt");

            var stats = MathUtilities.CalcRegressionStats("ShootWt", predictedShootWt, observedShootWt);

            if (stats.R2 < 0.1)
                throw new Exception("Test failed. R2 is below threshold. R2=" + stats.R2);
                */
        }
    }
}
```
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