Simulations: Version=130
  DataStore
    ExcelInput: SheetNames=[ObsAllData]
      FileNames=[C:\Data\Master\01Data\ProcessedData\CoverData\AshleyDene_SD1.xlsx]
    PredictedObserved: PredictedTableName=Report; ObservedTableName=ObsAllData; FieldNameUsedForMatch=Clock.Today; AllColumns=false
  Simulation AshleyDeneSowingDateSD1
    Weather: FileName=C:\Data\Master\01Data\ClimateAndObserved\AshleyDene.met
    Clock: Start=2010-10-21; End=2012-07-31
    Summary
    SoilArbitrator Soil Arbitrator
    Zone Field: Area=1; Slope=0; AspectAngle=0; Altitude=50
      Folder ManagerFolder
        Memo
          # ReportOnDates
          Disabled by [Clock].DoReport

          # SlurpSowingRule
          Critical manager to control the sowing rules and canopy paramters.

          # SetCropVariables
          Critical manager that controls the fractional light interception and extinction coeficient data input.
        Manager ReportOnDates
          activate = False
          TodayString =
```csharp
using APSIM.Shared.Utilities;
using System.Xml.Serialization;
using Models;
using Models.PMF;
using Models.Soils;
using System.Text;
using System.Collections.Generic;
using Models.Core;
using System;

namespace Models
{
    [Serializable] 
    public class Script : Model
    {
        [Link] Clock Clock;
        [Link] Models.Report DataRep;
        [Description("Report on specific dates (not activing)")]
        public bool activate { get; set; }
        public List<string> ObsDates;
        public string TodayString { get; set; }
        
        [EventSubscribe("StartOfSimulation")]
        private void OnStartOfSimulation(object sender, EventArgs e)
        { 
        	ObsDates = new List<string>();
        	if (activate)
        	{
            
            	ObsDates.Add("2011-06-09");
            	ObsDates.Add("2011-10-06");
            	ObsDates.Add("2011-10-20");
            	ObsDates.Add("2011-10-26");
            	ObsDates.Add("2011-11-03");
            	ObsDates.Add("2011-11-12");
            	ObsDates.Add("2011-11-17");
            	ObsDates.Add("2011-11-30");
            	ObsDates.Add("2011-12-14");
            	ObsDates.Add("2011-12-28");
            	ObsDates.Add("2012-01-11");
            	ObsDates.Add("2012-01-25");
            	ObsDates.Add("2012-02-08");
            	ObsDates.Add("2012-02-22");
            	ObsDates.Add("2012-03-07");
            	ObsDates.Add("2012-03-21");
            	ObsDates.Add("2012-04-04");
            	ObsDates.Add("2012-04-18");
            	ObsDates.Add("2012-05-02");
            	ObsDates.Add("2012-05-16");
            	ObsDates.Add("2012-05-30");
            	ObsDates.Add("2012-06-13");
            	ObsDates.Add("2012-08-06");
            	ObsDates.Add("2012-08-29");
            	ObsDates.Add("2012-09-13");
            	ObsDates.Add("2012-09-26");
            	ObsDates.Add("2012-10-10");
            	ObsDates.Add("2012-10-24");
            	ObsDates.Add("2012-11-08");
            	ObsDates.Add("2012-11-21");
            	ObsDates.Add("2012-12-05");
            	ObsDates.Add("2012-12-19");
            	ObsDates.Add("2013-01-04");
            	ObsDates.Add("2013-01-16");
            	ObsDates.Add("2013-01-30");
            	ObsDates.Add("2013-02-13");
            	ObsDates.Add("2013-02-27");
            	ObsDates.Add("2013-03-13");
            	ObsDates.Add("2013-03-27");
            	ObsDates.Add("2013-04-10");
            	ObsDates.Add("2013-04-23");
            	ObsDates.Add("2013-05-08");
            	ObsDates.Add("2013-06-26");
            	ObsDates.Add("2013-08-27");
            	ObsDates.Add("2013-09-12");
            	ObsDates.Add("2013-10-01");
            	ObsDates.Add("2013-10-14");
            	ObsDates.Add("2013-10-30");
            	ObsDates.Add("2013-11-12");
            	ObsDates.Add("2013-11-26");
            	ObsDates.Add("2013-12-10");
            	ObsDates.Add("2013-12-24");
            	ObsDates.Add("2014-01-07");
            	ObsDates.Add("2014-01-21");
            	ObsDates.Add("2014-02-04");
            	ObsDates.Add("2014-02-18");
            	ObsDates.Add("2014-03-26");
            	ObsDates.Add("2014-04-15");
            	}
        }
        
        [EventSubscribe("DoReport")]
        private void OnDoReport(object sender, EventArgs e)
        {
            TodayString = Clock.Today.ToString("yyyy-MM-dd");
            if (ObsDates.Contains(TodayString))
                DataRep.DoOutput();
        }

    }
}
```
        Manager SlurpSowingRule
          CultivarName = Lucerne
          InitialRootDepth = 15
          SowingDate = 10/21/2010 00:00:00
          RootDepth = 2300
          RFV = 11.5447
          KLReductionFactor = 0.000647328
          KLReductionDepth = 150
          YKLModifiers =
          XDepth =
          MaxG = 0.0637539
          R50 = 291.556
          SummerU = 0.00181167
          SummerCona = 5.12535
          WinterU = 1.54762
          WinterCona = 0.00105371
```csharp
using Models.Interfaces;
using Models.Soils;
using APSIM.Shared.Utilities;
using Models.PMF;
using Models.Core;
using System;
using Models.PMF.Organs;
        
namespace Models
{
    [Serializable] 
    [System.Xml.Serialization.XmlInclude(typeof(Model))]
    public class Script : Model
    {
        [Link] private Plant Slurp;
        [Link] private Clock Clock;
        [Link] private Soil Soil;
        [Link] private Zone zone;
        [Link(Type = LinkType.Path, Path = "[Slurp].Root")]
        private Root root;
        [Link]
        private IPhysical soilPhysical;
        
        [Description("Cultivar")]
        public string CultivarName { get; set; }
        [Description("Initial Root Depth")]
        public double InitialRootDepth { get; set; }
        [Description("Sowing Date")]
        public DateTime SowingDate { get; set; }
        [Description("Maximum Root Depth")]
        public double RootDepth { get; set; }
        [Description("Roof Front Velocity")]
        public double RFV { get; set; }
        [Description("Factor to change Kl modifier with Depth")]
        public double KLReductionFactor { get; set; }
        [Description("Depth that KL starts to decline")]
        public double KLReductionDepth { get; set; }
        
        public double[] YKLModifiers { get; set; }
        public double[] XDepth { get; set; }
        private double Depth { get; set; }
        
        [Description("Maximum Stomatal Conductance")]
        public double MaxG { get; set; }
        [Description("Stomatal Radn response")]
        public double R50 { get; set; }
        [Description("SummerU - 1st stage evaporation, controls the threshold which beyond will be 2nd stage.")]
        public double SummerU { get; set; }
        [Description("SummerCona - 2nd stage evaporation, controls how fast the water vapor")]
        public double SummerCona { get; set; }
        [Description("WinterU - 1st stage evaporation, controls the threshold which beyond will be 2nd stage.")]
        public double WinterU { get; set; }
        [Description("WinterCona - 2nd stage evaporation, controls how fast the water vapor")]
        public double WinterCona { get; set; }
        
        [EventSubscribe("DoManagement")]
        private void OnDoManagement(object sender, EventArgs e)
        {
            if (Clock.Today.Date == SowingDate)
            {
                Slurp.Sow(cultivar: CultivarName, population: 1, depth: InitialRootDepth, rowSpacing: 150);
                
                YKLModifiers = new double[soilPhysical.Thickness.Length];
                XDepth = new double[soilPhysical.Thickness.Length];
                Depth = 0;
                for (int layer = 0; layer < soilPhysical.Thickness.Length; layer++)
                {
                    Depth += soilPhysical.Thickness[layer] / 2;  //Add half of the thickness of the current layer so depth is the mid depth of that layer
                    if (Depth <= KLReductionDepth)
                    {
                        YKLModifiers[layer] = 1;
                        XDepth[layer] = Depth;
                    }
                    else
                    {
                        double KLMod = 1 * Math.Exp(-KLReductionFactor * (Depth - KLReductionDepth));
                        YKLModifiers[layer] = KLMod;
                        XDepth[layer] = Depth;
                    }
                    Depth += soilPhysical.Thickness[layer] / 2;  //Add the other half of the current layer so depth is the top of the next layer
                }
                object KLMods = YKLModifiers;
                zone.Set("Slurp.Root.KLModifier.XYPairs.Y", KLMods);
                object Depths = XDepth;
                zone.Set("Slurp.Root.KLModifier.XYPairs.X", Depths);
                object RD = RootDepth;
                zone.Set("Slurp.Root.MaximumRootDepth.FixedValue", RD);
                object RV = RFV;
                zone.Set("Slurp.Root.RootFrontVelocity.Potential.FixedValue", RV);
                object GMaxValue = MaxG;
                zone.Set("Slurp.Leaf.Gsmax350", GMaxValue); 
                object R50Value = R50; 
                zone.Set("Slurp.Leaf.R50", R50Value); 
                object SummerUValue = SummerU;
                zone.Set("Soil.SoilWater.SummerU", SummerUValue); 
                object SummerConaValue = SummerCona; 
                zone.Set("Soil.SoilWater.SummerCona", SummerConaValue); 
                object WinterUValue = WinterU;
                zone.Set("Soil.SoilWater.WinterU", WinterUValue); 
                object WinterConaValue = WinterCona; 
                zone.Set("Soil.SoilWater.WinterCona", WinterConaValue); 
                
            }
        }
    }
}
```
        Manager SetCropVariables
          CoverFile = C:\Data\Master\01Data\ProcessedData\CoverData\LAI_AshleyDene_SD1.csv
          Ext_coef = 0
          MaximumHeight = 395
          LAI = LAI
          Extinctioncoefficient = k
          Treatment =
          CoverRead = 0
          leaflai = 0
```csharp
using Models.Interfaces;
using System;
using Models.Core;
using System.Collections.Generic;
using System.Text;
using Models.PMF;
using Models;
using System.Xml.Serialization;
using APSIM.Shared.Utilities;
using System.Data;
using Models.Soils;
namespace Models
{
    [Serializable] 
    //[System.Xml.Serialization.XmlInclude(typeof(Model))]
    public class Script : Model
    {
        [Link] private Plant SCUM;
        [Link] private Clock Clock;
        [Link] private Zone zone;
        [Link] private Simulation Simulation;
        [Link] private Soil Soil;
        [Link] private ISummary mysum;
        [Link]
        private ISoilWater waterBalance;
        
        [Description("File of Light interception and Extinction coefficient")]
        public string CoverFile { get; set; }
        //[Description("Extinction coefficient (if constant).")]
        public double Ext_coef { get; set; }
        [Description("Maximum height of the crop at full cover")]
        public double MaximumHeight { get; set; }
        
        [XmlIgnore] private DataTable Covers { get; set; }
        [Description("Column name for the LEAF AREA INDEX")]
        public string LAI { get; set; }
        [Description("Column name for the USER provide Extinction coefficient")]
        public string Extinctioncoefficient { get; set; }
        //public string Irrigation { get; set; }
        public string Treatment { get; set; }
        
        public double CoverRead { get; set; }
        public double leaflai { get; private set; }
                
        [EventSubscribe("StartOfSimulation")]
        private void OnStartOfSimulation(object sender, EventArgs e)
        {
            
            Treatment = LAI;
            
            string fullFileName = PathUtilities.GetAbsolutePath(CoverFile, Simulation.FileName);
            
            ApsimTextFile textFile = new ApsimTextFile();
            textFile.Open(fullFileName);
            Covers = textFile.ToTable();
            textFile.Close();
        }
        
        [EventSubscribe("StartOfDay")]
        private void OnStartOfDay(object sender, EventArgs e)
        {
            foreach (DataRow row in Covers.Rows)
            {
                DateTime TodayDate = Convert.ToDateTime(row["Clock.Today"]);
                if (TodayDate.Date == Clock.Today.Date)
                {
                    mysum.WriteMessage(this, "Clock.Today" + Clock.Today.Date);
                    leaflai = Convert.ToDouble(row[Treatment]);
                    Ext_coef = Convert.ToDouble(row[Extinctioncoefficient]);
                }
            }
        
            //if ((bool)zone.Get("Slurp.IsAlive") == true)
            //{
                //Only assign cover valuse if crop is emerged

                CoverRead = 1 - Math.Exp( - Ext_coef * leaflai);

                /*
                if (CoverRead == 1)
                    leaflai = Math.Log(0.01) / -Ext_coef;
                else
                {
                    if (CoverRead > 0)
                        leaflai = Math.Log(1 - CoverRead) / -Ext_coef;
                    else
                        leaflai = 0;
                }
                */

                //Summary.WriteMessage(this, "LAI " + leaflai);
                object LAIResetValue = leaflai;
                zone.Set("Slurp.Leaf.Area.FixedValue", LAIResetValue);  
                object kResetValue = Ext_coef;
                zone.Set("Slurp.Leaf.ExtinctionCoefficient.FixedValue", kResetValue);  
                object HeightResetValue = CoverRead * MaximumHeight;
                zone.Set("Slurp.Leaf.Tallness.FixedValue", HeightResetValue);  
            //}
            
            /*if ((Clock.Today.DayOfYear == 160) && (Clock.Today.Year == 2011))
                waterBalance.Reset();
                */
        }
        /*[EventSubscribe("StartOfDay")]
        private void OnEndOfDay(object sender, EventArgs e)
        {
            if ((Clock.Today.DayOfYear == 66) && (Clock.Today.Year == 2012) && (Irrigation == "Rain"))
            {
                if (Cover == "Lucerne")
                {
                    double[] ValuesToSet = { 0.18, 0.21, 0.20, 0.06, 0.05, 0.06, 0.07, 0.08, 0.10, 0.14, 0.14, 0.14, 0.14 };
                    waterBalance.SW = ValuesToSet;
                }
                if (Cover == "Ryegrass")
                {
                    double[] ValuesToSet = { 0.14, 0.20, 0.25, 0.11, 0.07, 0.08, 0.09, 0.09, 0.11, 0.14, 0.14, 0.14, 0.14 };
                    waterBalance.SW = ValuesToSet;
                }
            }
        }*/
    }
}
```
        Manager ResetOnDate
          ResetDate = 06/25/2011 00:00:00
          ResetWater = Yes
          NewSW = 0.266, 0.189, 0.153, 0.125, 0.112, 0.104, 0.107, 0.112, 0.106, 0.102, 0.104, 0.109, 0.114, 0.121, 0.129, 0.121, 0.124, 0.115, 0.114, 0.114, 0.125, 0.11
```csharp
using Models.Soils.Nutrients;
using APSIM.Shared.Utilities;
using Models.Surface;
using Models.Utilities;
using Models.Soils.Nutrients;
using Models.Soils;
using Models.PMF;
using Models.Core;
using System;
using Models.Interfaces;

namespace Models
{
    [Serializable]
    public class Script : Model
    {
        [Link] private Clock Clock;
        [Link] private Plant Lucerne;
        [Link] private ISoilWater SoilWater;
        //[Link] Zone zone;
        [Link] private Summary Summary;

        [Description("Date to reset on:")]
        public DateTime ResetDate {get;set;}

        [Description("Reset Water? (Yes or No)")]
        public string ResetWater {get;set;}
        [Description("New values for SW (mm^3/mm^3)")]
        public double[] NewSW { get; set; }

        [EventSubscribe("DoManagement")]
        private void OnDoManagement(object sender, EventArgs e)
        {
            if (DateUtilities.WithinDates(ResetDate.Date, Clock.Today.Date, ResetDate.Date))
            {
                if (ResetWater == "Yes")
                {
                    Summary.WriteMessage(this, "Reset Water");
                    SoilWater.SW = NewSW;
                    //zone.Set("[Soil].SoilWater.SW", NewSW);
                }
            }
        }
    }
}
```
      Soil: SoilType=Udic Haplustept (US), Pallic orthic brown soil (NZ); Site=Ashley Dene: Lincoln University Research Farm; NearestTown=Lincoln; Country=New Zealand; Latitude=999999; Longitude=999999
        Comments=Soil water characterised from NNM (2 years). Stone content and BD  from Di and Cameron 2002. Soil saturation from Cichota 2013.
        Chemical
          Thickness  NO3N  NH4N
          200        31    8
          100        1.5   0.05
          100        1     0.03
          100        1     0.01
          100        1     0.01
          100        0.7   0.01
          100        0.5   0.01
          100        0.5   0.01
          100        0.5   0.01
          100        0.5   0.01
          100        0.5   0.01
          100        0.5   0.01
          100        0.5   0.01
          100        0.5   0.01
          100        0.5   0.01
          100        0.5   0.01
          100        0.5   0.01
          100        0.05  0.01
          100        0.05  0.01
          100        0.05  0.01
          100        0.05  0.01
          100        0     0
        Physical
          Thickness  BD     AirDry  LL15   DUL      SAT
          200        1.438  0.06    0.06   0.2527   0.266
          100        1.643  0.076   0.076  0.1843   0.194
          100        1.796  0.07    0.07   0.1501   0.158
          100        1.796  0.072   0.072  0.12825  0.135
          100        2.086  0.066   0.066  0.1121   0.118
          100        2.086  0.067   0.067  0.1083   0.114
          100        2.146  0.067   0.067  0.10545  0.111
          100        2.146  0.067   0.067  0.10925  0.115
          100        2.146  0.066   0.066  0.10925  0.115
          100        2.146  0.067   0.067  0.1045   0.11
          100        2.146  0.069   0.069  0.1007   0.106
          100        2.146  0.075   0.075  0.1102   0.116
          100        2.21   0.08    0.08   0.1083   0.114
          100        2.21   0.082   0.082  0.1235   0.13
          100        1.95   0.087   0.087  0.1311   0.138
          100        1.95   0.091   0.091  0.1273   0.134
          100        1.95   0.089   0.089  0.1197   0.126
          100        1.95   0.09    0.09   0.1216   0.128
          100        1.95   0.09    0.09   0.1159   0.122
          100        1.95   0.09    0.09   0.1102   0.116
          100        1.95   0.093   0.093  0.1216   0.128
          100        1.95   0.095   0.095  0.1273   0.134
          SoilCrop SlurpSoil
            LL=[0.05985, 0.076, 0.0703, 0.0722, 0.06555, 0.0665, 0.0665, 0.0665, 0.06555, 0.0665, 0.06935, 0.07505, 0.0798, 0.0817, 0.0874, 0.0912, 0.0893, 0.09025, 0.09025, 0.09025, 0.0931, 0.095]
            KL=[0.02792, 0.02792, 0.02792, 0.02792, 0.02792, 0.02792, 0.02792, 0.02792, 0.02792, 0.028, 0.02792, 0.02792, 0.02792, 0.02792, 0.02792, 0.02792, 0.02792, 0.02792, 0.02792, 0.02792, 0.02792, 0.02792]
            XF=[1, 1, 1, 1, 1, 1, 1, 1, 1, 1, 1, 1, 1, 1, 1, 1, 1, 1, 1, 1, 1, 1]
        WaterBalance SoilWater: SummerDate=1-Aug; SummerU=5; SummerCona=4.4; WinterDate=1-Apr; WinterU=5; WinterCona=2.5; DiffusConst=88; DiffusSlope=35.4; Salb=0.18; CN2Bare=68; CNRed=20; CNCov=0.8
          Thickness=[200, 100, 100, 100, 100, 100, 100, 100, 100, 100, 100, 100, 100, 100, 100, 100, 100, 100, 100, 100, 100, 100]
          SWCON=[0.99, 0.99, 0.99, 0.99, 0.99, 0.99, 0.99, 0.99, 0.99, 0.99, 0.99, 0.99, 0.99, 0.99, 0.99, 0.99, 0.99, 0.99, 0.99, 0.99, 0.99, 0.99]
        SoilNitrogen: fom_types=[default, manure, mucuna, lablab, shemp, stable]; fract_carb=[0.2, 0.3, 0.54, 0.57, 0.45, 0]; fract_cell=[0.7, 0.3, 0.37, 0.37, 0.47, 0.1]; fract_lign=[0.1, 0.4, 0.09, 0.06, 0.08, 0.9]; NPartitionApproach=0
          SoilNitrogenNO3 NO3
          SoilNitrogenNH4 NH4
          SoilNitrogenUrea Urea
          SoilNitrogenPlantAvailableNO3 PlantAvailableNO3
          SoilNitrogenPlantAvailableNH4 PlantAvailableNH4
        Organic: FOMCNRatio=50
          Thickness  Carbon  SoilCNRatio  FBiom  FInert  FOM
          200        3.57    14.5         0.025  0.45    194.46
          100        1.47    14.5         0.025  0.6     170.68
          100        1.2     14.5         0.015  0.75    149.808
          100        1.03    14.5         0.01   0.9     131.489
          100        0.47    14.5         0.01   0.96    115.409
          100        0.47    14.5         0.01   0.96    101.296
          100        0.47    14.5         0.01   0.96    88.9093
          100        0.47    14.5         0.01   0.96    78.0369
          100        0.47    14.5         0.01   0.96    68.4941
          100        0.47    14.5         0.01   0.96    60.1182
          100        0.47    14.5         0.01   0.96    52.7666
          100        0.47    14.5         0.01   0.96    46.3139
          100        0.47    14.5         0.01   0.96    40.6504
          100        0.47    14.5         0.01   0.96    35.6794
          100        0.47    14.5         0.01   0.96    31.3163
          100        0.47    14.5         0.01   0.96    27.4867
          100        0.47    14.5         0.01   0.96    24.1255
          100        0.47    14.5         0.01   0.96    21.1753
          100        0.47    14.5         0.01   0.96    18.5858
          100        0.47    14.5         0.01   0.96    16.313
          100        0.47    14.5         0.01   0.96    14.3182
          100        0.47    14.5         0.01   0.96    12.5673
        Sample InitialConditions: SWUnits=Volumetric; OCUnits=Total; PHUnits=Water
          Thickness=[200, 100, 100, 100, 100, 100, 100, 100, 100, 100, 100, 100, 100, 100, 100, 100, 100, 100, 100, 100, 100, 100]
          SW=[0.204, 0.168, 0.134, 0.11, 0.102, 0.098, 0.1, 0.103, 0.101, 0.097, 0.096, 0.1, 0.106, 0.106, 0.114, 0.117, 0.112, 0.109, 0.11, 0.11, 0.114, 0.118]
        CERESSoilTemperature Temperature
      Plant Slurp
      MicroClimate: a_interception=0; b_interception=1; c_interception=0; d_interception=0; soil_albedo=0.23; SoilHeatFluxFraction=0.4; MinimumHeightDiffForNewLayer=0; NightInterceptionFraction=0.5; ReferenceHeight=2
      Irrigation
      Fertiliser
      SurfaceOrganicMatter surface organic matter: InitialResidueName=wheat; InitialResidueType=wheat; InitialResidueMass=2000; InitialStandingFraction=0; InitialCPR=0; InitialCNR=80
      Report: EventNames=[Clock].DoReport
        VariableNames:
          [Clock].Today
          [Soil].SoilWater.SummerU as SummerU
          [Soil].SoilWater.SummerCona as SummerCona
          [SetCropVariables].Script.Ext_coef as k
          [Slurp].Leaf.CoverTotal as cover
          [Slurp].Leaf.LAI as LAI
          [Slurp].Leaf.Height as Height
          [Slurp].AboveGround as AboveGroundBiomass
          [Slurp].Root.Depth as RootDepth
          [Soil].SoilWater.SWmm as SWmm
          [Soil].Physical.DULmm as DULmm
          [Soil].Physical.LL15mm as LL15mm
          sum([Soil].SoilWater.SWmm) as SWCmm
          sum([Soil].Physical.DULmm) as DULmm
          sum([Soil].Physical.LL15mm) as LL15mm
          [SlurpSowingRule].Script.CultivarName as CropNameCheck
          [Soil].Physical.SlurpSoil.KL as kl
          [SlurpSowingRule].Script.KLReductionFactor as KLRCheck
          [SlurpSowingRule].Script.RootDepth as RDpCheck
          [SlurpSowingRule].Script.RFV as RFVCheck
          [SlurpSowingRule].Script.YKLModifiers as KLmodCheck
          [SlurpSowingRule].Script.XDepth as KLdepCheck
          [SlurpSowingRule].Script.MaxG as Gsmax
          [SlurpSowingRule].Script.R50 as R50
          [SlurpSowingRule].Script.SummerU as SummerU
          [SlurpSowingRule].Script.SummerCona as SummerCona
          [SlurpSowingRule].Script.WinterU as WinterU
          [SlurpSowingRule].Script.WinterCona as WinterCona
          [SetCropVariables].Script.CoverRead as CoverCheck
