Simulations: Version=130
  DataStore
    ExcelInput: FileNames=[ObsAllData.xlsx]; SheetNames=[ObsAllData]
    PredictedObserved: PredictedTableName=Report; ObservedTableName=ObsAllData; FieldNameUsedForMatch=Clock.Today; AllColumns=false
  Folder New Zealand
    Experiment AshleyDene
      Factors
        Factor SowingDate
          CompositeFactor SD1
            Specifications:
              [SlurpSowingRule].Script.SowingDate = 2010-10-21
              [Clock].StartDate = 2010-10-21
              [Soil]
              [ResetOnDate].Script.ResetDate = 2011-06-25
              [ResetOnDate].Script.ResetWater = Yes
              [ResetOnDate].Script.NewSW = 0.266,0.189,0.153,0.125,0.112,0.104,0.107,0.112,0.106,0.102,0.104,0.109,0.114,0.121,0.129,0.121,0.124,0.115,0.114,0.114,0.125,0.11
              [Soil].Physical.SlurpSoil.KL[1:22] = 0.0279200184449545
              [SlurpSowingRule].Script.RFV = 11.5447044373723
              [SlurpSowingRule].Script.KLReductionFactor = 1.0079826869129e-06
              [SlurpSowingRule].Script.MaxG = 0.0637539478055612
              [SlurpSowingRule].Script.R50 = 291.556297834895
              [SlurpSowingRule].Script.SummerU = 0.000378673655981213
              [SlurpSowingRule].Script.SummerCona = 5.12535209865891
              [SlurpSowingRule].Script.WinterU = 1.54761799648701
              [SlurpSowingRule].Script.WinterCona = 0.00127943297621047
              [SetCropVariables].Script.CoverFile = C:/Data/Master/01Data/ProcessedData/CoverData/LAI_AshleyDene_SD1.csv
              [SetCropVariables].Script.MaximumHeight = 390
            Soil: SoilType=Udic Haplustept (US), Pallic orthic brown soil (NZ); Site=Ashley Dene: Lincoln University Research Farm; NearestTown=Lincoln; Country=New Zealand; Latitude=999999; Longitude=999999
              Comments=Soil water characterised from NNM (2 years). Stone content and BD  from Di and Cameron 2002. Soil saturation from Cichota 2013.
              Chemical
                Thickness  NO3N  NH4N  PH
                200        31    8     6
                100        1.5   0.05  -
                100        1     0.03  -
                100        1     0.01  -
                100        1     0.01  -
                100        0.7   0.01  -
                100        0.5   0.01  -
                100        0.5   0.01  -
                100        0.5   0.01  -
                100        0.5   0.01  -
                100        0.5   0.01  -
                100        0.5   0.01  -
                100        0.5   0.01  -
                100        0.5   0.01  -
                100        0.5   0.01  -
                100        0.5   0.01  -
                100        0.5   0.01  -
                100        0.05  0.01  -
                100        0.05  0.01  -
                100        0.05  0.01  -
                100        0.05  0.01  -
                100        0     0     -
              Physical
                Thickness  BD     AirDry  LL15   DUL    SAT
                200        1.438  0.06    0.06   0.253  0.27
                100        1.643  0.076   0.076  0.184  0.194
                100        1.796  0.07    0.07   0.15   0.158
                100        1.796  0.072   0.072  0.128  0.135
                100        2.086  0.066   0.066  0.112  0.118
                100        2.086  0.067   0.067  0.108  0.114
                100        2.146  0.067   0.067  0.105  0.111
                100        2.146  0.067   0.067  0.109  0.115
                100        2.146  0.066   0.066  0.109  0.115
                100        2.146  0.067   0.067  0.105  0.11
                100        2.146  0.069   0.069  0.101  0.106
                100        2.146  0.075   0.075  0.11   0.116
                100        2.21   0.08    0.08   0.108  0.114
                100        2.21   0.082   0.082  0.124  0.13
                100        1.95   0.087   0.087  0.131  0.138
                100        1.95   0.091   0.091  0.127  0.134
                100        1.95   0.089   0.089  0.12   0.126
                100        1.95   0.09    0.09   0.122  0.128
                100        1.95   0.09    0.09   0.116  0.122
                100        1.95   0.09    0.09   0.11   0.116
                100        1.95   0.093   0.093  0.122  0.128
                100        1.95   0.095   0.095  0.127  0.147
                SoilCrop SlurpSoil
                  LL=[0.06, 0.076, 0.07, 0.072, 0.066, 0.067, 0.067, 0.067, 0.066, 0.067, 0.069, 0.075, 0.08, 0.082, 0.087, 0.091, 0.089, 0.09, 0.09, 0.09, 0.093, 0.095]
                  KL=[0.06, 0.044, 0.044, 0.044, 0.051, 0.051, 0.051, 0.062, 0.062, 0.062, 0.065, 0.065, 0.065, 0.046, 0.046, 0.046, 0.054, 0.054, 0.054, 0.022, 0.022, 0.022]
                  XF=[1, 1, 1, 1, 1, 1, 1, 1, 1, 1, 1, 1, 1, 1, 1, 1, 1, 1, 1, 1, 1, 1]
              WaterBalance SoilWater: SummerDate=1-Oct; SummerU=5; SummerCona=4.4; WinterDate=1-Mar; WinterU=5; WinterCona=2.5; DiffusConst=88; DiffusSlope=35.4; Salb=0.18; CN2Bare=68; CNRed=20; CNCov=0.8
                Thickness=[200, 100, 100, 100, 100, 100, 100, 100, 100, 100, 100, 100, 100, 100, 100, 100, 100, 100, 100, 100, 100, 100]
                SWCON=[0.99, 0.99, 0.99, 0.99, 0.99, 0.99, 0.99, 0.99, 0.99, 0.99, 0.99, 0.99, 0.99, 0.99, 0.99, 0.99, 0.99, 0.99, 0.99, 0.99, 0.99, 0.99]
              SoilNitrogen: fom_types=[default, manure, mucuna, lablab, shemp, stable]; fract_carb=[0.2, 0.3, 0.54, 0.57, 0.45, 0]; fract_cell=[0.7, 0.3, 0.37, 0.37, 0.47, 0.1]; fract_lign=[0.1, 0.4, 0.09, 0.06, 0.08, 0.9]; NPartitionApproach=0
                SoilNitrogenNO3 NO3
                SoilNitrogenNH4 NH4
                SoilNitrogenUrea Urea
                SoilNitrogenPlantAvailableNO3 PlantAvailableNO3
                SoilNitrogenPlantAvailableNH4 PlantAvailableNH4
              Organic: FOMCNRatio=50
                Thickness  Carbon  SoilCNRatio  FBiom  FInert  FOM
                200        3.57    14.5         0.025  0.45    194.46
                100        1.47    14.5         0.025  0.6     170.68
                100        1.2     14.5         0.015  0.75    149.808
                100        1.03    14.5         0.01   0.9     131.489
                100        0.47    14.5         0.01   0.96    115.409
                100        0.47    14.5         0.01   0.96    101.296
                100        0.47    14.5         0.01   0.96    88.9093
                100        0.47    14.5         0.01   0.96    78.0369
                100        0.47    14.5         0.01   0.96    68.4941
                100        0.47    14.5         0.01   0.96    60.1182
                100        0.47    14.5         0.01   0.96    52.7666
                100        0.47    14.5         0.01   0.96    46.3139
                100        0.47    14.5         0.01   0.96    40.6504
                100        0.47    14.5         0.01   0.96    35.6794
                100        0.47    14.5         0.01   0.96    31.3163
                100        0.47    14.5         0.01   0.96    27.4867
                100        0.47    14.5         0.01   0.96    24.1255
                100        0.47    14.5         0.01   0.96    21.1753
                100        0.47    14.5         0.01   0.96    18.5858
                100        0.47    14.5         0.01   0.96    16.313
                100        0.47    14.5         0.01   0.96    14.3182
                100        0.47    14.5         0.01   0.96    12.5673
              CERESSoilTemperature Temperature
              Sample InitialConditions: SWUnits=Volumetric; OCUnits=Total; PHUnits=Water
                Thickness=[200, 100, 100, 100, 100, 100, 100, 100, 100, 100, 100, 100, 100, 100, 100, 100, 100, 100, 100, 100, 100, 100]
                SW=[0.13, 0.12, 0.1, 0.09, 0.102, 0.098, 0.1, 0.103, 0.101, 0.097, 0.096, 0.1, 0.106, 0.106, 0.114, 0.117, 0.112, 0.109, 0.11, 0.11, 0.114, 0.118]
          CompositeFactor SD2
            Specifications:
              [SlurpSowingRule].Script.SowingDate = 2010-11-09
              [Clock].StartDate = 2010-11-09
              [Soil]
              [ResetOnDate].Script.ResetDate = 2011-06-25
              [ResetOnDate].Script.ResetWater = Yes
              [ResetOnDate].Script.NewSW = 0.27,0.212,0.166,0.13,0.116,0.116,0.105,0.104,0.099,0.094,0.094,0.099,0.106,0.111,0.108,0.1,0.102,0.105,0.107,0.105,0.107,0.113
              [Soil].Physical.SlurpSoil.KL[1:22] = 0.0280695362934436
              [SlurpSowingRule].Script.RFV = 12.3582339746248
              [SlurpSowingRule].Script.KLReductionFactor = 1.51025313081557e-06
              [SlurpSowingRule].Script.MaxG = 0.0132232582949537
              [SlurpSowingRule].Script.R50 = 62.838786075396
              [SlurpSowingRule].Script.SummerU = 6.51283464464914
              [SlurpSowingRule].Script.SummerCona = 5.42471292387107
              [SlurpSowingRule].Script.WinterU = 0.280694535976036
              [SlurpSowingRule].Script.WinterCona = 1.00319157779986
              [SetCropVariables].Script.CoverFile = C:/Data/Master/01Data/ProcessedData/CoverData/LAI_AshleyDene_SD2.csv
              [SetCropVariables].Script.MaximumHeight = 390
            Soil: SoilType=Udic Haplustept (US), Pallic orthic brown soil (NZ); Site=Ashley Dene: Lincoln University Research Farm; NearestTown=Lincoln; Country=New Zealand; Latitude=999999; Longitude=999999
              Comments=Soil water characterised from NNM (2 years). Stone content and BD  from Di and Cameron 2002. Soil saturation from Cichota 2013.
              Chemical: same as New Zealand.AshleyDene.Factors.SowingDate.SD1.Soil.Chemical
              Physical
                Thickness  BD     AirDry  LL15   DUL    SAT
                200        1.438  0.072   0.072  0.257  0.275
                100        1.643  0.091   0.091  0.21   0.221
                100        1.796  0.08    0.08   0.16   0.168
                100        1.796  0.069   0.069  0.128  0.135
                100        2.086  0.07    0.07   0.115  0.121
                100        2.086  0.068   0.068  0.112  0.118
                100        2.146  0.065   0.065  0.106  0.112
                100        2.146  0.061   0.061  0.103  0.108
                100        2.146  0.061   0.061  0.097  0.102
                100        2.146  0.061   0.061  0.096  0.101
                100        2.146  0.061   0.061  0.096  0.101
                100        2.146  0.061   0.061  0.105  0.111
                100        2.21   0.065   0.065  0.114  0.12
                100        2.21   0.061   0.061  0.117  0.123
                100        1.95   0.067   0.067  0.108  0.114
                100        1.95   0.067   0.067  0.104  0.109
                100        1.95   0.069   0.069  0.103  0.108
                100        1.95   0.072   0.072  0.106  0.112
                100        1.95   0.075   0.075  0.109  0.115
                100        1.95   0.078   0.078  0.108  0.114
                100        1.95   0.083   0.083  0.112  0.118
                100        1.95   0.097   0.097  0.114  0.12
                SoilCrop SlurpSoil
                  LL=[0.072, 0.091, 0.08, 0.069, 0.07, 0.068, 0.065, 0.061, 0.061, 0.061, 0.061, 0.061, 0.065, 0.061, 0.067, 0.067, 0.069, 0.072, 0.075, 0.078, 0.083, 0.097]
                  KL=[0.06, 0.044, 0.044, 0.044, 0.051, 0.051, 0.051, 0.062, 0.062, 0.062, 0.065, 0.065, 0.065, 0.046, 0.046, 0.046, 0.054, 0.054, 0.054, 0.022, 0.022, 0.022]
                  XF=[1, 1, 1, 1, 1, 1, 1, 1, 1, 1, 1, 1, 1, 1, 1, 1, 1, 1, 1, 1, 1, 1]
              WaterBalance SoilWater: same as New Zealand.AshleyDene.Factors.SowingDate.SD1.Soil.SoilWater
              SoilNitrogen: same as New Zealand.AshleyDene.Factors.SowingDate.SD1.Soil.SoilNitrogen
              Organic: same as New Zealand.AshleyDene.Factors.SowingDate.SD1.Soil.Organic
              CERESSoilTemperature Temperature
              Sample InitialConditions: SWUnits=Volumetric; OCUnits=Total; PHUnits=Water
                Thickness=[200, 100, 100, 100, 100, 100, 100, 100, 100, 100, 100, 100, 100, 100, 100, 100, 100, 100, 100, 100, 100, 100]
                SW=[0.205, 0.189, 0.143, 0.114, 0.103, 0.101, 0.096, 0.093, 0.095, 0.087, 0.09, 0.095, 0.102, 0.103, 0.098, 0.095, 0.094, 0.102, 0.107, 0.107, 0.109, 0.114]
          CompositeFactor SD3
            Specifications:
              [SlurpSowingRule].Script.SowingDate = 2010-12-08
              [Clock].StartDate = 2010-12-08
              [Soil]
              [ResetOnDate].Script.ResetDate = 2011-06-25
              [ResetOnDate].Script.ResetWater = Yes
              [ResetOnDate].Script.NewSW = 0.268,0.211,0.156,0.136,0.13,0.113,0.117,0.112,0.099,0.096,0.097,0.098,0.109,0.108,0.104,0.107,0.107,0.107,0.111,0.119,0.121,0.121
              [Soil].Physical.SlurpSoil.KL[1:22] = 0.0341881420096295
              [SlurpSowingRule].Script.RFV = 13.9815783497029
              [SlurpSowingRule].Script.KLReductionFactor = 1.38691625760915e-05
              [SlurpSowingRule].Script.MaxG = 0.0310040771932412
              [SlurpSowingRule].Script.R50 = 295.077194334675
              [SlurpSowingRule].Script.SummerU = 8.7527144901007e-06
              [SlurpSowingRule].Script.SummerCona = 5.02175366599343
              [SlurpSowingRule].Script.WinterU = 1.12164135037648
              [SlurpSowingRule].Script.WinterCona = 0.000631813469602914
              [SetCropVariables].Script.CoverFile = C:/Data/Master/01Data/ProcessedData/CoverData/LAI_AshleyDene_SD3.csv
              [SetCropVariables].Script.MaximumHeight = 390
            Soil: SoilType=Udic Haplustept (US), Pallic orthic brown soil (NZ); Site=Ashley Dene: Lincoln University Research Farm; NearestTown=Lincoln; Country=New Zealand; Latitude=999999; Longitude=999999
              Comments=Soil water characterised from NNM (2 years). Stone content and BD  from Di and Cameron 2002. Soil saturation from Cichota 2013.
              Chemical: same as New Zealand.AshleyDene.Factors.SowingDate.SD1.Soil.Chemical
              Physical
                Thickness  BD     AirDry  LL15   DUL    SAT
                200        1.438  0.07    0.07   0.264  0.278
                100        1.643  0.082   0.082  0.201  0.212
                100        1.796  0.077   0.077  0.158  0.166
                100        1.796  0.075   0.075  0.136  0.143
                100        2.086  0.07    0.07   0.126  0.133
                100        2.086  0.067   0.067  0.113  0.119
                100        2.146  0.068   0.068  0.121  0.127
                100        2.146  0.066   0.066  0.111  0.117
                100        2.146  0.061   0.061  0.102  0.107
                100        2.146  0.06    0.06   0.099  0.104
                100        2.146  0.062   0.062  0.1    0.105
                100        2.146  0.064   0.064  0.104  0.109
                100        2.21   0.066   0.066  0.109  0.115
                100        2.21   0.068   0.068  0.111  0.117
                100        1.95   0.07    0.07   0.111  0.117
                100        1.95   0.072   0.072  0.108  0.114
                100        1.95   0.077   0.077  0.108  0.114
                100        1.95   0.084   0.084  0.107  0.113
                100        1.95   0.089   0.089  0.114  0.12
                100        1.95   0.095   0.095  0.117  0.123
                100        1.95   0.094   0.094  0.119  0.125
                100        1.95   0.09    0.09   0.117  0.123
                SoilCrop SlurpSoil
                  LL=[0.07, 0.082, 0.077, 0.075, 0.07, 0.067, 0.068, 0.066, 0.061, 0.06, 0.062, 0.064, 0.066, 0.068, 0.07, 0.072, 0.077, 0.084, 0.089, 0.095, 0.094, 0.09]
                  KL=[0.06, 0.044, 0.044, 0.044, 0.051, 0.051, 0.051, 0.062, 0.062, 0.062, 0.065, 0.065, 0.065, 0.046, 0.046, 0.046, 0.054, 0.054, 0.054, 0.022, 0.022, 0.022]
                  XF=[1, 1, 1, 1, 1, 1, 1, 1, 1, 1, 1, 1, 1, 1, 1, 1, 1, 1, 1, 1, 1, 1]
              WaterBalance SoilWater: same as New Zealand.AshleyDene.Factors.SowingDate.SD1.Soil.SoilWater
              SoilNitrogen: same as New Zealand.AshleyDene.Factors.SowingDate.SD1.Soil.SoilNitrogen
              Organic: same as New Zealand.AshleyDene.Factors.SowingDate.SD1.Soil.Organic
              CERESSoilTemperature Temperature
              Sample InitialConditions: SWUnits=Volumetric; OCUnits=Total; PHUnits=Water
                Thickness=[200, 100, 100, 100, 100, 100, 100, 100, 100, 100, 100, 100, 100, 100, 100, 100, 100, 100, 100, 100, 100, 100]
                SW=[0.133, 0.139, 0.116, 0.109, 0.099, 0.094, 0.105, 0.096, 0.088, 0.088, 0.085, 0.091, 0.096, 0.1, 0.102, 0.098, 0.101, 0.102, 0.107, 0.111, 0.111, 0.121]
          CompositeFactor SD4
            Specifications:
              [SlurpSowingRule].Script.SowingDate = 2011-01-13
              [Clock].StartDate = 2011-01-13
              [Soil]
              [ResetOnDate].Script.ResetDate = 2011-06-25
              [ResetOnDate].Script.ResetWater = Yes
              [ResetOnDate].Script.NewSW = 0.284,0.235,0.181,0.146,0.123,0.114,0.108,0.11,0.107,0.103,0.104,0.106,0.111,0.11,0.108,0.114,0.115,0.119,0.118,0.113,0.115,0.116
              [Soil].Physical.SlurpSoil.KL[1:22] = 0.03413403457592
              [SlurpSowingRule].Script.RFV = 16.7463991711493
              [SlurpSowingRule].Script.KLReductionFactor = 2.02850570871766e-08
              [SlurpSowingRule].Script.MaxG = 0.0604123347591918
              [SlurpSowingRule].Script.R50 = 299.901433272906
              [SlurpSowingRule].Script.SummerU = 2.13135704283869e-06
              [SlurpSowingRule].Script.SummerCona = 4.45023060903417
              [SlurpSowingRule].Script.WinterU = 1.2769669482633
              [SlurpSowingRule].Script.WinterCona = 7.66738723952956e-05
              [SetCropVariables].Script.CoverFile = C:/Data/Master/01Data/ProcessedData/CoverData/LAI_AshleyDene_SD4.csv
              [SetCropVariables].Script.MaximumHeight = 390
            Soil: SoilType=Udic Haplustept (US), Pallic orthic brown soil (NZ); Site=Ashley Dene: Lincoln University Research Farm; NearestTown=Lincoln; Country=New Zealand; Latitude=999999; Longitude=999999
              Comments=Soil water characterised from NNM (2 years). Stone content and BD  from Di and Cameron 2002. Soil saturation from Cichota 2013.
              Chemical
                Thickness  NO3N  NH4N
                200        31    8
                100        1.5   0.05
                100        1     0.03
                100        1     0.01
                100        1     0.01
                100        0.7   0.01
                100        0.5   0.01
                100        0.5   0.01
                100        0.5   0.01
                100        0.5   0.01
                100        0.5   0.01
                100        0.5   0.01
                100        0.5   0.01
                100        0.5   0.01
                100        0.5   0.01
                100        0.5   0.01
                100        0.5   0.01
                100        0.05  0.01
                100        0.05  0.01
                100        0.05  0.01
                100        0.05  0.01
                100        0     0
                PH=[6, -, -, -, -, -, -, -, -, -, -, -, -, -, -, -, -, -, -, -, -, -, -]
              Physical
                Thickness  BD     AirDry  LL15   DUL    SAT
                200        1.438  0.067   0.067  0.285  0.3
                100        1.643  0.079   0.079  0.231  0.243
                100        1.796  0.071   0.071  0.172  0.181
                100        1.796  0.067   0.067  0.143  0.151
                100        2.086  0.065   0.065  0.123  0.129
                100        2.086  0.064   0.064  0.114  0.12
                100        2.146  0.065   0.065  0.108  0.114
                100        2.146  0.065   0.065  0.108  0.114
                100        2.146  0.065   0.065  0.105  0.111
                100        2.146  0.067   0.067  0.105  0.11
                100        2.146  0.071   0.071  0.104  0.109
                100        2.146  0.076   0.076  0.11   0.116
                100        2.21   0.079   0.079  0.115  0.121
                100        2.21   0.082   0.082  0.111  0.117
                100        1.95   0.088   0.088  0.11   0.116
                100        1.95   0.096   0.096  0.114  0.12
                100        1.95   0.102   0.102  0.116  0.122
                100        1.95   0.105   0.105  0.117  0.123
                100        1.95   0.103   0.103  0.116  0.122
                100        1.95   0.1     0.1    0.111  0.117
                100        1.95   0.102   0.102  0.111  0.117
                100        1.95   0.101   0.101  0.112  0.118
                SoilCrop SlurpSoil
                  LL=[0.067, 0.079, 0.071, 0.067, 0.065, 0.064, 0.065, 0.065, 0.065, 0.067, 0.071, 0.076, 0.079, 0.082, 0.088, 0.096, 0.102, 0.105, 0.103, 0.1, 0.102, 0.101]
                  KL=[0.06, 0.044, 0.044, 0.044, 0.051, 0.051, 0.051, 0.062, 0.062, 0.062, 0.065, 0.065, 0.065, 0.046, 0.046, 0.046, 0.054, 0.054, 0.054, 0.022, 0.022, 0.022]
                  XF=[1, 1, 1, 1, 1, 1, 1, 1, 1, 1, 1, 1, 1, 1, 1, 1, 1, 1, 1, 1, 1, 1]
              WaterBalance SoilWater: same as New Zealand.AshleyDene.Factors.SowingDate.SD1.Soil.SoilWater
              SoilNitrogen: same as New Zealand.AshleyDene.Factors.SowingDate.SD1.Soil.SoilNitrogen
              Organic: same as New Zealand.AshleyDene.Factors.SowingDate.SD1.Soil.Organic
              CERESSoilTemperature Temperature
              Sample InitialConditions: SWUnits=Volumetric; OCUnits=Total; PHUnits=Water
                Thickness=[200, 100, 100, 100, 100, 100, 100, 100, 100, 100, 100, 100, 100, 100, 100, 100, 100, 100, 100, 100, 100, 100]
                SW=[0.194, 0.18, 0.134, 0.111, 0.098, 0.091, 0.091, 0.094, 0.09, 0.091, 0.09, 0.1, 0.102, 0.105, 0.106, 0.109, 0.112, 0.118, 0.118, 0.113, 0.115, 0.116]
          CompositeFactor SD5
            Specifications:
              [SlurpSowingRule].Script.SowingDate = 2011-02-03
              [Clock].StartDate = 2011-02-03
              [Soil]
              [ResetOnDate].Script.ResetDate = 2011-06-25
              [ResetOnDate].Script.ResetWater = Yes
              [ResetOnDate].Script.NewSW = 0.283,0.196,0.161,0.135,0.12,0.112,0.104,0.097,0.099,0.101,0.104,0.099,0.103,0.105,0.11,0.108,0.109,0.109,0.106,0.104,0.106,0.107
              [Soil].Physical.SlurpSoil.KL[1:22] = 0.0353686520122628
              [SlurpSowingRule].Script.RFV = 18.831955742819
              [SlurpSowingRule].Script.KLReductionFactor = 2.89392464366907e-07
              [SlurpSowingRule].Script.MaxG = 0.0773848982588472
              [SlurpSowingRule].Script.R50 = 299.192327630463
              [SlurpSowingRule].Script.SummerU = 8.81421469720083e-05
              [SlurpSowingRule].Script.SummerCona = 4.4594546558763
              [SlurpSowingRule].Script.WinterU = 1.44858759846621
              [SlurpSowingRule].Script.WinterCona = 0.000664257483005752
              [SetCropVariables].Script.CoverFile = C:/Data/Master/01Data/ProcessedData/CoverData/LAI_AshleyDene_SD5.csv
              [SetCropVariables].Script.MaximumHeight = 390
            Soil: SoilType=Udic Haplustept (US), Pallic orthic brown soil (NZ); Site=Ashley Dene: Lincoln University Research Farm; NearestTown=Lincoln; Country=New Zealand; Latitude=999999; Longitude=999999
              Comments=Soil water characterised from NNM (2 years). Stone content and BD  from Di and Cameron 2002. Soil saturation from Cichota 2013.
              Chemical: same as New Zealand.AshleyDene.Factors.SowingDate.SD4.Soil.Chemical
              Physical
                Thickness  BD     AirDry  LL15   DUL    SAT
                200        1.438  0.063   0.063  0.269  0.283
                100        1.643  0.073   0.073  0.196  0.206
                100        1.796  0.073   0.073  0.154  0.162
                100        1.796  0.068   0.068  0.137  0.144
                100        2.086  0.067   0.067  0.12   0.126
                100        2.086  0.067   0.067  0.108  0.114
                100        2.146  0.062   0.062  0.105  0.11
                100        2.146  0.06    0.06   0.101  0.106
                100        2.146  0.061   0.061  0.103  0.108
                100        2.146  0.065   0.065  0.099  0.104
                100        2.146  0.067   0.067  0.105  0.111
                100        2.146  0.069   0.069  0.103  0.108
                100        2.21   0.073   0.073  0.105  0.11
                100        2.21   0.078   0.078  0.108  0.114
                100        1.95   0.081   0.081  0.113  0.119
                100        1.95   0.084   0.084  0.111  0.117
                100        1.95   0.085   0.085  0.11   0.116
                100        1.95   0.086   0.086  0.109  0.115
                100        1.95   0.084   0.084  0.104  0.109
                100        1.95   0.084   0.084  0.105  0.11
                100        1.95   0.085   0.085  0.102  0.107
                100        1.95   0.086   0.086  0.105  0.111
                SoilCrop SlurpSoil
                  LL=[0.063, 0.073, 0.073, 0.068, 0.067, 0.067, 0.062, 0.06, 0.061, 0.065, 0.067, 0.069, 0.073, 0.078, 0.081, 0.084, 0.085, 0.086, 0.084, 0.084, 0.085, 0.086]
                  KL=[0.06, 0.044, 0.044, 0.044, 0.051, 0.051, 0.051, 0.062, 0.062, 0.062, 0.065, 0.065, 0.065, 0.046, 0.046, 0.046, 0.054, 0.054, 0.054, 0.022, 0.022, 0.022]
                  XF=[1, 1, 1, 1, 1, 1, 1, 1, 1, 1, 1, 1, 1, 1, 1, 1, 1, 1, 1, 1, 1, 1]
              WaterBalance SoilWater: same as New Zealand.AshleyDene.Factors.SowingDate.SD1.Soil.SoilWater
              SoilNitrogen: same as New Zealand.AshleyDene.Factors.SowingDate.SD1.Soil.SoilNitrogen
              Organic: same as New Zealand.AshleyDene.Factors.SowingDate.SD1.Soil.Organic
              CERESSoilTemperature Temperature
              Sample InitialConditions: SWUnits=Volumetric; OCUnits=Total; PHUnits=Water
                Thickness=[200, 100, 100, 100, 100, 100, 100, 100, 100, 100, 100, 100, 100, 100, 100, 100, 100, 100, 100, 100, 100, 100]
                SW=[0.167, 0.15, 0.118, 0.106, 0.099, 0.088, 0.087, 0.087, 0.087, 0.087, 0.091, 0.089, 0.093, 0.095, 0.1, 0.101, 0.101, 0.101, 0.102, 0.096, 0.099, 0.1]
          CompositeFactor SD6
            Specifications:
              [SlurpSowingRule].Script.SowingDate = 2011-10-10
              [Clock].StartDate = 2011-10-10
              [Soil]
              [ResetOnDate].Script.ResetDate = 2011-10-10
              [ResetOnDate].Script.ResetWater = Yes
              [ResetOnDate].Script.NewSW = 0.184,0.16,0.121,0.102,0.093,0.089,0.091,0.093,0.098,0.094,0.091,0.089,0.089,0.089,0.096,0.098,0.105,0.102,0.102,0.099,0.104,0.109
              [Soil].Physical.SlurpSoil.KL[1:22] = 0.084377709995598
              [SlurpSowingRule].Script.RFV = 48.3939010455702
              [SlurpSowingRule].Script.KLReductionFactor = 0.00102478793225724
              [SlurpSowingRule].Script.MaxG = 0.0199445549306258
              [SlurpSowingRule].Script.R50 = 290.174162163284
              [SlurpSowingRule].Script.SummerU = 3.2244561470525
              [SlurpSowingRule].Script.SummerCona = 1.27650398589808
              [SlurpSowingRule].Script.WinterU = 2.78922331581763
              [SlurpSowingRule].Script.WinterCona = 0.0966381820376287
            Soil: SoilType=Udic Haplustept (US), Pallic orthic brown soil (NZ); Site=Ashley Dene: Lincoln University Research Farm; NearestTown=Lincoln; Country=New Zealand; Latitude=999999; Longitude=999999
              Comments=Soil water characterised from NNM (2 years). Stone content and BD  from Di and Cameron 2002. Soil saturation from Cichota 2013.
              Chemical: same as New Zealand.AshleyDene.Factors.SowingDate.SD1.Soil.Chemical
              Physical
                Thickness  BD     AirDry  LL15   DUL    SAT
                200        1.438  0.07    0.07   0.246  0.259
                100        1.643  0.082   0.082  0.163  0.172
                100        1.796  0.074   0.074  0.126  0.133
                100        1.796  0.069   0.069  0.103  0.108
                100        2.086  0.068   0.068  0.097  0.102
                100        2.086  0.069   0.069  0.098  0.103
                100        2.146  0.07    0.07   0.097  0.102
                100        2.146  0.073   0.073  0.094  0.099
                100        2.146  0.072   0.072  0.094  0.099
                100        2.146  0.07    0.07   0.089  0.094
                100        2.146  0.07    0.07   0.088  0.093
                100        2.146  0.069   0.069  0.086  0.09
                100        2.21   0.072   0.072  0.085  0.089
                100        2.21   0.075   0.075  0.086  0.09
                100        1.95   0.081   0.081  0.093  0.098
                100        1.95   0.086   0.086  0.094  0.099
                100        1.95   0.088   0.088  0.101  0.106
                100        1.95   0.09    0.09   0.099  0.104
                100        1.95   0.091   0.091  0.097  0.102
                100        1.95   0.092   0.092  0.097  0.102
                100        1.95   0.093   0.093  0.103  0.108
                100        1.95   0.101   0.101  0.108  0.114
                SoilCrop SlurpSoil
                  LL=[0.07, 0.082, 0.074, 0.069, 0.068, 0.069, 0.07, 0.073, 0.072, 0.07, 0.07, 0.069, 0.072, 0.075, 0.081, 0.086, 0.088, 0.09, 0.091, 0.092, 0.093, 0.101]
                  KL=[0.06, 0.018, 0.018, 0.018, 0.041, 0.041, 0.041, 0.027, 0.027, 0.027, 0.047, 0.047, 0.047, 0, 0, 0, 0, 0, 0, 0, 0, 0]
                  XF=[1, 1, 1, 1, 1, 1, 1, 1, 1, 1, 1, 1, 1, 0, 0, 0, 0, 0, 0, 0, 0, 0]
              WaterBalance SoilWater: same as New Zealand.AshleyDene.Factors.SowingDate.SD1.Soil.SoilWater
              SoilNitrogen: same as New Zealand.AshleyDene.Factors.SowingDate.SD1.Soil.SoilNitrogen
              Organic: same as New Zealand.AshleyDene.Factors.SowingDate.SD1.Soil.Organic
              CERESSoilTemperature Temperature
              Sample InitialConditions: SWUnits=Volumetric; OCUnits=Total; PHUnits=Water
                Thickness=[200, 100, 100, 100, 100, 100, 100, 100, 100, 100, 100, 100, 100, 100, 100, 100, 100, 100, 100, 100, 100, 100]
                SW=[0.184, 0.16, 0.121, 0.102, 0.093, 0.089, 0.091, 0.093, 0.098, 0.094, 0.091, 0.089, 0.089, 0.089, 0.096, 0.098, 0.105, 0.102, 0.102, 0.099, 0.104, 0.109]
          CompositeFactor SD7
            Specifications:
              [SlurpSowingRule].Script.SowingDate = 2011-11-07
              [Clock].StartDate = 2011-11-07
              [Soil]
              [ResetOnDate].Script.ResetDate = 2011-11-07
              [ResetOnDate].Script.ResetWater = Yes
              [ResetOnDate].Script.NewSW = 0.193,0.208,0.148,0.129,0.115,0.109,0.101,0.095,0.096,0.097,0.095,0.09,0.087,0.092,0.098,0.099,0.102,0.106,0.107,0.102,0.109,0.109
              [Soil].Physical.SlurpSoil.KL[1:22] = 0.499999929203766
              [SlurpSowingRule].Script.RFV = 49.9999776102666
              [SlurpSowingRule].Script.KLReductionFactor = 0.00382630465455268
              [SlurpSowingRule].Script.MaxG = 0.0290756261219479
              [SlurpSowingRule].Script.R50 = 299.99936742052
              [SlurpSowingRule].Script.SummerU = 3.57359084271208
              [SlurpSowingRule].Script.SummerCona = 0.916212450620918
              [SlurpSowingRule].Script.WinterU = 0.000966588985369687
              [SlurpSowingRule].Script.WinterCona = 1.67749717390823
            Soil: SoilType=Udic Haplustept (US), Pallic orthic brown soil (NZ); Site=Ashley Dene: Lincoln University Research Farm; NearestTown=Lincoln; Country=New Zealand; Latitude=999999; Longitude=999999
              Comments=Soil water characterised from NNM (2 years). Stone content and BD  from Di and Cameron 2002. Soil saturation from Cichota 2013.
              Chemical: same as New Zealand.AshleyDene.Factors.SowingDate.SD4.Soil.Chemical
              Physical
                Thickness  BD     AirDry  LL15   DUL    SAT
                200        1.438  0.086   0.086  0.262  0.276
                100        1.643  0.103   0.103  0.2    0.21
                100        1.796  0.086   0.086  0.151  0.159
                100        1.796  0.083   0.083  0.127  0.134
                100        2.086  0.079   0.079  0.115  0.121
                100        2.086  0.077   0.077  0.112  0.118
                100        2.146  0.075   0.075  0.103  0.108
                100        2.146  0.073   0.073  0.094  0.099
                100        2.146  0.072   0.072  0.095  0.1
                100        2.146  0.073   0.073  0.096  0.101
                100        2.146  0.073   0.073  0.097  0.102
                100        2.146  0.071   0.071  0.092  0.097
                100        2.21   0.075   0.075  0.089  0.094
                100        2.21   0.079   0.079  0.093  0.098
                100        1.95   0.083   0.083  0.097  0.102
                100        1.95   0.086   0.086  0.103  0.108
                100        1.95   0.09    0.09   0.101  0.106
                100        1.95   0.094   0.094  0.103  0.108
                100        1.95   0.095   0.095  0.105  0.111
                100        1.95   0.094   0.094  0.101  0.106
                100        1.95   0.099   0.099  0.108  0.114
                100        1.95   0.099   0.099  0.107  0.113
                SoilCrop SlurpSoil
                  LL=[0.086, 0.103, 0.086, 0.083, 0.079, 0.077, 0.075, 0.073, 0.072, 0.073, 0.073, 0.071, 0.075, 0.079, 0.083, 0.086, 0.09, 0.094, 0.095, 0.094, 0.099, 0.099]
                  KL=[0.06, 0.018, 0.018, 0.018, 0.041, 0.041, 0.041, 0.027, 0.027, 0.027, 0.047, 0.047, 0.047, 0, 0, 0, 0, 0, 0, 0, 0, 0]
                  XF=[1, 1, 1, 1, 1, 1, 1, 1, 1, 1, 1, 1, 1, 0, 0, 0, 0, 0, 0, 0, 0, 0]
              WaterBalance SoilWater: same as New Zealand.AshleyDene.Factors.SowingDate.SD1.Soil.SoilWater
              SoilNitrogen: same as New Zealand.AshleyDene.Factors.SowingDate.SD1.Soil.SoilNitrogen
              Organic: same as New Zealand.AshleyDene.Factors.SowingDate.SD1.Soil.Organic
              CERESSoilTemperature Temperature
              Sample InitialConditions: SWUnits=Volumetric; OCUnits=Total; PHUnits=Water
                Thickness=[200, 100, 100, 100, 100, 100, 100, 100, 100, 100, 100, 100, 100, 100, 100, 100, 100, 100, 100, 100, 100, 100]
                SW=[0.193, 0.208, 0.148, 0.129, 0.115, 0.109, 0.101, 0.095, 0.096, 0.097, 0.095, 0.09, 0.087, 0.092, 0.098, 0.099, 0.102, 0.106, 0.107, 0.102, 0.109, 0.109]
          CompositeFactor SD8
            Specifications:
              [SlurpSowingRule].Script.SowingDate = 2011-12-09
              [Clock].StartDate = 2011-12-09
              [Soil]
              [ResetOnDate].Script.ResetDate = 2011-12-09
              [ResetOnDate].Script.ResetWater = Yes
              [ResetOnDate].Script.NewSW = 0.19,0.109,0.098,0.094,0.088,0.09,0.091,0.089,0.092,0.094,0.094,0.095,0.098,0.102,0.103,0.105,0.106,0.104,0.109,0.119,0.12,0.121
              [Soil].Physical.SlurpSoil.KL[1:22] = 0.0321288357238885
              [SlurpSowingRule].Script.RFV = 28.2470341454334
              [SlurpSowingRule].Script.KLReductionFactor = 4.36203416710876e-07
              [SlurpSowingRule].Script.MaxG = 0.0723400401098839
              [SlurpSowingRule].Script.R50 = 299.908414201741
              [SlurpSowingRule].Script.SummerU = 4.30891749538547
              [SlurpSowingRule].Script.SummerCona = 2.15822702846022
              [SlurpSowingRule].Script.WinterU = 0.000539166682607766
              [SlurpSowingRule].Script.WinterCona = 0.560486475286495
            Soil: SoilType=Udic Haplustept (US), Pallic orthic brown soil (NZ); Site=Ashley Dene: Lincoln University Research Farm; NearestTown=Lincoln; Country=New Zealand; Latitude=999999; Longitude=999999
              Comments=Soil water characterised from NNM (2 years). Stone content and BD  from Di and Cameron 2002. Soil saturation from Cichota 2013.
              Chemical: same as New Zealand.AshleyDene.Factors.SowingDate.SD4.Soil.Chemical
              Physical
                Thickness  BD     AirDry  LL15   DUL    SAT
                200        1.438  0.09    0.09   0.24   0.253
                100        1.643  0.086   0.086  0.16   0.168
                100        1.796  0.082   0.082  0.133  0.14
                100        1.796  0.076   0.076  0.112  0.118
                100        2.086  0.073   0.073  0.103  0.108
                100        2.086  0.072   0.072  0.1    0.105
                100        2.146  0.069   0.069  0.096  0.101
                100        2.146  0.07    0.07   0.092  0.097
                100        2.146  0.075   0.075  0.092  0.097
                100        2.146  0.076   0.076  0.091  0.096
                100        2.146  0.08    0.08   0.091  0.096
                100        2.146  0.081   0.081  0.091  0.096
                100        2.21   0.085   0.085  0.098  0.103
                100        2.21   0.088   0.088  0.105  0.11
                100        1.95   0.089   0.089  0.104  0.109
                100        1.95   0.093   0.093  0.104  0.109
                100        1.95   0.092   0.092  0.103  0.108
                100        1.95   0.093   0.093  0.103  0.108
                100        1.95   0.096   0.096  0.109  0.115
                100        1.95   0.105   0.105  0.117  0.123
                100        1.95   0.107   0.107  0.124  0.13
                100        1.95   0.109   0.109  0.119  0.125
                SoilCrop SlurpSoil
                  LL=[0.09, 0.086, 0.082, 0.076, 0.073, 0.072, 0.069, 0.07, 0.075, 0.076, 0.08, 0.081, 0.085, 0.088, 0.089, 0.093, 0.092, 0.093, 0.096, 0.105, 0.107, 0.109]
                  KL=[0.06, 0.018, 0.018, 0.018, 0.041, 0.041, 0.041, 0.027, 0.027, 0.027, 0.047, 0.047, 0.047, 0, 0, 0, 0, 0, 0, 0, 0, 0]
                  XF=[1, 1, 1, 1, 1, 1, 1, 1, 1, 1, 1, 1, 1, 0, 0, 0, 0, 0, 0, 0, 0, 0]
              WaterBalance SoilWater: same as New Zealand.AshleyDene.Factors.SowingDate.SD1.Soil.SoilWater
              SoilNitrogen: same as New Zealand.AshleyDene.Factors.SowingDate.SD1.Soil.SoilNitrogen
              Organic: same as New Zealand.AshleyDene.Factors.SowingDate.SD1.Soil.Organic
              CERESSoilTemperature Temperature
              Sample InitialConditions: SWUnits=Volumetric; OCUnits=Total; PHUnits=Water
                Thickness=[200, 100, 100, 100, 100, 100, 100, 100, 100, 100, 100, 100, 100, 100, 100, 100, 100, 100, 100, 100, 100, 100]
                SW=[0.19, 0.109, 0.098, 0.094, 0.088, 0.09, 0.091, 0.089, 0.092, 0.094, 0.094, 0.095, 0.098, 0.102, 0.103, 0.105, 0.106, 0.104, 0.109, 0.119, 0.12, 0.121]
          CompositeFactor SD9
            Specifications:
              [SlurpSowingRule].Script.SowingDate = 2012-01-10
              [Clock].StartDate = 2012-01-10
              [Soil]
              [ResetOnDate].Script.ResetDate = 2012-01-10
              [ResetOnDate].Script.ResetWater = Yes
              [ResetOnDate].Script.NewSW = 0.167,0.199,0.144,0.112,0.097,0.091,0.091,0.093,0.095,0.093,0.095,0.094,0.094,0.099,0.105,0.106,0.105,0.099,0.096,0.094,0.099,0.103
              [Soil].Physical.SlurpSoil.KL[1:22] = 0.481371554568086
              [SlurpSowingRule].Script.RFV = 8.6001334353124
              [SlurpSowingRule].Script.KLReductionFactor = 0.000543106146654441
              [SlurpSowingRule].Script.MaxG = 0.00447964311353613
              [SlurpSowingRule].Script.R50 = 0.553822205760971
              [SlurpSowingRule].Script.SummerU = 7.16954502267211
              [SlurpSowingRule].Script.SummerCona = 3.51825874660234
              [SlurpSowingRule].Script.WinterU = 0.577995028342636
              [SlurpSowingRule].Script.WinterCona = 6.6803006430051
            Soil: SoilType=Udic Haplustept (US), Pallic orthic brown soil (NZ); Site=Ashley Dene: Lincoln University Research Farm; NearestTown=Lincoln; Country=New Zealand; Latitude=999999; Longitude=999999
              Comments=Soil water characterised from NNM (2 years). Stone content and BD  from Di and Cameron 2002. Soil saturation from Cichota 2013.
              Chemical: same as New Zealand.AshleyDene.Factors.SowingDate.SD4.Soil.Chemical
              Physical
                Thickness  BD     AirDry  LL15   DUL    SAT
                200        1.438  0.105   0.105  0.257  0.27
                100        1.643  0.126   0.126  0.223  0.235
                100        1.796  0.097   0.097  0.161  0.169
                100        1.796  0.085   0.085  0.123  0.129
                100        2.086  0.08    0.08   0.11   0.116
                100        2.086  0.081   0.081  0.101  0.106
                100        2.146  0.084   0.084  0.096  0.101
                100        2.146  0.086   0.086  0.095  0.1
                100        2.146  0.087   0.087  0.093  0.098
                100        2.146  0.087   0.087  0.096  0.101
                100        2.146  0.088   0.088  0.096  0.101
                100        2.146  0.087   0.087  0.093  0.098
                100        2.21   0.089   0.089  0.099  0.104
                100        2.21   0.093   0.093  0.105  0.111
                100        1.95   0.099   0.099  0.111  0.117
                100        1.95   0.099   0.099  0.115  0.121
                100        1.95   0.097   0.097  0.107  0.113
                100        1.95   0.094   0.094  0.101  0.106
                100        1.95   0.091   0.091  0.099  0.104
                100        1.95   0.088   0.088  0.097  0.102
                100        1.95   0.094   0.094  0.105  0.11
                100        1.95   0.097   0.097  0.113  0.119
                SoilCrop SlurpSoil
                  LL=[0.105, 0.126, 0.097, 0.085, 0.08, 0.081, 0.084, 0.086, 0.087, 0.087, 0.088, 0.087, 0.089, 0.093, 0.099, 0.099, 0.097, 0.094, 0.091, 0.088, 0.094, 0.097]
                  KL=[0.06, 0.018, 0.018, 0.018, 0.041, 0.041, 0.041, 0.027, 0.027, 0.027, 0.047, 0.047, 0.047, 0, 0, 0, 0, 0, 0, 0, 0, 0]
                  XF=[1, 1, 1, 1, 1, 1, 1, 1, 1, 1, 1, 1, 1, 0, 0, 0, 0, 0, 0, 0, 0, 0]
              WaterBalance SoilWater: same as New Zealand.AshleyDene.Factors.SowingDate.SD1.Soil.SoilWater
              SoilNitrogen: same as New Zealand.AshleyDene.Factors.SowingDate.SD1.Soil.SoilNitrogen
              Organic: same as New Zealand.AshleyDene.Factors.SowingDate.SD1.Soil.Organic
              CERESSoilTemperature Temperature
              Sample InitialConditions: SWUnits=Volumetric; OCUnits=Total; PHUnits=Water
                Thickness=[200, 100, 100, 100, 100, 100, 100, 100, 100, 100, 100, 100, 100, 100, 100, 100, 100, 100, 100, 100, 100, 100]
                SW=[0.167, 0.199, 0.144, 0.112, 0.097, 0.091, 0.091, 0.093, 0.095, 0.093, 0.095, 0.094, 0.094, 0.099, 0.105, 0.106, 0.105, 0.099, 0.096, 0.094, 0.099, 0.103]
          CompositeFactor SD10
            Specifications:
              [SlurpSowingRule].Script.SowingDate = 2012-02-17
              [Clock].StartDate = 2012-02-17
              [Soil]
              [ResetOnDate].Script.ResetDate = 2012-02-17
              [ResetOnDate].Script.ResetWater = Yes
              [ResetOnDate].Script.NewSW = 0.188,0.197,0.154,0.113,0.09,0.082,0.079,0.075,0.083,0.101,0.099,0.088,0.083,0.085,0.09,0.093,0.094,0.098,0.1,0.103,0.109,0.113
              [Soil].Physical.SlurpSoil.KL[1:22] = 0.0306966644224011
              [SlurpSowingRule].Script.RFV = 46.6397075961154
              [SlurpSowingRule].Script.KLReductionFactor = 0.00273962415737718
              [SlurpSowingRule].Script.MaxG = 0.0119043206465677
              [SlurpSowingRule].Script.R50 = 298.547351011066
              [SlurpSowingRule].Script.SummerU = 7.57975962648183
              [SlurpSowingRule].Script.SummerCona = 0.000223419045152511
              [SlurpSowingRule].Script.WinterU = 2.3890717574164
              [SlurpSowingRule].Script.WinterCona = 4.91604505597247
            Soil: SoilType=Udic Haplustept (US), Pallic orthic brown soil (NZ); Site=Ashley Dene: Lincoln University Research Farm; NearestTown=Lincoln; Country=New Zealand; Latitude=999999; Longitude=999999
              Comments=Soil water characterised from NNM (2 years). Stone content and BD  from Di and Cameron 2002. Soil saturation from Cichota 2013.
              Chemical: same as New Zealand.AshleyDene.Factors.SowingDate.SD4.Soil.Chemical
              Physical
                Thickness  BD     AirDry  LL15   DUL    SAT
                200        1.438  0.166   0.166  0.27   0.284
                100        1.643  0.159   0.159  0.227  0.239
                100        1.796  0.124   0.124  0.173  0.182
                100        1.796  0.098   0.098  0.127  0.134
                100        2.086  0.086   0.086  0.111  0.117
                100        2.086  0.078   0.078  0.105  0.111
                100        2.146  0.075   0.075  0.101  0.106
                100        2.146  0.071   0.071  0.102  0.107
                100        2.146  0.079   0.079  0.111  0.117
                100        2.146  0.096   0.096  0.112  0.118
                100        2.146  0.094   0.094  0.11   0.116
                100        2.146  0.084   0.084  0.106  0.112
                100        2.21   0.079   0.079  0.102  0.107
                100        2.21   0.081   0.081  0.098  0.103
                100        1.95   0.086   0.086  0.103  0.108
                100        1.95   0.088   0.088  0.107  0.113
                100        1.95   0.089   0.089  0.105  0.111
                100        1.95   0.093   0.093  0.105  0.11
                100        1.95   0.095   0.095  0.107  0.113
                100        1.95   0.098   0.098  0.109  0.115
                100        1.95   0.104   0.104  0.113  0.119
                100        1.95   0.107   0.107  0.117  0.123
                SoilCrop SlurpSoil
                  LL=[0.166, 0.159, 0.124, 0.098, 0.086, 0.078, 0.075, 0.071, 0.079, 0.096, 0.094, 0.084, 0.079, 0.081, 0.086, 0.088, 0.089, 0.093, 0.095, 0.098, 0.104, 0.107]
                  KL=[0.06, 0.018, 0.018, 0.018, 0.041, 0.041, 0.041, 0.027, 0.027, 0.027, 0.047, 0.047, 0.047, 0, 0, 0, 0, 0, 0, 0, 0, 0]
                  XF=[1, 1, 1, 1, 1, 1, 1, 1, 1, 1, 1, 1, 1, 0, 0, 0, 0, 0, 0, 0, 0, 0]
              WaterBalance SoilWater: same as New Zealand.AshleyDene.Factors.SowingDate.SD1.Soil.SoilWater
              SoilNitrogen: same as New Zealand.AshleyDene.Factors.SowingDate.SD1.Soil.SoilNitrogen
              Organic: same as New Zealand.AshleyDene.Factors.SowingDate.SD1.Soil.Organic
              CERESSoilTemperature Temperature
              Sample InitialConditions: SWUnits=Volumetric; OCUnits=Total; PHUnits=Water
                Thickness=[200, 100, 100, 100, 100, 100, 100, 100, 100, 100, 100, 100, 100, 100, 100, 100, 100, 100, 100, 100, 100, 100]
                SW=[0.188, 0.197, 0.154, 0.113, 0.09, 0.082, 0.079, 0.075, 0.083, 0.101, 0.099, 0.088, 0.083, 0.085, 0.09, 0.093, 0.094, 0.098, 0.1, 0.103, 0.109, 0.113]
      Simulation AshleyDene
        Clock: Start=2010-10-03; End=2012-07-12
        Summary summaryfile
        Weather: FileName=C:\Data\Master\01Data\ClimateAndObserved\AshleyDene.met
        SoilArbitrator Soil Arbitrator
        Zone Field: Area=1; Slope=0; AspectAngle=0; Altitude=50
          Folder ManagerFolder
            Memo
              # ReportOnDates
              Disabled by [Clock].DoReport

              # SlurpSowingRule
              Critical manager to control the sowing rules and canopy paramters.

              # SetCropVariables
              Critical manager that controls the fractional light interception and extinction coeficient data input.
            Manager ReportOnDates
              activate = False
              TodayString =
```csharp
using APSIM.Shared.Utilities;
using System.Xml.Serialization;
using Models;
using Models.PMF;
using Models.Soils;
using System.Text;
using System.Collections.Generic;
using Models.Core;
using System;

namespace Models
{
    [Serializable] 
    public class Script : Model
    {
        [Link] Clock Clock;
        [Link] Models.Report DataRep;
        [Description("Report on specific dates (not activing)")]
        public bool activate { get; set; }
        public List<string> ObsDates;
        public string TodayString { get; set; }
        
        [EventSubscribe("StartOfSimulation")]
        private void OnStartOfSimulation(object sender, EventArgs e)
        { 
        	ObsDates = new List<string>();
        	if (activate)
        	{
            
            	ObsDates.Add("2011-06-09");
            	ObsDates.Add("2011-10-06");
            	ObsDates.Add("2011-10-20");
            	ObsDates.Add("2011-10-26");
            	ObsDates.Add("2011-11-03");
            	ObsDates.Add("2011-11-12");
            	ObsDates.Add("2011-11-17");
            	ObsDates.Add("2011-11-30");
            	ObsDates.Add("2011-12-14");
            	ObsDates.Add("2011-12-28");
            	ObsDates.Add("2012-01-11");
            	ObsDates.Add("2012-01-25");
            	ObsDates.Add("2012-02-08");
            	ObsDates.Add("2012-02-22");
            	ObsDates.Add("2012-03-07");
            	ObsDates.Add("2012-03-21");
            	ObsDates.Add("2012-04-04");
            	ObsDates.Add("2012-04-18");
            	ObsDates.Add("2012-05-02");
            	ObsDates.Add("2012-05-16");
            	ObsDates.Add("2012-05-30");
            	ObsDates.Add("2012-06-13");
            	ObsDates.Add("2012-08-06");
            	ObsDates.Add("2012-08-29");
            	ObsDates.Add("2012-09-13");
            	ObsDates.Add("2012-09-26");
            	ObsDates.Add("2012-10-10");
            	ObsDates.Add("2012-10-24");
            	ObsDates.Add("2012-11-08");
            	ObsDates.Add("2012-11-21");
            	ObsDates.Add("2012-12-05");
            	ObsDates.Add("2012-12-19");
            	ObsDates.Add("2013-01-04");
            	ObsDates.Add("2013-01-16");
            	ObsDates.Add("2013-01-30");
            	ObsDates.Add("2013-02-13");
            	ObsDates.Add("2013-02-27");
            	ObsDates.Add("2013-03-13");
            	ObsDates.Add("2013-03-27");
            	ObsDates.Add("2013-04-10");
            	ObsDates.Add("2013-04-23");
            	ObsDates.Add("2013-05-08");
            	ObsDates.Add("2013-06-26");
            	ObsDates.Add("2013-08-27");
            	ObsDates.Add("2013-09-12");
            	ObsDates.Add("2013-10-01");
            	ObsDates.Add("2013-10-14");
            	ObsDates.Add("2013-10-30");
            	ObsDates.Add("2013-11-12");
            	ObsDates.Add("2013-11-26");
            	ObsDates.Add("2013-12-10");
            	ObsDates.Add("2013-12-24");
            	ObsDates.Add("2014-01-07");
            	ObsDates.Add("2014-01-21");
            	ObsDates.Add("2014-02-04");
            	ObsDates.Add("2014-02-18");
            	ObsDates.Add("2014-03-26");
            	ObsDates.Add("2014-04-15");
            	}
        }
        
        [EventSubscribe("DoReport")]
        private void OnDoReport(object sender, EventArgs e)
        {
            TodayString = Clock.Today.ToString("yyyy-MM-dd");
            if (ObsDates.Contains(TodayString))
                DataRep.DoOutput();
        }

    }
}
```
            Manager SlurpSowingRule
              SowingDate = 10/21/2010 00:00:00
              RFV = 10
              KLReductionFactor = 0.002
              MaxG = 0.006
              R50 = 175
              SummerU = 9
              SummerCona = 4.4
              WinterU = 4
              WinterCona = 1
              CultivarName = Lucerne
              InitialRootDepth = 15
              RootDepth = 2300
              KLReductionDepth = 150
              YKLModifiers =
              XDepth =
```csharp
using Models.Interfaces;
using Models.Soils;
using APSIM.Shared.Utilities;
using Models.PMF;
using Models.Core;
using System;
using Models.PMF.Organs;
        
namespace Models
{
    [Serializable] 
    [System.Xml.Serialization.XmlInclude(typeof(Model))]
    public class Script : Model
    {
        [Link] private Plant Slurp;
        [Link] private Clock Clock;
        [Link] private Soil Soil;
        [Link] private Zone zone;
        [Link] private Summary summary;
        [Link(Type = LinkType.Path, Path = "[Slurp].Root")]
        private Root root;
        [Link]
        private IPhysical soilPhysical;
        
        [Description("Cultivar")]
        public string CultivarName { get; set; }
        [Description("Initial Root Depth")]
        public double InitialRootDepth { get; set; }
        [Description("Sowing Date")]
        public DateTime SowingDate { get; set; }
        [Description("Maximum Root Depth")]
        public double RootDepth { get; set; }
        [Description("Roof Front Velocity")]
        public double RFV { get; set; }
        [Description("Factor to change Kl modifier with Depth")]
        public double KLReductionFactor { get; set; }
        [Description("Depth that KL starts to decline")]
        public double KLReductionDepth { get; set; }
        
        public double[] YKLModifiers { get; set; }
        public double[] XDepth { get; set; }
        private double Depth { get; set; }
        
        [Description("Maximum Stomatal Conductance")]
        public double MaxG { get; set; }
        [Description("Stomatal Radn response")]
        public double R50 { get; set; }
        [Description("SummerU - 1st stage evaporation, controls the threshold which beyond will be 2nd stage.")]
        public double SummerU { get; set; }
        [Description("SummerCona - 2nd stage evaporation, controls how fast the water vapor")]
        public double SummerCona { get; set; }
        [Description("WinterU - 1st stage evaporation, controls the threshold which beyond will be 2nd stage.")]
        public double WinterU { get; set; }
        [Description("WinterCona - 2nd stage evaporation, controls how fast the water vapor")]
        public double WinterCona { get; set; }
        
        [EventSubscribe("DoManagement")]
        private void OnDoManagement(object sender, EventArgs e)
        {
            if (Clock.Today.Date == SowingDate)
            {
                Slurp.Sow(cultivar: CultivarName, population: 1, depth: InitialRootDepth, rowSpacing: 150);
                
                YKLModifiers = new double[soilPhysical.Thickness.Length];
                XDepth = new double[soilPhysical.Thickness.Length];
                Depth = 0;
                for (int layer = 0; layer < soilPhysical.Thickness.Length; layer++)
                {
                    Depth += soilPhysical.Thickness[layer] / 2;  //Add half of the thickness of the current layer so depth is the mid depth of that layer
                    if (Depth <= KLReductionDepth)
                    {
                        YKLModifiers[layer] = 1;
                        XDepth[layer] = Depth;
                    }
                    else
                    {
                        double KLMod = 1 * Math.Exp(-KLReductionFactor * (Depth - KLReductionDepth));                  
                        YKLModifiers[layer] = KLMod;
                        XDepth[layer] = Depth;

                    }
                    summary.WriteMessage(this, YKLModifiers[layer].ToString() + "@Depth" + Depth.ToString());
                    //summary.WriteMessage(this, "@Depth");
                    Depth += soilPhysical.Thickness[layer] / 2;  //Add the other half of the current layer so depth is the top of the next layer
                }
                object KLMods = YKLModifiers;
                zone.Set("Slurp.Root.KLModifier.XYPairs.Y", KLMods);
                object Depths = XDepth;
                zone.Set("Slurp.Root.KLModifier.XYPairs.X", Depths);
                object RD = RootDepth;
                zone.Set("Slurp.Root.MaximumRootDepth.FixedValue", RD);
                object RV = RFV;
                zone.Set("Slurp.Root.RootFrontVelocity.Potential.FixedValue", RV);
                object GMaxValue = MaxG;
                zone.Set("Slurp.Leaf.Gsmax350", GMaxValue); 
                object R50Value = R50; 
                zone.Set("Slurp.Leaf.R50", R50Value); 
                object SummerUValue = SummerU;
                zone.Set("Soil.SoilWater.SummerU", SummerUValue); 
                object SummerConaValue = SummerCona; 
                zone.Set("Soil.SoilWater.SummerCona", SummerConaValue); 
                object WinterUValue = WinterU;
                zone.Set("Soil.SoilWater.WinterU", WinterUValue); 
                object WinterConaValue = WinterCona; 
                zone.Set("Soil.SoilWater.WinterCona", WinterConaValue); 
                
            }
        }
    }
}
```
            Manager SetCropVariables
              CoverFile = C:\Data\Master\01Data\ProcessedData\CoverData\LAI_AshleyDene_SD1.csv
              Ext_coef = 0
              MaximumHeight = 395
              LAI = LAI
              Extinctioncoefficient = k
              Treatment =
              CoverRead = 0
              leaflai = 0
```csharp
using Models.Interfaces;
using System;
using Models.Core;
using System.Collections.Generic;
using System.Text;
using Models.PMF;
using Models;
using System.Xml.Serialization;
using APSIM.Shared.Utilities;
using System.Data;
using Models.Soils;
namespace Models
{
    [Serializable] 
    //[System.Xml.Serialization.XmlInclude(typeof(Model))]
    public class Script : Model
    {
        [Link] private Plant SCUM;
        [Link] private Clock Clock;
        [Link] private Zone zone;
        [Link] private Simulation Simulation;
        [Link] private Soil Soil;
        [Link] private ISummary mysum;
        [Link]
        private ISoilWater waterBalance;
        
        [Description("File of Light interception and Extinction coefficient")]
        public string CoverFile { get; set; }
        //[Description("Extinction coefficient (if constant).")]
        public double Ext_coef { get; set; }
        [Description("Maximum height of the crop at full cover")]
        public double MaximumHeight { get; set; }
        
        [XmlIgnore] private DataTable Covers { get; set; }
        [Description("Column name for the LEAF AREA INDEX")]
        public string LAI { get; set; }
        [Description("Column name for the USER provide Extinction coefficient")]
        public string Extinctioncoefficient { get; set; }
        //public string Irrigation { get; set; }
        public string Treatment { get; set; }
        
        public double CoverRead { get; set; }
        public double leaflai { get; private set; }
                
        [EventSubscribe("StartOfSimulation")]
        private void OnStartOfSimulation(object sender, EventArgs e)
        {
            
            Treatment = LAI;
            
            string fullFileName = PathUtilities.GetAbsolutePath(CoverFile, Simulation.FileName);
            
            ApsimTextFile textFile = new ApsimTextFile();
            textFile.Open(fullFileName);
            Covers = textFile.ToTable();
            textFile.Close();
        }
        
        [EventSubscribe("StartOfDay")]
        private void OnStartOfDay(object sender, EventArgs e)
        {
            foreach (DataRow row in Covers.Rows)
            {
                DateTime TodayDate = Convert.ToDateTime(row["Clock.Today"]);
                if (TodayDate.Date == Clock.Today.Date)
                {
                    mysum.WriteMessage(this, "Clock.Today" + Clock.Today.Date);
                    leaflai = Convert.ToDouble(row[Treatment]);
                    Ext_coef = Convert.ToDouble(row[Extinctioncoefficient]);
                }
            }
        
            //if ((bool)zone.Get("Slurp.IsAlive") == true)
            //{
                //Only assign cover valuse if crop is emerged

                CoverRead = 1 - Math.Exp( - Ext_coef * leaflai);

                /*
                if (CoverRead == 1)
                    leaflai = Math.Log(0.01) / -Ext_coef;
                else
                {
                    if (CoverRead > 0)
                        leaflai = Math.Log(1 - CoverRead) / -Ext_coef;
                    else
                        leaflai = 0;
                }
                */

                //Summary.WriteMessage(this, "LAI " + leaflai);
                object LAIResetValue = leaflai;
                zone.Set("Slurp.Leaf.Area.FixedValue", LAIResetValue);  
                object kResetValue = Ext_coef;
                zone.Set("Slurp.Leaf.ExtinctionCoefficient.FixedValue", kResetValue);  
                object HeightResetValue = CoverRead * MaximumHeight;
                zone.Set("Slurp.Leaf.Tallness.FixedValue", HeightResetValue);  
            //}
            
            /*if ((Clock.Today.DayOfYear == 160) && (Clock.Today.Year == 2011))
                waterBalance.Reset();
                */
        }
        /*[EventSubscribe("StartOfDay")]
        private void OnEndOfDay(object sender, EventArgs e)
        {
            if ((Clock.Today.DayOfYear == 66) && (Clock.Today.Year == 2012) && (Irrigation == "Rain"))
            {
                if (Cover == "Lucerne")
                {
                    double[] ValuesToSet = { 0.18, 0.21, 0.20, 0.06, 0.05, 0.06, 0.07, 0.08, 0.10, 0.14, 0.14, 0.14, 0.14 };
                    waterBalance.SW = ValuesToSet;
                }
                if (Cover == "Ryegrass")
                {
                    double[] ValuesToSet = { 0.14, 0.20, 0.25, 0.11, 0.07, 0.08, 0.09, 0.09, 0.11, 0.14, 0.14, 0.14, 0.14 };
                    waterBalance.SW = ValuesToSet;
                }
            }
        }*/
    }
}
```
            Manager ResetOnDate
              ResetDate = 07/01/2011 00:00:00
              ResetWater = No
              NewSW =
```csharp
using Models.Soils.Nutrients;
using APSIM.Shared.Utilities;
using Models.Surface;
using Models.Utilities;
using Models.Soils.Nutrients;
using Models.Soils;
using Models.PMF;
using Models.Core;
using System;
using Models.Interfaces;

namespace Models
{
    [Serializable]
    public class Script : Model
    {
        [Link] private Clock Clock;
        [Link] private Plant Lucerne;
        [Link] private ISoilWater SoilWater;
        //[Link] Zone zone;
        [Link] private Summary Summary;

        [Description("Date to reset on:")]
        public DateTime ResetDate {get;set;}

        [Description("Reset Water? (Yes or No)")]
        public string ResetWater {get;set;}
        [Description("New values for SW (mm^3/mm^3)")]
        public double[] NewSW { get; set; }

        [EventSubscribe("DoManagement")]
        private void OnDoManagement(object sender, EventArgs e)
        {
            if (DateUtilities.WithinDates(ResetDate.Date, Clock.Today.Date, ResetDate.Date))
            {
                if (ResetWater == "Yes")
                {
                    Summary.WriteMessage(this, "Reset Water");
                    SoilWater.SW = NewSW;
                    //zone.Set("[Soil].SoilWater.SW", NewSW);
                }
            }
        }
    }
}
```
          Soil: SoilType=Udic Haplustept (US), Pallic orthic brown soil (NZ); Site=Ashley Dene: Lincoln University Research Farm; NearestTown=Lincoln; Country=New Zealand; Latitude=999999; Longitude=999999
            Comments=Soil water characterised from NNM (2 years). Stone content and BD  from Di and Cameron 2002. Soil saturation from Cichota 2013.
            Chemical
              Thickness  NO3N  NH4N
              200        31    8
              100        1.5   0.05
              100        1     0.03
              100        1     0.01
              100        1     0.01
              100        0.7   0.01
              100        0.5   0.01
              100        0.5   0.01
              100        0.5   0.01
              100        0.5   0.01
              100        0.5   0.01
              100        0.5   0.01
              100        0.5   0.01
              100        0.5   0.01
              100        0.5   0.01
              100        0.5   0.01
              100        0.5   0.01
              100        0.05  0.01
              100        0.05  0.01
              100        0.05  0.01
              100        0.05  0.01
              100        0     0
            Physical
              Thickness  BD    AirDry  LL15   DUL    SAT
              200        1.15  0.063   0.063  0.27   0.27
              100        1.15  0.08    0.08   0.194  0.194
              100        1.31  0.074   0.074  0.158  0.158
              100        1.31  0.076   0.076  0.135  0.135
              100        1.95  0.069   0.069  0.118  0.118
              100        1.95  0.07    0.07   0.114  0.114
              100        1.95  0.07    0.07   0.111  0.111
              100        1.95  0.07    0.07   0.115  0.115
              100        1.95  0.069   0.069  0.115  0.115
              100        1.95  0.07    0.07   0.11   0.11
              100        1.95  0.073   0.073  0.106  0.106
              100        1.95  0.079   0.079  0.116  0.116
              100        1.95  0.084   0.084  0.114  0.114
              100        1.95  0.086   0.086  0.13   0.13
              100        1.95  0.092   0.092  0.138  0.138
              100        1.95  0.096   0.096  0.134  0.134
              100        1.95  0.094   0.094  0.126  0.126
              100        1.95  0.095   0.095  0.128  0.128
              100        1.95  0.095   0.095  0.122  0.122
              100        1.95  0.095   0.095  0.116  0.116
              100        1.95  0.098   0.098  0.128  0.128
              100        1.95  0.1     0.1    0.147  0.147
              SoilCrop SlurpSoil
                LL=[0.063, 0.08, 0.074, 0.076, 0.069, 0.07, 0.07, 0.07, 0.069, 0.07, 0.073, 0.079, 0.084, 0.086, 0.092, 0.096, 0.094, 0.095, 0.095, 0.095, 0.098, 0.1]
                KL=[0.06, 0.06, 0.06, 0.06, 0.06, 0.06, 0.06, 0.06, 0.06, 0.06, 0.06, 0.06, 0.06, 0.06, 0.06, 0.06, 0.06, 0.06, 0.06, 0.06, 0.06, 0.06]
                XF=[1, 1, 1, 1, 1, 1, 1, 1, 1, 1, 1, 1, 1, 1, 1, 1, 1, 1, 1, 1, 1, 1]
            WaterBalance SoilWater: SummerDate=1-Aug; SummerU=5; SummerCona=4.4; WinterDate=1-Apr; WinterU=5; WinterCona=2.5; DiffusConst=88; DiffusSlope=35.4; Salb=0.18; CN2Bare=68; CNRed=20; CNCov=0.8
              Thickness=[200, 100, 100, 100, 100, 100, 100, 100, 100, 100, 100, 100, 100, 100, 100, 100, 100, 100, 100, 100, 100, 100]
              SWCON=[0.99, 0.99, 0.99, 0.99, 0.99, 0.99, 0.99, 0.99, 0.99, 0.99, 0.99, 0.99, 0.99, 0.99, 0.99, 0.99, 0.99, 0.99, 0.99, 0.99, 0.99, 0.99]
            SoilNitrogen: same as New Zealand.AshleyDene.Factors.SowingDate.SD1.Soil.SoilNitrogen
            Organic: same as New Zealand.AshleyDene.Factors.SowingDate.SD1.Soil.Organic
            Sample InitialConditions: SWUnits=Volumetric; OCUnits=Total; PHUnits=Water
              Thickness=[200, 100, 100, 100, 100, 100, 100, 100, 100, 100, 100, 100, 100, 100, 100, 100, 100, 100, 100, 100, 100, 100]
              SW=[0.204, 0.168, 0.134, 0.11, 0.102, 0.098, 0.1, 0.103, 0.101, 0.097, 0.096, 0.1, 0.106, 0.106, 0.114, 0.117, 0.112, 0.109, 0.11, 0.11, 0.114, 0.118]
            CERESSoilTemperature Temperature
          Plant Slurp
          MicroClimate: a_interception=0; b_interception=1; c_interception=0; d_interception=0; soil_albedo=0.23; SoilHeatFluxFraction=0.4; MinimumHeightDiffForNewLayer=0; NightInterceptionFraction=0.5; ReferenceHeight=2
          Irrigation
          Fertiliser
          SurfaceOrganicMatter surface organic matter: InitialResidueName=wheat; InitialResidueType=wheat; InitialResidueMass=2000; InitialStandingFraction=0; InitialCPR=0; InitialCNR=80
          Report: EventNames=[Clock].DoReport
            VariableNames:
              [Clock].Today
              [Soil].SoilWater.SummerU as SummerU
              [Soil].SoilWater.SummerCona as SummerCona
              [Soil].Physical.SlurpSoil.KL[1] as SKL
              [SetCropVariables].Script.Ext_coef as k
              [Slurp].Leaf.CoverTotal as cover
              [Slurp].Leaf.LAI as LAI
              [Slurp].Leaf.Height as Height
              [Slurp].AboveGround as AboveGroundBiomass
              [Slurp].Root.Depth as RootDepth
              [Soil].SoilWater.SWmm as SWmm
              [Soil].Physical.DULmm as DULmm
              [Soil].Physical.LL15mm as LL15mm
              sum([Soil].SoilWater.SWmm) as SWCmm
              sum([Soil].Physical.DULmm) as DULmm
              sum([Soil].Physical.LL15mm) as LL15mm
          Report SummaryNumbers: EventNames=[Clock].EndOfSimulation
            VariableNames:
              [Clock].Today
              [SlurpSowingRule].Script.CultivarName as CropNameCheck
              [Soil].Physical.SlurpSoil.KL as kl
              [SlurpSowingRule].Script.KLReductionFactor as KLRCheck
              [SlurpSowingRule].Script.RootDepth as RDpCheck
              [SlurpSowingRule].Script.RFV as RFVCheck
              [SlurpSowingRule].Script.YKLModifiers as KLmodCheck
              [SlurpSowingRule].Script.XDepth as KLdepCheck
              [SlurpSowingRule].Script.MaxG as Gsmax
              [SlurpSowingRule].Script.R50 as R50
              [SlurpSowingRule].Script.SummerU as SummerU
              [SlurpSowingRule].Script.SummerCona as SummerCona
              [SlurpSowingRule].Script.WinterU as WinterU
              [SlurpSowingRule].Script.WinterCona as WinterCona
              [SetCropVariables].Script.CoverRead as CoverCheck
      Folder SoilWaterAshleyDene
        Memo Combined Results
          This node is for examining the Soil water component.
          1.
    Experiment Iversen12
      DisabledSimNames=[Iversen12SowingDateSD6, Iversen12SowingDateSD7, Iversen12SowingDateSD8, Iversen12SowingDateSD9, Iversen12SowingDateSD10]
      Factors
        Factor SowingDate
          CompositeFactor SD1
            Specifications:
              [SlurpSowingRule].Script.SowingDate = 2010-10-04
              [Clock].StartDate = 2010-10-04
              [Soil]
              [ResetOnDate].Script.ResetDate = 2011-06-25
              [ResetOnDate].Script.ResetWater = Yes
              [ResetOnDate].Script.NewSW = 0.359, 0.344, 0.291, 0.26, 0.227, 0.184, 0.143, 0.147, 0.166, 0.193, 0.166, 0.14, 0.141, 0.166, 0.201, 0.282, 0.338, 0.342, 0.347, 0.358, 0.362, 0.36
              [Soil].Physical.SlurpSoil.KL[1:22] = 0.326114564111391
              [SlurpSowingRule].Script.RFV = 36.6346410702251
              [SlurpSowingRule].Script.KLReductionFactor = 0.0039940776421274
              [SlurpSowingRule].Script.MaxG = 0.0429131869434177
              [SlurpSowingRule].Script.R50 = 138.22938501168
              [SlurpSowingRule].Script.SummerU = 4.55770416953658
              [SlurpSowingRule].Script.SummerCona = 14.2421509597445
              [SlurpSowingRule].Script.WinterU = 2.95131775406481
              [SlurpSowingRule].Script.WinterCona = 2.29614382803699
            Soil: SoilType=Udic Haplustept (US), Pallic orthic brown soil (NZ); Site=Ashley Dene: Lincoln University Research Farm; NearestTown=Lincoln; Country=New Zealand; Latitude=999999; Longitude=999999
              Comments=Soil water characterised from NNM (2 years). Stone content and BD  from Di and Cameron 2002. Soil saturation from Cichota 2013.
              Chemical: same as New Zealand.AshleyDene.Factors.SowingDate.SD1.Soil.Chemical
              Physical
                Thickness  BD     AirDry   LL15     DUL      SAT
                200        1.15   0.14155  0.14155  0.359    0.361
                100        1.15   0.17385  0.17385  0.344    0.358
                100        1.31   0.1482   0.1482   0.291    0.305
                100        1.31   0.1311   0.1311   0.2736   0.288
                100        1.882  0.10355  0.10355  0.2755   0.29
                100        1.855  0.09975  0.09975  0.285    0.3
                100        1.839  0.095    0.095    0.28975  0.305
                100        1.794  0.10925  0.10925  0.30685  0.323
                100        1.778  0.13205  0.13205  0.31255  0.329
                100        1.797  0.1197   0.1197   0.3059   0.322
                100        1.829  0.1045   0.1045   0.26695  0.281
                100        1.874  0.0893   0.0893   0.2394   0.252
                100        1.831  0.0969   0.0969   0.2337   0.246
                100        1.746  0.1045   0.1045   0.2413   0.254
                100        1.733  0.1539   0.1539   0.2717   0.286
                100        1.715  0.20235  0.20235  0.3097   0.326
                100        1.67   0.2147   0.2147   0.338    0.35
                100        1.646  0.23655  0.23655  0.342    0.352
                100        1.672  0.24605  0.24605  0.347    0.365
                100        1.67   0.25555  0.25555  0.358    0.37
                100        1.675  0.26125  0.26125  0.362    0.368
                100        1.675  0.26695  0.26695  0.36     0.365
                SoilCrop SlurpSoil
                  LL=[0.14155, 0.17385, 0.1482, 0.1311, 0.10355, 0.09975, 0.095, 0.10925, 0.13205, 0.1197, 0.1045, 0.0893, 0.0969, 0.1045, 0.1539, 0.20235, 0.2147, 0.23655, 0.24605, 0.25555, 0.26125, 0.26695]
                  KL=[0.06, 0.019, 0.019, 0.019, 0.026, 0.026, 0.026, 0.031, 0.031, 0.031, 0.025, 0.025, 0.025, 0.035, 0.035, 0.035, 0.021, 0.021, 0.021, 0.019, 0.019, 0.019]
                  XF=[1, 1, 1, 1, 1, 1, 1, 1, 1, 1, 1, 1, 1, 1, 1, 1, 1, 1, 1, 1, 1, 1]
              WaterBalance SoilWater: SummerDate=1-Oct; SummerU=5; SummerCona=4.4; WinterDate=1-Mar; WinterU=5; WinterCona=2.5; DiffusConst=88; DiffusSlope=35.4; Salb=0.18; CN2Bare=68; CNRed=20; CNCov=0.8
                Thickness=[200, 100, 100, 100, 100, 100, 100, 100, 100, 100, 100, 100, 100, 100, 100, 100, 100, 100, 100, 100, 100, 100]
                SWCON=[0.55, 0.55, 0.55, 0.55, 0.55, 0.55, 0.55, 0.55, 0.55, 0.55, 0.55, 0.55, 0.55, 0.55, 0.55, 0.55, 0.55, 0.55, 0.55, 0.55, 0.55, 0.55]
              SoilNitrogen: same as New Zealand.AshleyDene.Factors.SowingDate.SD1.Soil.SoilNitrogen
              Organic: same as New Zealand.AshleyDene.Factors.SowingDate.SD1.Soil.Organic
              CERESSoilTemperature Temperature
              Sample InitialConditions: SWUnits=Volumetric; OCUnits=Total; PHUnits=Water
                Thickness=[200, 100, 100, 100, 100, 100, 100, 100, 100, 100, 100, 100, 100, 100, 100, 100, 100, 100, 100, 100, 100, 100]
                SW=[0.359, 0.344, 0.291, 0.26, 0.227, 0.184, 0.143, 0.147, 0.166, 0.193, 0.166, 0.14, 0.141, 0.166, 0.201, 0.282, 0.338, 0.342, 0.347, 0.358, 0.362, 0.36]
          CompositeFactor SD2
            Specifications:
              [SlurpSowingRule].Script.SowingDate = 2010-11-04
              [Clock].StartDate = 2010-11-04
              [Soil]
              [ResetOnDate].Script.ResetDate = 2011-06-25
              [ResetOnDate].Script.ResetWater = Yes
              [ResetOnDate].Script.NewSW = 0.375,0.359,0.303,0.285,0.278,0.261,0.232,0.215,0.216,0.248,0.245,0.218,0.219,0.221,0.252,0.31,0.326,0.349,0.36,0.354,0.358,0.364
              [Soil].Physical.SlurpSoil.KL[1:22] = 0.0474276157991591
              [SlurpSowingRule].Script.RFV = 24.7365633293345
              [SlurpSowingRule].Script.KLReductionFactor = 0.000178097617524463
              [SlurpSowingRule].Script.MaxG = 0.0175061329479561
              [SlurpSowingRule].Script.R50 = 274.266535661209
              [SlurpSowingRule].Script.SummerU = 1.27598993017149
              [SlurpSowingRule].Script.SummerCona = 0.0134426880530603
              [SlurpSowingRule].Script.WinterU = 0.568369636955317
              [SlurpSowingRule].Script.WinterCona = 0.176373340858266
            Soil: SoilType=Udic Haplustept (US), Pallic orthic brown soil (NZ); Site=Ashley Dene: Lincoln University Research Farm; NearestTown=Lincoln; Country=New Zealand; Latitude=999999; Longitude=999999
              Comments=Soil water characterised from NNM (2 years). Stone content and BD  from Di and Cameron 2002. Soil saturation from Cichota 2013.
              Chemical: same as New Zealand.AshleyDene.Factors.SowingDate.SD4.Soil.Chemical
              Physical
                Thickness  BD     AirDry   LL15     DUL      SAT
                200        1.15   0.16245  0.16245  0.375    0.375
                100        1.15   0.1862   0.1862   0.359    0.366
                100        1.31   0.18145  0.18145  0.303    0.318
                100        1.31   0.1539   0.1539   0.285    0.292
                100        1.868  0.1292   0.1292   0.28025  0.295
                100        1.847  0.1311   0.1311   0.28785  0.303
                100        1.815  0.1368   0.1368   0.29925  0.315
                100        1.783  0.12635  0.12635  0.31065  0.327
                100        1.757  0.12825  0.12825  0.32015  0.337
                100        1.76   0.13775  0.13775  0.3192   0.336
                100        1.805  0.1273   0.1273   0.2983   0.314
                100        1.829  0.1178   0.1178   0.2812   0.296
                100        1.749  0.12065  0.12065  0.2945   0.31
                100        1.746  0.12445  0.12445  0.3002   0.316
                100        1.733  0.1672   0.1672   0.30875  0.325
                100        1.696  0.209    0.209    0.3211   0.338
                100        1.67   0.2261   0.2261   0.3287   0.346
                100        1.646  0.2432   0.2432   0.35055  0.369
                100        1.659  0.25745  0.25745  0.36     0.37
                100        1.67   0.2717   0.2717   0.354    0.36
                100        1.675  0.2736   0.2736   0.358    0.368
                100        1.675  0.2755   0.2755   0.364    0.364
                SoilCrop SlurpSoil
                  LL=[0.16245, 0.1862, 0.18145, 0.1539, 0.1292, 0.1311, 0.1368, 0.12635, 0.12825, 0.13775, 0.1273, 0.1178, 0.12065, 0.12445, 0.1672, 0.209, 0.2261, 0.2432, 0.25745, 0.2717, 0.2736, 0.2755]
                  KL=[0.06, 0.019, 0.019, 0.019, 0.026, 0.026, 0.026, 0.031, 0.031, 0.031, 0.025, 0.025, 0.025, 0.035, 0.035, 0.035, 0.021, 0.021, 0.021, 0.019, 0.019, 0.019]
                  XF=[1, 1, 1, 1, 1, 1, 1, 1, 1, 1, 1, 1, 1, 1, 1, 1, 1, 1, 1, 1, 1, 1]
              WaterBalance SoilWater: same as New Zealand.Iversen12.Factors.SowingDate.SD1.Soil.SoilWater
              SoilNitrogen: same as New Zealand.AshleyDene.Factors.SowingDate.SD1.Soil.SoilNitrogen
              Organic: same as New Zealand.AshleyDene.Factors.SowingDate.SD1.Soil.Organic
              CERESSoilTemperature Temperature
              Sample InitialConditions: SWUnits=Volumetric; OCUnits=Total; PHUnits=Water
                Thickness=[200, 100, 100, 100, 100, 100, 100, 100, 100, 100, 100, 100, 100, 100, 100, 100, 100, 100, 100, 100, 100, 100]
                SW=[0.375, 0.359, 0.303, 0.285, 0.278, 0.261, 0.232, 0.215, 0.216, 0.248, 0.245, 0.218, 0.219, 0.221, 0.252, 0.31, 0.326, 0.349, 0.36, 0.354, 0.358, 0.364]
          CompositeFactor SD3
            Specifications:
              [SlurpSowingRule].Script.SowingDate = 2010-12-02
              [Clock].StartDate = 2010-12-02
              [Soil]
              [ResetOnDate].Script.ResetDate = 2011-06-25
              [ResetOnDate].Script.ResetWater = Yes
              [ResetOnDate].Script.NewSW = 0.361,0.356,0.315,0.296,0.295,0.29,0.278,0.274,0.253,0.241,0.212,0.197,0.194,0.234,0.285,0.232,0.316,0.349,0.372,0.363,0.348,0.342
              [Soil].Physical.SlurpSoil.KL[1:22] = 0.165631015713033
              [SlurpSowingRule].Script.RFV = 28.9072216061005
              [SlurpSowingRule].Script.KLReductionFactor = 0.00158040094808399
              [SlurpSowingRule].Script.MaxG = 0.0189709502289474
              [SlurpSowingRule].Script.R50 = 282.640093130579
              [SlurpSowingRule].Script.SummerU = 0.718776494316257
              [SlurpSowingRule].Script.SummerCona = 0.00742054039645387
              [SlurpSowingRule].Script.WinterU = 0.900886159033275
              [SlurpSowingRule].Script.WinterCona = 0.569580747212446
            Soil: SoilType=Udic Haplustept (US), Pallic orthic brown soil (NZ); Site=Ashley Dene: Lincoln University Research Farm; NearestTown=Lincoln; Country=New Zealand; Latitude=999999; Longitude=999999
              Comments=Soil water characterised from NNM (2 years). Stone content and BD  from Di and Cameron 2002. Soil saturation from Cichota 2013.
              Chemical: same as New Zealand.AshleyDene.Factors.SowingDate.SD4.Soil.Chemical
              Physical
                Thickness  BD     AirDry   LL15     DUL      SAT
                200        1.15   0.1501   0.1501   0.361    0.368
                100        1.15   0.1862   0.1862   0.356    0.368
                100        1.31   0.17955  0.17955  0.315    0.327
                100        1.31   0.16815  0.16815  0.296    0.305
                100        1.826  0.16625  0.16625  0.29545  0.311
                100        1.791  0.1596   0.1596   0.3078   0.324
                100        1.762  0.15105  0.15105  0.31825  0.335
                100        1.754  0.13395  0.13395  0.3211   0.338
                100        1.778  0.1159   0.1159   0.30305  0.319
                100        1.797  0.1045   0.1045   0.2869   0.302
                100        1.829  0.095    0.095    0.26315  0.277
                100        1.874  0.0855   0.0855   0.2489   0.262
                100        1.831  0.1254   0.1254   0.25745  0.271
                100        1.746  0.1653   0.1653   0.2869   0.302
                100        1.733  0.15105  0.15105  0.30115  0.317
                100        1.715  0.1368   0.1368   0.2793   0.294
                100        1.662  0.1824   0.1824   0.3306   0.348
                100        1.646  0.2261   0.2261   0.3572   0.376
                100        1.643  0.24795  0.24795  0.372    0.38
                100        1.651  0.26885  0.26885  0.363    0.372
                100        1.675  0.2679   0.2679   0.348    0.351
                100        1.675  0.2679   0.2679   0.342    0.346
                SoilCrop SlurpSoil
                  LL=[0.1501, 0.1862, 0.17955, 0.16815, 0.16625, 0.1596, 0.15105, 0.13395, 0.1159, 0.1045, 0.095, 0.0855, 0.1254, 0.1653, 0.15105, 0.1368, 0.1824, 0.2261, 0.24795, 0.26885, 0.2679, 0.2679]
                  KL=[0.06, 0.019, 0.019, 0.019, 0.026, 0.026, 0.026, 0.031, 0.031, 0.031, 0.025, 0.025, 0.025, 0.035, 0.035, 0.035, 0.021, 0.021, 0.021, 0.019, 0.019, 0.019]
                  XF=[1, 1, 1, 1, 1, 1, 1, 1, 1, 1, 1, 1, 1, 1, 1, 1, 1, 1, 1, 1, 1, 1]
              WaterBalance SoilWater: same as New Zealand.Iversen12.Factors.SowingDate.SD1.Soil.SoilWater
              SoilNitrogen: same as New Zealand.AshleyDene.Factors.SowingDate.SD1.Soil.SoilNitrogen
              Organic: same as New Zealand.AshleyDene.Factors.SowingDate.SD1.Soil.Organic
              CERESSoilTemperature Temperature
              Sample InitialConditions: SWUnits=Volumetric; OCUnits=Total; PHUnits=Water
                Thickness=[200, 100, 100, 100, 100, 100, 100, 100, 100, 100, 100, 100, 100, 100, 100, 100, 100, 100, 100, 100, 100, 100]
                SW=[0.361, 0.356, 0.315, 0.296, 0.295, 0.29, 0.278, 0.274, 0.253, 0.241, 0.212, 0.197, 0.194, 0.234, 0.285, 0.232, 0.316, 0.349, 0.372, 0.363, 0.348, 0.342]
          CompositeFactor SD4
            Specifications:
              [SlurpSowingRule].Script.SowingDate = 2011-01-10
              [Clock].StartDate = 2011-01-10
              [Soil]
              [ResetOnDate].Script.ResetDate = 2011-06-25
              [ResetOnDate].Script.ResetWater = Yes
              [ResetOnDate].Script.NewSW = 0.37,0.361,0.305,0.279,0.268,0.25,0.244,0.264,0.247,0.214,0.175,0.2,0.224,0.227,0.269,0.304,0.259,0.29,0.36,0.372,0.37,0.356
              [Soil].Physical.SlurpSoil.KL[1:22] = 0.34374282163882
              [SlurpSowingRule].Script.RFV = 14.456615797231
              [SlurpSowingRule].Script.KLReductionFactor = 0.00226108335543802
              [SlurpSowingRule].Script.MaxG = 0.0322776456031682
              [SlurpSowingRule].Script.R50 = 285.180017139413
              [SlurpSowingRule].Script.SummerU = 0.0377700977562118
              [SlurpSowingRule].Script.SummerCona = 0.00908513131777461
              [SlurpSowingRule].Script.WinterU = 0.000463292139892909
              [SlurpSowingRule].Script.WinterCona = 1.89304373884395
            Soil: SoilType=Udic Haplustept (US), Pallic orthic brown soil (NZ); Site=Ashley Dene: Lincoln University Research Farm; NearestTown=Lincoln; Country=New Zealand; Latitude=999999; Longitude=999999
              Comments=Soil water characterised from NNM (2 years). Stone content and BD  from Di and Cameron 2002. Soil saturation from Cichota 2013.
              Chemical: same as New Zealand.AshleyDene.Factors.SowingDate.SD1.Soil.Chemical
              Physical
                Thickness  BD     AirDry   LL15     DUL      SAT
                200        1.15   0.1501   0.1501   0.37     0.37
                100        1.15   0.16055  0.16055  0.361    0.368
                100        1.31   0.1425   0.1425   0.305    0.314
                100        1.31   0.1216   0.1216   0.2793   0.294
                100        1.863  0.114    0.114    0.28215  0.297
                100        1.807  0.10355  0.10355  0.3021   0.318
                100        1.797  0.1007   0.1007   0.3059   0.322
                100        1.794  0.114    0.114    0.304    0.32
                100        1.778  0.0988   0.0988   0.285    0.3
                100        1.797  0.07505  0.07505  0.26125  0.275
                100        1.829  0.0817   0.0817   0.2508   0.264
                100        1.874  0.09405  0.09405  0.2603   0.274
                100        1.831  0.11495  0.11495  0.2717   0.286
                100        1.746  0.1349   0.1349   0.2774   0.292
                100        1.733  0.15865  0.15865  0.2907   0.306
                100        1.715  0.18145  0.18145  0.30875  0.325
                100        1.67   0.19     0.19     0.27835  0.293
                100        1.646  0.21375  0.21375  0.3021   0.318
                100        1.672  0.2451   0.2451   0.36     0.364
                100        1.632  0.27645  0.27645  0.372    0.38
                100        1.64   0.27455  0.27455  0.37     0.381
                100        1.675  0.2717   0.2717   0.356    0.357
                SoilCrop SlurpSoil
                  LL=[0.1501, 0.16055, 0.1425, 0.1216, 0.114, 0.10355, 0.1007, 0.114, 0.0988, 0.07505, 0.0817, 0.09405, 0.11495, 0.1349, 0.15865, 0.18145, 0.19, 0.21375, 0.2451, 0.27645, 0.27455, 0.2717]
                  KL=[0.06, 0.019, 0.019, 0.019, 0.026, 0.026, 0.026, 0.031, 0.031, 0.031, 0.025, 0.025, 0.025, 0.035, 0.035, 0.035, 0.021, 0.021, 0.021, 0.019, 0.019, 0.019]
                  XF=[1, 1, 1, 1, 1, 1, 1, 1, 1, 1, 1, 1, 1, 1, 1, 1, 1, 1, 1, 1, 1, 1]
              WaterBalance SoilWater: same as New Zealand.Iversen12.Factors.SowingDate.SD1.Soil.SoilWater
              SoilNitrogen: same as New Zealand.AshleyDene.Factors.SowingDate.SD1.Soil.SoilNitrogen
              Organic: same as New Zealand.AshleyDene.Factors.SowingDate.SD1.Soil.Organic
              CERESSoilTemperature Temperature
              Sample InitialConditions: SWUnits=Volumetric; OCUnits=Total; PHUnits=Water
                Thickness=[200, 100, 100, 100, 100, 100, 100, 100, 100, 100, 100, 100, 100, 100, 100, 100, 100, 100, 100, 100, 100, 100]
                SW=[0.37, 0.361, 0.305, 0.279, 0.268, 0.25, 0.244, 0.264, 0.247, 0.214, 0.175, 0.2, 0.224, 0.227, 0.269, 0.304, 0.259, 0.29, 0.36, 0.372, 0.37, 0.356]
          CompositeFactor SD5
            Specifications:
              [SlurpSowingRule].Script.SowingDate = 2011-02-07
              [Clock].StartDate = 2011-02-7
              [Soil]
              [ResetOnDate].Script.ResetDate = 2011-06-25
              [ResetOnDate].Script.ResetWater = Yes
              [ResetOnDate].Script.NewSW = 0.369,0.362,0.316,0.299,0.295,0.296,0.284,0.277,0.272,0.278,0.27,0.255,0.223,0.263,0.285,0.3,0.277,0.276,0.334,0.35,0.344,0.345
              [Soil].Physical.SlurpSoil.KL[1:22] = 0.284380113753882
              [SlurpSowingRule].Script.RFV = 8.63741645652428
              [SlurpSowingRule].Script.KLReductionFactor = 0.00127911387961227
              [SlurpSowingRule].Script.MaxG = 0.0358764289105487
              [SlurpSowingRule].Script.R50 = 291.11298179529
              [SlurpSowingRule].Script.SummerU = 0.118574105439622
              [SlurpSowingRule].Script.SummerCona = 5.85491000059676e-06
              [SlurpSowingRule].Script.WinterU = 0.656584793869401
              [SlurpSowingRule].Script.WinterCona = 0.969001219998588
            Soil: SoilType=Udic Haplustept (US), Pallic orthic brown soil (NZ); Site=Ashley Dene: Lincoln University Research Farm; NearestTown=Lincoln; Country=New Zealand; Latitude=999999; Longitude=999999
              Comments=Soil water characterised from NNM (2 years). Stone content and BD  from Di and Cameron 2002. Soil saturation from Cichota 2013.
              Chemical: same as New Zealand.AshleyDene.Factors.SowingDate.SD4.Soil.Chemical
              Physical
                Thickness  BD     AirDry   LL15     DUL      SAT
                200        1.15   0.1463   0.1463   0.369    0.369
                100        1.15   0.1634   0.1634   0.362    0.37
                100        1.31   0.1672   0.1672   0.316    0.326
                100        1.31   0.152    0.152    0.299    0.309
                100        1.836  0.1235   0.1235   0.295    0.307
                100        1.823  0.11875  0.11875  0.2964   0.312
                100        1.834  0.1083   0.1083   0.2926   0.308
                100        1.794  0.0855   0.0855   0.2964   0.312
                100        1.778  0.08645  0.08645  0.2983   0.314
                100        1.797  0.1197   0.1197   0.3021   0.318
                100        1.823  0.10925  0.10925  0.2964   0.312
                100        1.81   0.09785  0.09785  0.30115  0.317
                100        1.831  0.1311   0.1311   0.28785  0.303
                100        1.746  0.1653   0.1653   0.2926   0.308
                100        1.733  0.17195  0.17195  0.31255  0.329
                100        1.715  0.17765  0.17765  0.3287   0.346
                100        1.67   0.171    0.171    0.3173   0.334
                100        1.646  0.19     0.19     0.3211   0.34
                100        1.672  0.21565  0.21565  0.34295  0.361
                100        1.67   0.24035  0.24035  0.35     0.367
                100        1.675  0.2546   0.2546   0.344    0.356
                100        1.675  0.26885  0.26885  0.345    0.346
                SoilCrop SlurpSoil
                  LL=[0.1463, 0.1634, 0.1672, 0.152, 0.1235, 0.11875, 0.1083, 0.0855, 0.08645, 0.1197, 0.10925, 0.09785, 0.1311, 0.1653, 0.17195, 0.17765, 0.171, 0.19, 0.21565, 0.24035, 0.2546, 0.26885]
                  KL=[0.06, 0.019, 0.019, 0.019, 0.026, 0.026, 0.026, 0.031, 0.031, 0.031, 0.025, 0.025, 0.025, 0.035, 0.035, 0.035, 0.021, 0.021, 0.021, 0.019, 0.019, 0.019]
                  XF=[1, 1, 1, 1, 1, 1, 1, 1, 1, 1, 1, 1, 1, 1, 1, 1, 1, 1, 1, 1, 1, 1]
              WaterBalance SoilWater: same as New Zealand.Iversen12.Factors.SowingDate.SD1.Soil.SoilWater
              SoilNitrogen: same as New Zealand.AshleyDene.Factors.SowingDate.SD1.Soil.SoilNitrogen
              Organic: same as New Zealand.AshleyDene.Factors.SowingDate.SD1.Soil.Organic
              CERESSoilTemperature Temperature
              Sample InitialConditions: SWUnits=Volumetric; OCUnits=Total; PHUnits=Water
                Thickness=[200, 100, 100, 100, 100, 100, 100, 100, 100, 100, 100, 100, 100, 100, 100, 100, 100, 100, 100, 100, 100, 100]
                SW=[0.369, 0.362, 0.316, 0.299, 0.295, 0.296, 0.284, 0.277, 0.272, 0.278, 0.27, 0.255, 0.223, 0.263, 0.285, 0.3, 0.277, 0.276, 0.334, 0.35, 0.344, 0.345]
          CompositeFactor SD6
            Specifications:
              [SlurpSowingRule].Script.SowingDate = 2011-10-10
              [Clock].StartDate = 2011-10-10
              [Soil]
            Soil: SoilType=Udic Haplustept (US), Pallic orthic brown soil (NZ); Site=Ashley Dene: Lincoln University Research Farm; NearestTown=Lincoln; Country=New Zealand; Latitude=999999; Longitude=999999
              Comments=Soil water characterised from NNM (2 years). Stone content and BD  from Di and Cameron 2002. Soil saturation from Cichota 2013.
              Chemical: same as New Zealand.AshleyDene.Factors.SowingDate.SD1.Soil.Chemical
              Physical
                Thickness  BD     AirDry   LL15     DUL     SAT
                200        1.15   0.1102   0.1102   0.3515  0.37
                100        1.15   0.15295  0.15295  0.33    0.333
                100        1.31   0.1596   0.1596   0.305   0.309
                100        1.31   0.17575  0.17575  0.284   0.286
                100        1.882  0.1653   0.1653   0.277   0.28
                100        1.855  0.14345  0.14345  0.283   0.283
                100        1.839  0.1444   0.1444   0.295   0.295
                100        1.794  0.1672   0.1672   0.309   0.312
                100        1.778  0.1672   0.1672   0.313   0.316
                100        1.797  0.16245  0.16245  0.315   0.315
                100        1.802  0.1938   0.1938   0.319   0.32
                100        1.786  0.22515  0.22515  0.322   0.326
                100        1.757  0.2147   0.2147   0.336   0.337
                100        1.741  0.2052   0.2052   0.339   0.343
                100        1.733  0.22515  0.22515  0.342   0.344
                100        1.715  0.24605  0.24605  0.336   0.344
                100        1.67   0.2489   0.2489   0.355   0.359
                100        1.646  0.2508   0.2508   0.354   0.367
                100        1.643  0.2755   0.2755   0.37    0.38
                100        1.648  0.29925  0.29925  0.372   0.378
                100        1.662  0.29735  0.29735  0.366   0.373
                100        1.675  0.29355  0.29355  0.357   0.365
                SoilCrop SlurpSoil
                  LL=[0.1102, 0.15295, 0.1596, 0.17575, 0.1653, 0.14345, 0.1444, 0.1672, 0.1672, 0.16245, 0.1938, 0.22515, 0.2147, 0.2052, 0.22515, 0.24605, 0.2489, 0.2508, 0.2755, 0.29925, 0.29735, 0.29355]
                  KL=[0.06, 0.039, 0.039, 0.039, 0.043, 0.043, 0.043, 0.04, 0.04, 0.04, 0.03, 0.03, 0.03, 0, 0, 0, 0, 0, 0, 0, 0, 0]
                  XF=[1, 1, 1, 1, 1, 1, 1, 1, 1, 1, 1, 1, 1, 0, 0, 0, 0, 0, 0, 0, 0, 0]
              WaterBalance SoilWater: same as New Zealand.Iversen12.Factors.SowingDate.SD1.Soil.SoilWater
              SoilNitrogen: same as New Zealand.AshleyDene.Factors.SowingDate.SD1.Soil.SoilNitrogen
              Organic: same as New Zealand.AshleyDene.Factors.SowingDate.SD1.Soil.Organic
              CERESSoilTemperature Temperature
              Sample InitialConditions: SWUnits=Volumetric; OCUnits=Total; PHUnits=Water
                Thickness=[200, 100, 100, 100, 100, 100, 100, 100, 100, 100, 100, 100, 100, 100, 100, 100, 100, 100, 100, 100, 100, 100]
                SW=[0.257, 0.33, 0.305, 0.284, 0.277, 0.283, 0.295, 0.309, 0.313, 0.315, 0.319, 0.322, 0.336, 0.339, 0.342, 0.336, 0.355, 0.354, 0.37, 0.372, 0.366, 0.357]
          CompositeFactor SD7
            Specifications:
              [SlurpSowingRule].Script.SowingDate = 2011-11-07
              [Clock].StartDate = 2011-11-07
              [Soil]
            Soil: SoilType=Udic Haplustept (US), Pallic orthic brown soil (NZ); Site=Ashley Dene: Lincoln University Research Farm; NearestTown=Lincoln; Country=New Zealand; Latitude=999999; Longitude=999999
              Comments=Soil water characterised from NNM (2 years). Stone content and BD  from Di and Cameron 2002. Soil saturation from Cichota 2013.
              Chemical: same as New Zealand.AshleyDene.Factors.SowingDate.SD1.Soil.Chemical
              Physical
                Thickness  BD     AirDry   LL15     DUL      SAT
                200        1.15   0.13395  0.13395  0.31445  0.331
                100        1.15   0.16245  0.16245  0.3382   0.356
                100        1.31   0.15485  0.15485  0.304    0.311
                100        1.31   0.1482   0.1482   0.286    0.3
                100        1.863  0.1254   0.1254   0.287    0.297
                100        1.855  0.1273   0.1273   0.289    0.293
                100        1.823  0.15295  0.15295  0.305    0.312
                100        1.794  0.16815  0.16815  0.313    0.316
                100        1.778  0.15295  0.15295  0.307    0.31
                100        1.797  0.15295  0.15295  0.308    0.31
                100        1.829  0.1539   0.1539   0.294    0.3
                100        1.874  0.15295  0.15295  0.284    0.286
                100        1.831  0.1539   0.1539   0.3      0.304
                100        1.746  0.15485  0.15485  0.319    0.322
                100        1.733  0.14915  0.14915  0.318    0.322
                100        1.715  0.1444   0.1444   0.348    0.35
                100        1.659  0.1957   0.1957   0.37     0.374
                100        1.646  0.2451   0.2451   0.36     0.364
                100        1.672  0.2679   0.2679   0.351    0.355
                100        1.67   0.2869   0.2869   0.353    0.358
                100        1.675  0.2888   0.2888   0.349    0.357
                100        1.675  0.28975  0.28975  0.343    0.345
                SoilCrop SlurpSoil
                  LL=[0.13395, 0.16245, 0.15485, 0.1482, 0.1254, 0.1273, 0.15295, 0.16815, 0.15295, 0.15295, 0.1539, 0.15295, 0.1539, 0.15485, 0.14915, 0.1444, 0.1957, 0.2451, 0.2679, 0.2869, 0.2888, 0.28975]
                  KL=[0.06, 0.039, 0.039, 0.039, 0.043, 0.043, 0.043, 0.04, 0.04, 0.04, 0.03, 0.03, 0.03, 0, 0, 0, 0, 0, 0, 0, 0, 0]
                  XF=[1, 1, 1, 1, 1, 1, 1, 1, 1, 1, 1, 1, 1, 0, 0, 0, 0, 0, 0, 0, 0, 0]
              WaterBalance SoilWater: same as New Zealand.Iversen12.Factors.SowingDate.SD1.Soil.SoilWater
              SoilNitrogen: same as New Zealand.AshleyDene.Factors.SowingDate.SD1.Soil.SoilNitrogen
              Organic: same as New Zealand.AshleyDene.Factors.SowingDate.SD1.Soil.Organic
              CERESSoilTemperature Temperature
              Sample InitialConditions: SWUnits=Volumetric; OCUnits=Total; PHUnits=Water
                Thickness=[200, 100, 100, 100, 100, 100, 100, 100, 100, 100, 100, 100, 100, 100, 100, 100, 100, 100, 100, 100, 100, 100]
                SW=[0.273, 0.335, 0.304, 0.286, 0.287, 0.289, 0.305, 0.313, 0.307, 0.308, 0.294, 0.284, 0.3, 0.319, 0.318, 0.348, 0.37, 0.36, 0.351, 0.353, 0.349, 0.343]
          CompositeFactor SD8
            Specifications:
              [SlurpSowingRule].Script.SowingDate = 2011-12-09
              [Clock].StartDate = 2011-12-09
              [Soil]
            Soil: SoilType=Udic Haplustept (US), Pallic orthic brown soil (NZ); Site=Ashley Dene: Lincoln University Research Farm; NearestTown=Lincoln; Country=New Zealand; Latitude=999999; Longitude=999999
              Comments=Soil water characterised from NNM (2 years). Stone content and BD  from Di and Cameron 2002. Soil saturation from Cichota 2013.
              Chemical: same as New Zealand.AshleyDene.Factors.SowingDate.SD1.Soil.Chemical
              Physical
                Thickness  BD     AirDry   LL15     DUL      SAT
                200        1.15   0.1501   0.1501   0.31825  0.335
                100        1.15   0.17195  0.17195  0.29735  0.313
                100        1.31   0.17385  0.17385  0.2641   0.278
                100        1.31   0.1558   0.1558   0.24415  0.257
                100        1.882  0.1482   0.1482   0.21945  0.231
                100        1.855  0.171    0.171    0.239    0.239
                100        1.839  0.17955  0.17955  0.269    0.269
                100        1.794  0.18335  0.18335  0.275    0.275
                100        1.778  0.1919   0.1919   0.274    0.274
                100        1.797  0.18145  0.18145  0.28     0.286
                100        1.829  0.15485  0.15485  0.265    0.268
                100        1.874  0.1273   0.1273   0.23     0.235
                100        1.831  0.1311   0.1311   0.21     0.217
                100        1.746  0.1349   0.1349   0.23     0.236
                100        1.733  0.1539   0.1539   0.245    0.252
                100        1.715  0.19665  0.19665  0.263    0.264
                100        1.67   0.24795  0.24795  0.307    0.309
                100        1.646  0.29545  0.29545  0.357    0.36
                100        1.672  0.29545  0.29545  0.366    0.367
                100        1.67   0.29545  0.29545  0.357    0.358
                100        1.675  0.2926   0.2926   0.355    0.361
                100        1.675  0.2945   0.2945   0.355    0.356
                SoilCrop SlurpSoil
                  LL=[0.1501, 0.17195, 0.17385, 0.1558, 0.1482, 0.171, 0.17955, 0.18335, 0.1919, 0.18145, 0.15485, 0.1273, 0.1311, 0.1349, 0.1539, 0.19665, 0.24795, 0.29545, 0.29545, 0.29545, 0.2926, 0.2945]
                  KL=[0.06, 0.039, 0.039, 0.039, 0.043, 0.043, 0.043, 0.04, 0.04, 0.04, 0.03, 0.03, 0.03, 0, 0, 0, 0, 0, 0, 0, 0, 0]
                  XF=[1, 1, 1, 1, 1, 1, 1, 1, 1, 1, 1, 1, 1, 0, 0, 0, 0, 0, 0, 0, 0, 0]
              WaterBalance SoilWater: same as New Zealand.Iversen12.Factors.SowingDate.SD1.Soil.SoilWater
              SoilNitrogen: same as New Zealand.AshleyDene.Factors.SowingDate.SD1.Soil.SoilNitrogen
              Organic: same as New Zealand.AshleyDene.Factors.SowingDate.SD1.Soil.Organic
              CERESSoilTemperature Temperature
              Sample InitialConditions: SWUnits=Volumetric; OCUnits=Total; PHUnits=Water
                Thickness=[200, 100, 100, 100, 100, 100, 100, 100, 100, 100, 100, 100, 100, 100, 100, 100, 100, 100, 100, 100, 100, 100]
                SW=[0.308, 0.223, 0.218, 0.209, 0.21, 0.239, 0.269, 0.275, 0.274, 0.28, 0.265, 0.23, 0.21, 0.23, 0.245, 0.263, 0.307, 0.357, 0.366, 0.357, 0.355, 0.355]
          CompositeFactor SD9
            Specifications:
              [SlurpSowingRule].Script.SowingDate = 2012-01-10
              [Clock].StartDate = 2012-01-10
              [Soil]
            Soil: SoilType=Udic Haplustept (US), Pallic orthic brown soil (NZ); Site=Ashley Dene: Lincoln University Research Farm; NearestTown=Lincoln; Country=New Zealand; Latitude=999999; Longitude=999999
              Comments=Soil water characterised from NNM (2 years). Stone content and BD  from Di and Cameron 2002. Soil saturation from Cichota 2013.
              Chemical: same as New Zealand.AshleyDene.Factors.SowingDate.SD1.Soil.Chemical
              Physical
                Thickness  BD     AirDry   LL15     DUL     SAT
                200        1.15   0.18335  0.18335  0.3249  0.342
                100        1.15   0.24035  0.24035  0.342   0.354
                100        1.31   0.21185  0.21185  0.296   0.306
                100        1.31   0.18715  0.18715  0.259   0.263
                100        1.882  0.1748   0.1748   0.24    0.242
                100        1.855  0.17005  0.17005  0.25    0.251
                100        1.839  0.1843   0.1843   0.257   0.263
                100        1.794  0.16625  0.16625  0.228   0.229
                100        1.778  0.1729   0.1729   0.22    0.223
                100        1.797  0.18145  0.18145  0.236   0.238
                100        1.829  0.17385  0.17385  0.232   0.236
                100        1.874  0.1653   0.1653   0.23    0.234
                100        1.831  0.17955  0.17955  0.236   0.24
                100        1.746  0.19285  0.19285  0.254   0.259
                100        1.733  0.2261   0.2261   0.289   0.3
                100        1.715  0.2584   0.2584   0.314   0.317
                100        1.67   0.27265  0.27265  0.347   0.348
                100        1.646  0.2869   0.2869   0.352   0.354
                100        1.672  0.29165  0.29165  0.351   0.351
                100        1.67   0.29545  0.29545  0.359   0.363
                100        1.675  0.29355  0.29355  0.359   0.365
                100        1.675  0.2907   0.2907   0.348   0.351
                SoilCrop SlurpSoil
                  LL=[0.18335, 0.24035, 0.21185, 0.18715, 0.1748, 0.17005, 0.1843, 0.16625, 0.1729, 0.18145, 0.17385, 0.1653, 0.17955, 0.19285, 0.2261, 0.2584, 0.27265, 0.2869, 0.29165, 0.29545, 0.29355, 0.2907]
                  KL=[0.06, 0.039, 0.039, 0.039, 0.043, 0.043, 0.043, 0.04, 0.04, 0.04, 0.03, 0.03, 0.03, 0, 0, 0, 0, 0, 0, 0, 0, 0]
                  XF=[1, 1, 1, 1, 1, 1, 1, 1, 1, 1, 1, 1, 1, 0, 0, 0, 0, 0, 0, 0, 0, 0]
              WaterBalance SoilWater: same as New Zealand.Iversen12.Factors.SowingDate.SD1.Soil.SoilWater
              SoilNitrogen: same as New Zealand.AshleyDene.Factors.SowingDate.SD1.Soil.SoilNitrogen
              Organic: same as New Zealand.AshleyDene.Factors.SowingDate.SD1.Soil.Organic
              CERESSoilTemperature Temperature
              Sample InitialConditions: SWUnits=Volumetric; OCUnits=Total; PHUnits=Water
                Thickness=[200, 100, 100, 100, 100, 100, 100, 100, 100, 100, 100, 100, 100, 100, 100, 100, 100, 100, 100, 100, 100, 100]
                SW=[0.246, 0.342, 0.296, 0.259, 0.24, 0.25, 0.257, 0.228, 0.22, 0.236, 0.232, 0.23, 0.236, 0.254, 0.289, 0.314, 0.347, 0.352, 0.351, 0.359, 0.359, 0.348]
          CompositeFactor SD10
            Specifications:
              [SlurpSowingRule].Script.SowingDate = 2012-02-17
              [Clock].StartDate = 2012-02-17
              [Soil]
            Soil: SoilType=Udic Haplustept (US), Pallic orthic brown soil (NZ); Site=Ashley Dene: Lincoln University Research Farm; NearestTown=Lincoln; Country=New Zealand; Latitude=999999; Longitude=999999
              Comments=Soil water characterised from NNM (2 years). Stone content and BD  from Di and Cameron 2002. Soil saturation from Cichota 2013.
              Chemical: same as New Zealand.AshleyDene.Factors.SowingDate.SD1.Soil.Chemical
              Physical
                Thickness  BD     AirDry   LL15     DUL      SAT
                200        1.15   0.2147   0.2147   0.31     0.351
                100        1.15   0.2565   0.2565   0.327    0.327
                100        1.31   0.228    0.228    0.284    0.296
                100        1.31   0.20235  0.20235  0.2584   0.272
                100        1.882  0.19     0.19     0.24415  0.257
                100        1.855  0.1957   0.1957   0.239    0.243
                100        1.839  0.1995   0.1995   0.236    0.236
                100        1.794  0.19665  0.19665  0.233    0.233
                100        1.778  0.1919   0.1919   0.226    0.226
                100        1.797  0.1976   0.1976   0.224    0.226
                100        1.829  0.20235  0.20235  0.228    0.23
                100        1.874  0.20425  0.20425  0.234    0.235
                100        1.831  0.1843   0.1843   0.223    0.225
                100        1.746  0.1634   0.1634   0.2      0.204
                100        1.733  0.1976   0.1976   0.211    0.22
                100        1.715  0.22325  0.22325  0.237    0.249
                100        1.67   0.24795  0.24795  0.267    0.277
                100        1.646  0.266    0.266    0.289    0.29
                100        1.672  0.27645  0.27645  0.306    0.306
                100        1.67   0.28405  0.28405  0.314    0.314
                100        1.675  0.285    0.285    0.318    0.318
                100        1.675  0.28405  0.28405  0.316    0.316
                SoilCrop SlurpSoil
                  LL=[0.2147, 0.2565, 0.228, 0.20235, 0.19, 0.1957, 0.1995, 0.19665, 0.1919, 0.1976, 0.20235, 0.20425, 0.1843, 0.1634, 0.1976, 0.22325, 0.24795, 0.266, 0.27645, 0.28405, 0.285, 0.28405]
                  KL=[0.06, 0.039, 0.039, 0.039, 0.043, 0.043, 0.043, 0.04, 0.04, 0.04, 0.03, 0.03, 0.03, 0, 0, 0, 0, 0, 0, 0, 0, 0]
                  XF=[1, 1, 1, 1, 1, 1, 1, 1, 1, 1, 1, 1, 1, 0, 0, 0, 0, 0, 0, 0, 0, 0]
              WaterBalance SoilWater: SummerDate=1-Oct; SummerU=5; SummerCona=4.4; WinterDate=1-Mar; WinterU=5; WinterCona=2.5; DiffusConst=88; DiffusSlope=35.4; Salb=0.18; CN2Bare=68; CNRed=20; CNCov=0.8
                Thickness=[200, 100, 100, 100, 100, 100, 100, 100, 100, 100, 100, 100, 100, 100, 999999, 999999, 999999, 999999, 999999, 999999, 999999, 999999]
                SWCON=[0.55, 0.55, 0.55, 0.55, 0.55, 0.55, 0.55, 0.55, 0.55, 0.55, 0.55, 0.55, 0.55, 0.55, 0.55, 0.55, 0.55, 0.55, 0.55, 0.55, 0.55, 0.55]
              SoilNitrogen: same as New Zealand.AshleyDene.Factors.SowingDate.SD1.Soil.SoilNitrogen
              Organic: same as New Zealand.AshleyDene.Factors.SowingDate.SD1.Soil.Organic
              CERESSoilTemperature Temperature
              Sample InitialConditions: SWUnits=Volumetric; OCUnits=Total; PHUnits=Water
                Thickness=[200, 100, 100, 100, 100, 100, 100, 100, 100, 100, 100, 100, 100, 100, 100, 100, 100, 100, 100, 100, 100, 100]
                SW=[0.248, 0.327, 0.284, 0.255, 0.244, 0.239, 0.236, 0.233, 0.226, 0.224, 0.228, 0.234, 0.223, 0.2, 0.211, 0.237, 0.267, 0.289, 0.306, 0.314, 0.318, 0.316]
      Simulation Iversen12
        Clock: Start=2010-10-03; End=2012-07-12
        Summary summaryfile
        Weather: FileName=C:\Data\Master\01Data\ClimateAndObserved\AshleyDene.met
        SoilArbitrator Soil Arbitrator
        Zone Field: Area=1; Slope=0; AspectAngle=0; Altitude=50
          Folder ManagerFolder
            Memo
              # ReportOnDates
              Disabled by [Clock].DoReport

              # SlurpSowingRule
              Critical manager to control the sowing rules and canopy paramters.

              # SetCropVariables
              Critical manager that controls the fractional light interception and extinction coeficient data input.
            Manager ReportOnDates: same as New Zealand.AshleyDene.AshleyDene.Field.ManagerFolder.ReportOnDates
            Manager SlurpSowingRule
              SowingDate = 10/21/2010 00:00:00
              RFV = 10
              KLReductionFactor = 0.002
              MaxG = 0.006
              R50 = 175
              SummerU = 9
              SummerCona = 4.4
              WinterU = 4
              WinterCona = 1
              CultivarName = Lucerne
              InitialRootDepth = 15
              RootDepth = 2300
              KLReductionDepth = 150
              YKLModifiers =
              XDepth =
```csharp
using Models.Interfaces;
using Models.Soils;
using APSIM.Shared.Utilities;
using Models.PMF;
using Models.Core;
using System;
using Models.PMF.Organs;
        
namespace Models
{
    [Serializable] 
    [System.Xml.Serialization.XmlInclude(typeof(Model))]
    public class Script : Model
    {
        [Link] private Plant Slurp;
        [Link] private Clock Clock;
        [Link] private Soil Soil;
        [Link] private Zone zone;
        [Link(Type = LinkType.Path, Path = "[Slurp].Root")]
        private Root root;
        [Link]
        private IPhysical soilPhysical;
        
        [Description("Cultivar")]
        public string CultivarName { get; set; }
        [Description("Initial Root Depth")]
        public double InitialRootDepth { get; set; }
        [Description("Sowing Date")]
        public DateTime SowingDate { get; set; }
        [Description("Maximum Root Depth")]
        public double RootDepth { get; set; }
        [Description("Roof Front Velocity")]
        public double RFV { get; set; }
        [Description("Factor to change Kl modifier with Depth")]
        public double KLReductionFactor { get; set; }
        [Description("Depth that KL starts to decline")]
        public double KLReductionDepth { get; set; }
        
        public double[] YKLModifiers { get; set; }
        public double[] XDepth { get; set; }
        private double Depth { get; set; }
        
        [Description("Maximum Stomatal Conductance")]
        public double MaxG { get; set; }
        [Description("Stomatal Radn response")]
        public double R50 { get; set; }
        [Description("SummerU - 1st stage evaporation, controls the threshold which beyond will be 2nd stage.")]
        public double SummerU { get; set; }
        [Description("SummerCona - 2nd stage evaporation, controls how fast the water vapor")]
        public double SummerCona { get; set; }
        [Description("WinterU - 1st stage evaporation, controls the threshold which beyond will be 2nd stage.")]
        public double WinterU { get; set; }
        [Description("WinterCona - 2nd stage evaporation, controls how fast the water vapor")]
        public double WinterCona { get; set; }
        
        [EventSubscribe("DoManagement")]
        private void OnDoManagement(object sender, EventArgs e)
        {
            if (Clock.Today.Date == SowingDate)
            {
                Slurp.Sow(cultivar: CultivarName, population: 1, depth: InitialRootDepth, rowSpacing: 150);
                
                YKLModifiers = new double[soilPhysical.Thickness.Length];
                XDepth = new double[soilPhysical.Thickness.Length];
                Depth = 0;
                for (int layer = 0; layer < soilPhysical.Thickness.Length; layer++)
                {
                    Depth += soilPhysical.Thickness[layer] / 2;  //Add half of the thickness of the current layer so depth is the mid depth of that layer
                    if (Depth <= KLReductionDepth)
                    {
                        YKLModifiers[layer] = 1;
                        XDepth[layer] = Depth;
                    }
                    else
                    {
                        double KLMod = 1 * Math.Exp(-KLReductionFactor * (Depth - KLReductionDepth));
                        YKLModifiers[layer] = KLMod;
                        XDepth[layer] = Depth;
                    }
                    Depth += soilPhysical.Thickness[layer] / 2;  //Add the other half of the current layer so depth is the top of the next layer
                }
                object KLMods = YKLModifiers;
                zone.Set("Slurp.Root.KLModifier.XYPairs.Y", KLMods);
                object Depths = XDepth;
                zone.Set("Slurp.Root.KLModifier.XYPairs.X", Depths);
                object RD = RootDepth;
                zone.Set("Slurp.Root.MaximumRootDepth.FixedValue", RD);
                object RV = RFV;
                zone.Set("Slurp.Root.RootFrontVelocity.Potential.FixedValue", RV);
                object GMaxValue = MaxG;
                zone.Set("Slurp.Leaf.Gsmax350", GMaxValue); 
                object R50Value = R50; 
                zone.Set("Slurp.Leaf.R50", R50Value); 
                object SummerUValue = SummerU;
                zone.Set("Soil.SoilWater.SummerU", SummerUValue); 
                object SummerConaValue = SummerCona; 
                zone.Set("Soil.SoilWater.SummerCona", SummerConaValue); 
                object WinterUValue = WinterU;
                zone.Set("Soil.SoilWater.WinterU", WinterUValue); 
                object WinterConaValue = WinterCona; 
                zone.Set("Soil.SoilWater.WinterCona", WinterConaValue); 
                
            }
        }
    }
}
```
            Manager SetCropVariables: same as New Zealand.AshleyDene.AshleyDene.Field.ManagerFolder.SetCropVariables
            Manager ResetOnDate: same as New Zealand.AshleyDene.AshleyDene.Field.ManagerFolder.ResetOnDate
          Soil: same as New Zealand.AshleyDene.AshleyDene.Field.Soil
          Plant Slurp
          MicroClimate: a_interception=0; b_interception=1; c_interception=0; d_interception=0; soil_albedo=0.23; SoilHeatFluxFraction=0.4; MinimumHeightDiffForNewLayer=0; NightInterceptionFraction=0.5; ReferenceHeight=2
          Irrigation
          Fertiliser
          SurfaceOrganicMatter surface organic matter: InitialResidueName=wheat; InitialResidueType=wheat; InitialResidueMass=2000; InitialStandingFraction=0; InitialCPR=0; InitialCNR=80
          Report: same as New Zealand.AshleyDene.AshleyDene.Field.Report
          Report SummaryNumbers: same as New Zealand.AshleyDene.AshleyDene.Field.SummaryNumbers
      Folder SoilWaterIversen12: same as New Zealand.AshleyDene.SoilWaterAshleyDene
  Folder SoilWaterIversen12
    Memo Combined Results
      This node is for examining the Soil water component.
      1.
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