Simulations: Version=57
  DataStore Database
  Replacements
    Plant Lucerne: CropType=Lucerne; IsEnding=false; DaysAfterEnding=0
      Memo Memo1
        ## References

        ### **Ayaz S, McKenzie BA, McNeil DL, Hill GD.2004**. Light interception and utilization of four grain legumes sown at different plant populations and depths. _Journal of Agricultural Science,_**142**: 297-308.
         **Ayaz S, McKenzie BA, Hill GD, McNeil DL.2004**. Variability in yield of four grain legume species in a subhumid temperate environment. II. Yield components. _Journal of Agricultural Science,_**142**: 21-28.
         **Ayaz S, McKenzie BA, Hill GD, McNeil DL.2004**. Nitrogen distribution in four grain legumes. _Journal of Agricultural Science,_**142**: 309-317.
         **Wilson DR, Robertson MJ.1996.**Pea phenology responses to temperature and photoperiod. _Australian Agronomy Society_.
      OrganArbitrator Arbitrator
        RelativeAllocation NArbitrator
        RelativeAllocation DMArbitrator
      Phenology
        AirTemperatureFunction ThermalTime
          XYPairs: X=[1, 15, 30, 40]; Y=[0, 10, 25, 0]
        PhotoperiodFunction Photoperiod: Twilight=-6; DayLength=0
        PhotoperiodDeltaFunction DeltaPhotoperiod: Twilight=-6
        GerminatingPhase Germinating: Start=Sowing; End=Germination
        EmergingPhase Emerging: ShootLag=15; ShootRate=10; Start=Germination; End=Emergence; TTForTimeStep=0
          VariableReference Progression: VariableName=[Phenology].ThermalTime.Value()
        GenericPhase Juvenile: Start=Emergence; End=EndJuvenile
          VariableReference Progression: VariableName=[Phenology].ThermalTime.Value()
          LinearInterpolationFunction Target: XProperty=[Phenology].Photoperiod.Value()
            XYPairs: X=[10, 12, 18]; Y=[500, 500, 0]
        GenericPhase Inductive: Start=EndJuvenile; End=FloralInitiation
          VariableReference Progression: VariableName=[Phenology].ThermalTime.Value()
          LinearInterpolationFunction Target: XProperty=[Phenology].Photoperiod.Value()
            XYPairs: X=[10, 12, 14, 16, 18]; Y=[889, 389, 289, 269, 269]
        GenericPhase Induced: Start=FloralInitiation; End=StartFlowering
          Constant Target: FixedValue=330
          VariableReference Progression: VariableName=[Phenology].ThermalTime.Value()
        GenericPhase Flowering: Start=StartFlowering; End=StartPodfill
          VariableReference Progression: VariableName=[Phenology].ThermalTime.Value()
          Constant Target: FixedValue=1000
        GenericPhase Podfilling: Start=StartPodfill; End=Maturity
          Constant Target: FixedValue=1000
          VariableReference Progression: VariableName=[Phenology].ThermalTime.Value()
        GenericPhase Ripening: Start=Maturity; End=HarvestRipe
          Constant Target: FixedValue=100
          VariableReference Progression: VariableName=[Phenology].ThermalTime.Value()
        EndPhase ReadyForHarvesting: Start=HarvestRipe; End=Unused
          VariableReference Progression: VariableName=[Phenology].ThermalTime.Value()
        AccumulateFunction DaysAfterCutting: StartStageName=Emergence; EndStageName=HarvestRipe; FractionRemovedOnCut=1; FractionRemovedOnHarvest=1; FractionRemovedOnGraze=1; FractionRemovedOnPrune=1
          Constant: FixedValue=1
        OnEventFunction FloweringDaysAfterCutting: SetEvent=StartFlowering; ReSetEvent=Harvesting
          Constant PreEventValue: FixedValue=0
          VariableReference PostEventValue: VariableName=[Phenology].DaysAfterCutting.Value()
        AccumulateFunction ThermalTimeAfterCutting: StartStageName=Emergence; EndStageName=Maturity; FractionRemovedOnCut=1; FractionRemovedOnHarvest=1; FractionRemovedOnGraze=1; FractionRemovedOnPrune=1
          VariableReference ThermalTime: VariableName=[Phenology].ThermalTime.Value()
        OnEventFunction BudsVisableDaysAfterCutting: SetEvent=FloralInitiation; ReSetEvent=Harvesting
          Constant PreEventValue: FixedValue=0
          VariableReference PostEventValue: VariableName=[Phenology].DaysAfterCutting.Value()
        AccumulateFunction ThermalTimeAfterFlowering: StartStageName=StartFlowering; EndStageName=Maturity; FractionRemovedOnCut=1; FractionRemovedOnHarvest=1; FractionRemovedOnGraze=1; FractionRemovedOnPrune=1
          VariableReference ThermalTime: VariableName=[Phenology].ThermalTime.Value()
      Root: GrowthRespiration=0; MaintenanceRespiration=0; RootAngle=45; SWAvailabilityRatio=0
        LinearInterpolationFunction KLModifier: XProperty=[Leaf].LAI
          XYPairs: X=[0, 3]; Y=[1, 1]
        AirTemperatureFunction TemperatureEffect
          XYPairs: X=[0, 26, 35]; Y=[1, 1, 1]
        Constant MaxDailyNUptake: FixedValue=6
        Constant SenescenceRate: FixedValue=0
        Constant MaximumRootDepth: FixedValue=1000000
        PhaseLookup RootFrontVelocity
          PhaseLookupValue PreEmergence: Start=Germination; End=Emergence
            Constant Function: FixedValue=3
          PhaseLookupValue early: Start=Emergence; End=StartFlowering
            Constant Function: FixedValue=15
          PhaseLookupValue late: Start=StartFlowering; End=Maturity
            Constant Function: FixedValue=17
        Constant MaximumNConc: FixedValue=0.01
        Constant MinimumNConc: FixedValue=0.005
        PhaseBasedSwitch NitrogenDemandSwitch: Start=Emergence; End=Maturity
        LinearInterpolationFunction KNO3: XProperty=[Root].LengthDensity
          XYPairs: X=[0, 0.003]; Y=[0.02, 0.02]
        LinearInterpolationFunction KNH4: XProperty=[Root].LengthDensity
          XYPairs: X=[0, 0.003]; Y=[0, 0]
        BiomassRemoval BiomassRemovalDefaults
          OrganBiomassRemovalType Harvest: FractionLiveToRemove=0.3; FractionDeadToRemove=0; FractionLiveToResidue=0.3; FractionDeadToResidue=0
          OrganBiomassRemovalType Cut: FractionLiveToRemove=0; FractionDeadToRemove=0; FractionLiveToResidue=0; FractionDeadToResidue=0
          OrganBiomassRemovalType Prune: FractionLiveToRemove=0; FractionDeadToRemove=0; FractionLiveToResidue=0.6; FractionDeadToResidue=0
          OrganBiomassRemovalType Graze: FractionLiveToRemove=0.6; FractionDeadToRemove=0; FractionLiveToResidue=0.1; FractionDeadToResidue=0
        LinearInterpolationFunction NUptakeSWFactor: XProperty=[Root].RWC
          XYPairs: X=[0, 1]; Y=[0, 1]
        Constant InitialDM: FixedValue=0.2; Units=g/plant
        Constant SpecificRootLength: FixedValue=40; Units=m/g
        PartitionFractionDemandFunction DMDemandFunction
          PhaseLookup PartitionFraction
            PhaseLookupValue Early: Start=Emergence; End=StartFlowering
              Constant Function: FixedValue=0.1
            PhaseLookupValue Middle: Start=StartFlowering; End=StartPodfill
              Constant Function: FixedValue=0.2
            PhaseLookupValue Late: Start=StartPodfill; End=Maturity
              Constant Function: FixedValue=0
        Constant DMConversionEfficiency: FixedValue=1
        Constant MaintenanceRespirationFunction: FixedValue=1
        Constant RemobilisationCost: FixedValue=0
        Constant CarbonConcentration: FixedValue=0.4
        BiomassDemand DMDemands
          PartitionFractionDemandFunction Structural: same as Replacements.Lucerne.Root.DMDemandFunction
          Constant Storage: FixedValue=0
          Constant Metabolic: FixedValue=0
        BiomassDemand NDemands
          MultiplyFunction Structural
            VariableReference MinNconc: VariableName=[Root].minimumNconc.Value()
            VariableReference PotentialDMAllocation: VariableName=[Root].potentialDMAllocation.Structural
          MultiplyFunction Metabolic
            SubtractFunction MetabolicNconc
              VariableReference CritNconc: VariableName=[Root].criticalNConc.Value()
              VariableReference MinNconc: VariableName=[Root].minimumNconc.Value()
            VariableReference PotentialDMAllocation: VariableName=[Root].potentialDMAllocation.Structural
          StorageNDemandFunction Storage
            VariableReference NitrogenDemandSwitch: VariableName=[Root].nitrogenDemandSwitch.Value()
            VariableReference MaxNconc: VariableName=[Root].maximumNconc.Value()
      Nodule
        Constant FixationMetabolicCost: FixedValue=0
        Constant DMDemandFunction: FixedValue=0.01
        Constant MaximumNConc: FixedValue=0.02
        Constant MinimumNConc: FixedValue=0.01
        Constant SenescenceRate: FixedValue=0
        Constant NReallocationFactor: FixedValue=0
        PhaseBasedSwitch NitrogenDemandSwitch: Start=Emergence; End=Maturity
        BiomassRemoval BiomassRemovalDefaults
          OrganBiomassRemovalType Harvest: FractionLiveToRemove=0.5; FractionDeadToRemove=0; FractionLiveToResidue=0.1; FractionDeadToResidue=0
          OrganBiomassRemovalType Cut: FractionLiveToRemove=0; FractionDeadToRemove=0; FractionLiveToResidue=0; FractionDeadToResidue=0
          OrganBiomassRemovalType Prune: FractionLiveToRemove=0; FractionDeadToRemove=0; FractionLiveToResidue=0.6; FractionDeadToResidue=0
          OrganBiomassRemovalType Graze: FractionLiveToRemove=0.6; FractionDeadToRemove=0; FractionLiveToResidue=0.2; FractionDeadToResidue=0
        Constant StructuralFraction: FixedValue=1; Units=g/g
        Constant InitialWtFunction: FixedValue=0; Units=g/m^2
        Constant DetachmentRateFunction: FixedValue=0; Units=/d
        Constant MaintenanceRespirationFunction: FixedValue=0; Units=0-1
        Constant DMConversionEfficiency: FixedValue=1; Units=0-1
        MultiplyFunction FixationRate
          Constant FixationCoefficiency: FixedValue=0.024; Units=g/m^2/d
          VariableReference: VariableName=[Leaf].Photosynthesis.Value()
        MultiplyFunction FixationRate2
          Constant MaximumFixationRate: FixedValue=0.5; Units=g/m^2/d
          ExponentialFunction TemperatureResponse: A=0; B=1; C=1
            DivideFunction
              SubtractFunction
                SoilTemperatureDepthFunction: Depth=100
                Constant: FixedValue=20
              Constant: FixedValue=10
        Constant NRetranslocationFactor: FixedValue=0
        Constant DMReallocationFactor: FixedValue=0
        Constant DMRetranslocationFactor: FixedValue=0
        VariableReference CriticalNConc: VariableName=[Nodule].MinimumNConc.Value()
        Constant RemobilisationCost: FixedValue=0
        Constant CarbonConcentration: FixedValue=0.4
        BiomassDemand DMDemands
          Constant Structural: FixedValue=0.01
          Constant Storage: FixedValue=0
          Constant Metabolic: FixedValue=0
        BiomassDemand NDemands
          MultiplyFunction Structural
            VariableReference MinNconc: VariableName=[Nodule].minimumNconc.Value()
            VariableReference PotentialDMAllocation: VariableName=[Nodule].potentialDMAllocation.Structural
          MultiplyFunction Metabolic
            SubtractFunction MetabolicNconc
              VariableReference CritNconc: VariableName=[Nodule].criticalNConc.Value()
              VariableReference MinNconc: VariableName=[Nodule].minimumNconc.Value()
            VariableReference PotentialDMAllocation: VariableName=[Nodule].potentialDMAllocation.Structural
          StorageNDemandFunction Storage
            VariableReference NitrogenDemandSwitch: VariableName=[Nodule].nitrogenDemandSwitch.Value()
            VariableReference MaxNconc: VariableName=[Nodule].maximumNconc.Value()
      SimpleLeaf Leaf: CohortsInitialised=false; Albedo=0.18; Gsmax350=0.006; R50=100; MicroClimatePresent=true; LeafInitialisationStage=Emergence
        zero: ApicalCohortNo, InitialisedCohortNo, TipsAtEmergence, CohortsAtInitialisation, AppearedCohortNo, PlantAppearedLeafNo, Height, BaseHeight, Width, FRGR, PotentialEP, WaterDemand, KDead, LAIDead
        Memo Description
          Stover represents any part of the crop that is not removed at harvest (i.e not part of the product).
        RUEModel Photosynthesis
          Constant RUE: FixedValue=1.11
          WeightedTemperatureFunction FT: MaximumTemperatureWeighting=0.5
            XYPairs: X=[0, 18, 30, 40]; Y=[0, 1, 1, 0]
          LinearInterpolationFunction FW: XProperty=[Leaf].Fw
            XYPairs: X=[0, 1, 1.5]; Y=[1, 1, 1]
          RUECO2Function FCO2: PhotosyntheticPathway=C3
          VariableReference RadnInt: VariableName=[Leaf].RadIntTot
          Constant FVPD: FixedValue=1
          Constant FN: FixedValue=1
        AccumulateFunction NodeNumber: StartStageName=Emergence; EndStageName=Maturity; FractionRemovedOnCut=1; FractionRemovedOnHarvest=1; FractionRemovedOnGraze=1; FractionRemovedOnPrune=0
          DivideFunction DeltaNode
            VariableReference ThermalTime: VariableName=[Phenology].ThermalTime.Value()
            PhaseLookup Phyllochron
              PhaseLookupValue Juvenile: Start=Emergence; End=EndJuvenile
                Constant: FixedValue=52
              PhaseLookupValue Vegetative: Start=EndJuvenile; End=StartFlowering
                LinearInterpolationFunction Phyllochron: XProperty=[Phenology].Photoperiod.Value()
                  XYPairs: X=[10, 16.5]; Y=[51, 28]
              PhaseLookupValue Reproductive: Start=StartFlowering; End=Maturity
                LinearInterpolationFunction Phyllochron: XProperty=[Phenology].Photoperiod.Value()
                  XYPairs: X=[12, 16]; Y=[61, 61]
          MultiplyFunction FrostDeath
            VariableReference NodeNumber: VariableName=[Leaf].NodeNumber
            VariableReference FrostFraction: VariableName=[Leaf].FrostFraction.Value()
            Constant: FixedValue=-1
        AccumulateFunction LAIFunction: StartStageName=Emergence; EndStageName=Maturity; FractionRemovedOnCut=1; FractionRemovedOnHarvest=1; FractionRemovedOnGraze=1; FractionRemovedOnPrune=1
          MultiplyFunction DeltaLAI
            PhaseLookup LAER
              PhaseLookupValue Juvenile: Start=Emergence; End=EndJuvenile
                Constant: FixedValue=0.002
              PhaseLookupValue Vegetative: Start=EndJuvenile; End=StartFlowering
                LessThanFunction LAER
                  VariableReference DeltaPhotoperiod: VariableName=[Phenology].DeltaPhotoperiod.Value()
                  Constant Zero: FixedValue=0
                  LinearInterpolationFunction Decreasing: XProperty=[Phenology].Photoperiod.Value()
                    XYPairs: X=[8, 10, 12.55, 16]; Y=[0, 0.0068, 0.015, 0.015]
                  LinearInterpolationFunction Increasing: XProperty=[Phenology].Photoperiod.Value()
                    XYPairs: X=[8, 11, 11.5, 16]; Y=[0, 0, 0.019, 0.019]
              PhaseLookupValue Reproductive: Start=StartFlowering; End=Maturity
                Constant: FixedValue=0.005
            VariableReference ThermalTime: VariableName=[Phenology].ThermalTime.Value()
            LinearInterpolationFunction PopulationFactor: XProperty=[Lucerne].Population
              XYPairs: X=[0, 120]; Y=[0, 1]
            LinearInterpolationFunction EarlyLag: XProperty=[Phenology].ThermalTimeAfterCutting.Value()
              XYPairs: X=[0, 250]; Y=[0.5, 1]
          MultiplyFunction FrostDeath
            VariableReference LAI: VariableName=[Leaf].LAI
            VariableReference FrostFraction: VariableName=[Leaf].FrostFraction.Value()
            Constant: FixedValue=-1
        LessThanFunction FrostFraction
          VariableReference DeltaPhotoperiod: VariableName=[Phenology].DeltaPhotoperiod.Value()
          Constant Zero: FixedValue=0
          LinearInterpolationFunction Decreasing: XProperty=[Weather].MinT
            XYPairs: X=[-15, -5]; Y=[1, 0]
          LinearInterpolationFunction Increasing: XProperty=[Weather].MinT
            XYPairs: X=[-10, -5]; Y=[1, 0]
        MinimumFunction FRGRFunction
          AirTemperatureFunction FRGRFunctionTemp
            XYPairs: X=[0, 10, 25, 40]; Y=[0, 1, 1, 0]
        PhaseLookup ExtinctionCoefficientFunction
          PhaseLookupValue Juvenile: Start=Emergence; End=EndJuvenile
            Constant: FixedValue=0.8
          PhaseLookupValue Vegetative: Start=EndJuvenile; End=StartFlowering
            Constant: FixedValue=0.81
          PhaseLookupValue Reproductive: Start=StartFlowering; End=Maturity
            Constant: FixedValue=0.78
          Memo Description
            The extinction coefficient is used to calculate a LAI value (needed by MicroClimate) from the canopy cover
        AccumulateFunction HeightFunction: StartStageName=Emergence; EndStageName=StartPodfill; FractionRemovedOnCut=1; FractionRemovedOnHarvest=1; FractionRemovedOnGraze=1; FractionRemovedOnPrune=1
          DivideFunction DeltaHeight
            VariableReference ThermalTime: VariableName=[Phenology].ThermalTime.Value()
            PhaseLookup Heightchron
              PhaseLookupValue Juvenile: Start=Emergence; End=EndJuvenile
                Constant: FixedValue=3
              PhaseLookupValue Vegetative: Start=EndJuvenile; End=StartFlowering
                LinearInterpolationFunction Heightchron: XProperty=[Phenology].Photoperiod.Value()
                  XYPairs
                    X=[10, 10.5, 11, 11.5, 12, 12.5, 13, 13.5, 14, 15, 15.5, 16, 16.5]
                    Y=[4, 3.234, 2.5, 2.3, 2, 1.59, 1.083, 0.938, 0.822, 0.675, 0.644, 0.642, 0.63775]
              PhaseLookupValue Reproductive: Start=StartFlowering; End=Maturity
                LinearInterpolationFunction Heightchron: XProperty=[Phenology].Photoperiod.Value()
                  XYPairs: X=[12, 16]; Y=[2.2, 1.8]
          MultiplyFunction FrostDeath
            VariableReference Height: VariableName=[Leaf].Height
            VariableReference FrostFraction: VariableName=[Leaf].FrostFraction.Value()
            Constant: FixedValue=-1
        Constant NReallocationFactor: FixedValue=0
        Constant SenescenceRate: FixedValue=0
        Constant DetachmentRateFunction: FixedValue=0; Units=/d
        Constant StructuralFraction: FixedValue=1; Units=0-1
        Constant InitialWtFunction: FixedValue=0.1
        Constant LaiDeadFunction: FixedValue=0; Units=m^2/m^2
        Constant MaximumNConc: FixedValue=0.06
        Constant MinimumNConc: FixedValue=0.045
        Constant NitrogenDemandSwitch: FixedValue=0
        Constant MaintenanceRespirationFunction: FixedValue=0; Units=0-1
        Constant DMConversionEfficiency: FixedValue=1; Units=0-1
        BiomassRemoval BiomassRemovalDefaults
          OrganBiomassRemovalType Harvest: FractionLiveToRemove=0; FractionDeadToRemove=0; FractionLiveToResidue=0.3; FractionDeadToResidue=0
          OrganBiomassRemovalType Cut: FractionLiveToRemove=0.95; FractionDeadToRemove=0; FractionLiveToResidue=0; FractionDeadToResidue=0
          OrganBiomassRemovalType Prune: FractionLiveToRemove=0; FractionDeadToRemove=0; FractionLiveToResidue=0.6; FractionDeadToResidue=0
          OrganBiomassRemovalType Graze: FractionLiveToRemove=0.6; FractionDeadToRemove=0; FractionLiveToResidue=0.1; FractionDeadToResidue=0
        Constant NRetranslocationFactor: FixedValue=0
        Constant DMReallocationFactor: FixedValue=0
        Constant DMRetranslocationFactor: FixedValue=0
        Constant RemobilisationCost: FixedValue=0
        LinearInterpolationFunction CriticalNConc: XProperty=[Phenology].ThermalTimeAfterCutting
          XYPairs: X=[0, 200, 450, 600]; Y=[0.055, 0.055, 0.045, 0.045]
        Constant CarbonConcentration: FixedValue=0.4
        BiomassDemand DMDemands
          MultiplyFunction Structural
            VariableReference DeltaLAI: VariableName=[Leaf].LAIFunction.DeltaLAI.Value()
            PhaseLookup SLA
              PhaseLookupValue Juvenile: Start=Emergence; End=EndJuvenile
                Constant: FixedValue=50
              PhaseLookupValue Vegetative: Start=EndJuvenile; End=StartFlowering
                LessThanFunction SLA
                  VariableReference DeltaPhotoperiod: VariableName=[Phenology].DeltaPhotoperiod.Value()
                  Constant Zero: FixedValue=0
                  AirTemperatureFunction Decreasing
                    XYPairs: X=[10, 18]; Y=[17, 41]
                  AirTemperatureFunction Increasing
                    XYPairs: X=[8, 15]; Y=[48, 30]
              PhaseLookupValue Reproductive: Start=StartFlowering; End=Maturity
                Constant: FixedValue=30
              Memo Description
                The extinction coefficient is used to calculate a LAI value (needed by MicroClimate) from the canopy cover
          Constant Storage: FixedValue=0
          Constant Metabolic: FixedValue=0
        BiomassDemand NDemands
          MultiplyFunction Structural
            VariableReference MinNconc: VariableName=[Leaf].minimumNconc.Value()
            VariableReference PotentialDMAllocation: VariableName=[Leaf].potentialDMAllocation.Structural
          MultiplyFunction Metabolic
            SubtractFunction MetabolicNconc
              VariableReference CritNconc: VariableName=[Leaf].criticalNConc.Value()
              VariableReference MinNconc: VariableName=[Leaf].minimumNconc.Value()
            VariableReference PotentialDMAllocation: VariableName=[Leaf].potentialDMAllocation.Structural
          StorageNDemandFunction Storage
            VariableReference NitrogenDemandSwitch: VariableName=[Leaf].nitrogenDemandSwitch.Value()
            VariableReference MaxNconc: VariableName=[Leaf].maximumNconc.Value()
        Constant StomatalConductanceCO2Modifier: FixedValue=1
      GenericOrgan Stem
        Constant NReallocationFactor: FixedValue=0
        Constant NRetranslocationFactor: FixedValue=0
        Constant DMRetranslocationFactor: FixedValue=0.1
        LinearInterpolationFunction MaximumNConc: XProperty=[Stem].Live.Wt
          XYPairs: X=[0, 30, 31]; Y=[0.05, 0.05, 0.015]
        MultiplyFunction MinimumNConc
          Constant: FixedValue=0.75
          VariableReference MaximumNConc: VariableName=[Stem].MaximumNConc.Value()
        PhaseBasedSwitch NitrogenDemandSwitch: Start=Emergence; End=Maturity
        Constant StructuralFraction: FixedValue=1
        BiomassRemoval BiomassRemovalDefaults
          OrganBiomassRemovalType Harvest: FractionLiveToRemove=0.5; FractionDeadToRemove=0; FractionLiveToResidue=0.1; FractionDeadToResidue=0
          OrganBiomassRemovalType Cut: FractionLiveToRemove=0.95; FractionDeadToRemove=0; FractionLiveToResidue=0; FractionDeadToResidue=0
          OrganBiomassRemovalType Prune: FractionLiveToRemove=0; FractionDeadToRemove=0; FractionLiveToResidue=0.6; FractionDeadToResidue=0
          OrganBiomassRemovalType Graze: FractionLiveToRemove=0.6; FractionDeadToRemove=0; FractionLiveToResidue=0.2; FractionDeadToResidue=0
        Constant InitialWtFunction: FixedValue=0; Units=g/m^2
        Constant SenescenceRate: FixedValue=0; Units=/d
        Constant DetachmentRateFunction: FixedValue=0; Units=/d
        Constant MaintenanceRespirationFunction: FixedValue=0; Units=0-1
        Constant DMConversionEfficiency: FixedValue=1; Units=0-1
        AllometricDemandFunction DMDemandFunction: Const=0.1452028; Power=1.23213787; XProperty=[AboveGround].Wt; YProperty=[Stem].Live.Wt
        Constant Phyollchorn: FixedValue=0
        Constant DMReallocationFactor: FixedValue=0
        VariableReference CriticalNConc: VariableName=[Stem].MinimumNConc.Value()
        Constant RemobilisationCost: FixedValue=0
        Constant CarbonConcentration: FixedValue=0.4
        BiomassDemand DMDemands
          AllometricDemandFunction Structural: Const=0.1452028; Power=1.23213787; XProperty=[AboveGround].Wt; YProperty=[Stem].Live.Wt
          Constant Storage: FixedValue=0
          Constant Metabolic: FixedValue=0
        BiomassDemand NDemands
          MultiplyFunction Structural
            VariableReference MinNconc: VariableName=[Stem].minimumNconc.Value()
            VariableReference PotentialDMAllocation: VariableName=[Stem].potentialDMAllocation.Structural
          MultiplyFunction Metabolic
            SubtractFunction MetabolicNconc
              VariableReference CritNconc: VariableName=[Stem].criticalNConc.Value()
              VariableReference MinNconc: VariableName=[Stem].minimumNconc.Value()
            VariableReference PotentialDMAllocation: VariableName=[Stem].potentialDMAllocation.Structural
          StorageNDemandFunction Storage
            VariableReference NitrogenDemandSwitch: VariableName=[Stem].nitrogenDemandSwitch.Value()
            VariableReference MaxNconc: VariableName=[Stem].maximumNconc.Value()
        RetranslocateNonStructural RetranslocateNitrogen
      GenericOrgan Shell
        Constant NReallocationFactor: FixedValue=0
        Constant NRetranslocationFactor: FixedValue=0.1
        Constant DMRetranslocationFactor: FixedValue=0.1
        Constant MaximumNConc: FixedValue=0.03
        Constant MinimumNConc: FixedValue=0.01
        PhaseBasedSwitch NitrogenDemandSwitch: Start=Emergence; End=Maturity
        Constant StructuralFraction: FixedValue=1
        BiomassRemoval BiomassRemovalDefaults
          OrganBiomassRemovalType Harvest: FractionLiveToRemove=0.5; FractionDeadToRemove=0; FractionLiveToResidue=0.1; FractionDeadToResidue=0
          OrganBiomassRemovalType Cut: FractionLiveToRemove=0.8; FractionDeadToRemove=0; FractionLiveToResidue=0; FractionDeadToResidue=0
          OrganBiomassRemovalType Prune: FractionLiveToRemove=0; FractionDeadToRemove=0; FractionLiveToResidue=0.6; FractionDeadToResidue=0
          OrganBiomassRemovalType Graze: FractionLiveToRemove=0.6; FractionDeadToRemove=0; FractionLiveToResidue=0.2; FractionDeadToResidue=0
        Constant InitialWtFunction: FixedValue=0; Units=g/m^2
        Constant SenescenceRate: FixedValue=0; Units=/d
        Constant DetachmentRateFunction: FixedValue=0; Units=/d
        Constant MaintenanceRespirationFunction: FixedValue=0; Units=0-1
        Constant DMConversionEfficiency: FixedValue=1; Units=0-1
        PartitionFractionDemandFunction DMDemandFunction
          PhaseLookup PartitionFraction
            PhaseLookupValue: Start=StartPodfill; End=Maturity
              Constant: FixedValue=0.2
        Constant DMReallocationFactor: FixedValue=0
        VariableReference CriticalNConc: VariableName=[Shell].MinimumNConc.Value()
        Constant RemobilisationCost: FixedValue=0
        Constant CarbonConcentration: FixedValue=0.4
        BiomassDemand DMDemands
          PartitionFractionDemandFunction Structural: same as Replacements.Lucerne.Shell.DMDemandFunction
          Constant Storage: FixedValue=0
          Constant Metabolic: FixedValue=0
        BiomassDemand NDemands
          MultiplyFunction Structural
            VariableReference MinNconc: VariableName=[Shell].minimumNconc.Value()
            VariableReference PotentialDMAllocation: VariableName=[Shell].potentialDMAllocation.Structural
          MultiplyFunction Metabolic
            SubtractFunction MetabolicNconc
              VariableReference CritNconc: VariableName=[Shell].criticalNConc.Value()
              VariableReference MinNconc: VariableName=[Shell].minimumNconc.Value()
            VariableReference PotentialDMAllocation: VariableName=[Shell].potentialDMAllocation.Structural
          StorageNDemandFunction Storage
            VariableReference NitrogenDemandSwitch: VariableName=[Shell].nitrogenDemandSwitch.Value()
            VariableReference MaxNconc: VariableName=[Shell].maximumNconc.Value()
        RetranslocateNonStructural RetranslocateNitrogen
      GenericOrgan Grain
        Constant NReallocationFactor: FixedValue=0
        Constant NRetranslocationFactor: FixedValue=0.1
        Constant DMRetranslocationFactor: FixedValue=0.1
        Constant MaximumNConc: FixedValue=0.03
        Constant MinimumNConc: FixedValue=0.01
        PhaseBasedSwitch NitrogenDemandSwitch: Start=Emergence; End=Maturity
        Constant StructuralFraction: FixedValue=1
        BiomassRemoval BiomassRemovalDefaults: same as Replacements.Lucerne.Shell.BiomassRemovalDefaults
        Constant InitialWtFunction: FixedValue=0; Units=g/m^2
        Constant SenescenceRate: FixedValue=0; Units=/d
        Constant DetachmentRateFunction: FixedValue=0; Units=/d
        Constant MaintenanceRespirationFunction: FixedValue=0; Units=0-1
        Constant DMConversionEfficiency: FixedValue=1; Units=0-1
        PartitionFractionDemandFunction DMDemandFunction: same as Replacements.Lucerne.Shell.DMDemandFunction
        Constant DMReallocationFactor: FixedValue=0
        VariableReference CriticalNConc: VariableName=[Grain].MinimumNConc.Value()
        Constant RemobilisationCost: FixedValue=0
        Constant CarbonConcentration: FixedValue=0.4
        BiomassDemand DMDemands: same as Replacements.Lucerne.Shell.DMDemands
        BiomassDemand NDemands
          MultiplyFunction Structural
            VariableReference MinNconc: VariableName=[Grain].minimumNconc.Value()
            VariableReference PotentialDMAllocation: VariableName=[Grain].potentialDMAllocation.Structural
          MultiplyFunction Metabolic
            SubtractFunction MetabolicNconc
              VariableReference CritNconc: VariableName=[Grain].criticalNConc.Value()
              VariableReference MinNconc: VariableName=[Grain].minimumNconc.Value()
            VariableReference PotentialDMAllocation: VariableName=[Grain].potentialDMAllocation.Structural
          StorageNDemandFunction Storage
            VariableReference NitrogenDemandSwitch: VariableName=[Grain].nitrogenDemandSwitch.Value()
            VariableReference MaxNconc: VariableName=[Grain].maximumNconc.Value()
        RetranslocateNonStructural RetranslocateNitrogen
      GenericOrgan TapRoot
        Constant NReallocationFactor: FixedValue=1
        PhaseLookup NRetranslocationFactor
          PhaseLookupValue Juvenile: Start=Emergence; End=EndJuvenile
            Constant: FixedValue=0
          PhaseLookupValue Vegetative: Start=EndJuvenile; End=StartFlowering
            MultiplyFunction
              LessThanFunction AnnualEffect
                VariableReference DeltaPhotoperiod: VariableName=[Phenology].DeltaPhotoperiod.Value()
                Constant Zero: FixedValue=-0.02
                Constant Decreasing: FixedValue=0.005
                Constant Increasing: FixedValue=0.02
              LinearInterpolationFunction RegrowthEffect: XProperty=[Phenology].ThermalTimeAfterCutting.Value()
                XYPairs: X=[0, 250, 300]; Y=[1.3, 1.3, 0]
          PhaseLookupValue Reproductive: Start=StartFlowering; End=Maturity
            Constant: FixedValue=0
          Memo Description
            The extinction coefficient is used to calculate a LAI value (needed by MicroClimate) from the canopy cover
        PhaseLookup DMRetranslocationFactor
          PhaseLookupValue Juvenile: Start=Emergence; End=EndJuvenile
            Constant: FixedValue=0
          PhaseLookupValue Vegetative: Start=EndJuvenile; End=StartFlowering
            MultiplyFunction
              LessThanFunction AnnualEffect
                VariableReference DeltaPhotoperiod: VariableName=[Phenology].DeltaPhotoperiod.Value()
                Constant Zero: FixedValue=-0.02
                Constant Decreasing: FixedValue=0.005
                Constant Increasing: FixedValue=0.025
              LinearInterpolationFunction RegrowthEffect: XProperty=[Phenology].ThermalTimeAfterCutting.Value()
                XYPairs: X=[0, 250, 300]; Y=[1.3, 1.3, 0]
          PhaseLookupValue Reproductive: Start=StartFlowering; End=Maturity
            Constant: FixedValue=0
          Memo Description
            The extinction coefficient is used to calculate a LAI value (needed by MicroClimate) from the canopy cover
        Constant MaximumNConc: FixedValue=0.016
        Constant MinimumNConc: FixedValue=0.007
        PhaseBasedSwitch NitrogenDemandSwitch: Start=Emergence; End=Maturity
          LinearInterpolationFunction: XProperty=[Phenology].Photoperiod.Value()
            XYPairs: X=[10.5, 12.5]; Y=[51, 34]
        Constant StructuralFraction: FixedValue=0.4
        BiomassRemoval BiomassRemovalDefaults
          OrganBiomassRemovalType Harvest: FractionLiveToRemove=0; FractionDeadToRemove=0; FractionLiveToResidue=0; FractionDeadToResidue=0
          OrganBiomassRemovalType Cut: FractionLiveToRemove=0; FractionDeadToRemove=0; FractionLiveToResidue=0; FractionDeadToResidue=0
          OrganBiomassRemovalType Prune: FractionLiveToRemove=0; FractionDeadToRemove=0; FractionLiveToResidue=0; FractionDeadToResidue=0
          OrganBiomassRemovalType Graze: FractionLiveToRemove=0; FractionDeadToRemove=0; FractionLiveToResidue=0; FractionDeadToResidue=0
        Constant InitialWtFunction: FixedValue=0; Units=g/m^2
        MultiplyFunction MaintenanceRespirationFunction
          Constant: FixedValue=1
          ExponentialFunction: same as Replacements.Lucerne.Nodule.FixationRate2.TemperatureResponse
          PhaseLookup RespirationCoefficient
            PhaseLookupValue Juvenile: Start=Emergence; End=EndJuvenile
              Constant: FixedValue=0
            PhaseLookupValue Vegetative: Start=EndJuvenile; End=StartFlowering
              Constant: FixedValue=0.001
            PhaseLookupValue Reproductive: Start=StartFlowering; End=Maturity
              Constant: FixedValue=0.001
            Memo Description
              The extinction coefficient is used to calculate a LAI value (needed by MicroClimate) from the canopy cover
        Constant SenescenceRate: FixedValue=0; Units=/d
        Constant DetachmentRateFunction: FixedValue=0; Units=/d
        Constant DMConversionEfficiency: FixedValue=1; Units=0-1
        Constant DMReallocationFactor: FixedValue=0
        Constant CriticalNConc: FixedValue=0.01
        Constant RemobilisationCost: FixedValue=0
        Constant CarbonConcentration: FixedValue=0.4
        BiomassDemand DMDemands
          MultiplyFunction Structural
            SubtractFunction Structural
              MultiplyFunction MaximumTapRootStructuralDM
                Constant: FixedValue=250
              VariableReference TapRootStructuralDM: VariableName=[TapRoot].Live.StructuralWt
            Constant multiplier: FixedValue=0.01
          MultiplyFunction Storage
            SubtractFunction Capacity
              Constant Maxium: FixedValue=460
              VariableReference Current: VariableName=[TapRoot].Live.StorageWt
            MultiplyFunction
              LessThanFunction Photoperiod
                VariableReference DeltaPhotoperiod: VariableName=[Phenology].DeltaPhotoperiod.Value()
                Constant Zero: FixedValue=-0.02
                Constant Decreasing: FixedValue=1
                Constant Increasing: FixedValue=0
              LinearInterpolationFunction RegrowthEffect: XProperty=[Phenology].ThermalTimeAfterCutting.Value()
                XYPairs: X=[0, 150, 200]; Y=[0, 0, 1.3]
          Constant Metabolic: FixedValue=0
        BiomassDemand NDemands
          MultiplyFunction Structural
            VariableReference MinNconc: VariableName=[TapRoot].minimumNconc.Value()
            VariableReference PotentialDMAllocation: VariableName=[TapRoot].potentialDMAllocation.Structural
          MultiplyFunction Metabolic
            SubtractFunction MetabolicNconc
              VariableReference CritNconc: VariableName=[TapRoot].criticalNConc.Value()
              VariableReference MinNconc: VariableName=[TapRoot].minimumNconc.Value()
            VariableReference PotentialDMAllocation: VariableName=[TapRoot].potentialDMAllocation.Structural
          StorageNDemandFunction Storage
            VariableReference NitrogenDemandSwitch: VariableName=[TapRoot].nitrogenDemandSwitch.Value()
            VariableReference MaxNconc: VariableName=[TapRoot].maximumNconc.Value()
        RetranslocateNonStructural RetranslocateNitrogen
      CompositeBiomass AboveGround: DMDOfStructural=0.6
        Propertys=[[Leaf].Live, [Leaf].Dead, [Stem].Live, [Stem].Dead, [Grain].Live, [Grain].Dead, [Shell].Live, [Shell].Dead]
      CompositeBiomass BelowGround: DMDOfStructural=0.6
        Propertys=[[Root].Live, [Root].Dead, [Nodule].Live, [Nodule].Dead, [TapRoot].Live, [TapRoot].Dead]
      CompositeBiomass Total: DMDOfStructural=0.6
        Propertys=[[Leaf].Live, [Leaf].Dead, [Stem].Live, [Stem].Dead, [Grain].Live, [Grain].Dead, [Shell].Live, [Shell].Dead, [Root].Live, [Root].Dead, [Nodule].Live, [Nodule].Dead, [TapRoot].Live, [TapRoot].Dead]
      CompositeBiomass TotalLive: DMDOfStructural=0.6
        Propertys=[[Leaf].Live, [Stem].Live, [Grain].Live, [Shell].Live, [Root].Live, [Nodule].Live, [TapRoot].Live]
      CompositeBiomass TotalDead: DMDOfStructural=0.6
        Propertys=[[Leaf].Dead, [Stem].Dead, [Grain].Dead, [Shell].Dead, [Root].Dead, [Nodule].Dead, [TapRoot].Dead]
      CompositeBiomass Pod: Propertys=[[Shell].Live, [Shell].Dead, [Grain].Live, [Grain].Dead]; DMDOfStructural=0.6
      Memo
        ## References

        ### **Ayaz S, McKenzie BA, McNeil DL, Hill GD.** **2004**. Light interception and utilization of four grain legumes sown at different plant populations and depths. _Journal of Agricultural Science,_ **142**: 297-308.
         **Ayaz S, McKenzie BA, Hill GD, McNeil DL.** **2004**. Variability in yield of four grain legume species in a subhumid temperate environment. II. Yield components. _Journal of Agricultural Science,_ **142**: 21-28.
         **Ayaz S, McKenzie BA, Hill GD, McNeil DL.** **2004**. Nitrogen distribution in four grain legumes. _Journal of Agricultural Science,_ **142**: 309-317.
         **Wilson DR, Robertson MJ.** **1996.** Pea phenology responses to temperature and photoperiod. _Australian Agronomy Society_.
      CultivarFolder
        Cultivar Kaituna
        Cultivar Trifecta
        Cultivar HunterRiver
        Cultivar Sceptre
        Cultivar SuperMonarca
        Cultivar WL611
        Cultivar southern_special
        Cultivar WL6112
        Cultivar WL6113
        Cultivar WL6114
        Cultivar FD2
        Cultivar FD10
        Cultivar FD5
  Experiment SimulationExp
    Factors
      Factor FD
        CompositeFactor FD2: Specifications=[LucerneSowingRule].Script.CultivarName = FD2
        CompositeFactor FD5: Specifications=[LucerneSowingRule].Script.CultivarName = FD5
        CompositeFactor FD10: Specifications=[LucerneSowingRule].Script.CultivarName = FD10
      Factor Defoliation
        CompositeFactor SS
          Specifications=[DefoliationManager].Script.DefoliationDates = 1-Jan,1-Mar,1-May,1-Oct,1-Dec
        CompositeFactor LL
          Specifications=[DefoliationManager].Script.DefoliationDates = 1-Jan,1-Feb,1-Mar,1-Apr,1-May,1-Jun,1-Oct
    Simulation Rotation
      Clock: StartDate=1972-07-01; EndDate=1975-04-09
      Summary summaryfile
      Weather: FileName=31080.met
      SoilArbitrator Soil Arbitrator
      Zone Block: Area=1; Slope=0
        Folder ManagerFolder
          Manager FactorLabels
            AGENT_NO = 999
            Lat = 999
            Lon = 999
            SoilStamp = lowWHC
            GCM = Had
            RCP = RCP25
            TS = Baseline
```csharp
using System;
using Models.Core;
using Models.PMF;
using Models.Soils;
using System.Xml.Serialization;
using Models.PMF;
using APSIM.Shared.Utilities;
        
namespace Models
{
    [Serializable] 
 //   [System.Xml.Serialization.XmlInclude(typeof(Model))]
    public class Script : Model
    {
        [Link] Clock Clock;
        [Link] ISummary summary;
        [Description("AGENT_NO: ")]
        public string AGENT_NO { get; set; }             
        [Description("Lat: ")]
        public string Lat { get; set; }
        [Description("Lon: ")]
        public string Lon { get; set; }
        [Description("SoilStamp: ")]
        public string SoilStamp { get; set; }
        [Description("GCM: ")]
        public string GCM { get; set; }
        [Description("RCP: ")]
        public string RCP { get; set; }
        [Description("Time Slice: ")]
        public string TS { get; set; }
        private RemovalFractions removalFractions;
        
        [EventSubscribe("DoManagementCalculations")]
        private void OnDoManagementCalculations(object sender, EventArgs e)
        {
        // Sort out timeSlice classification
                        if ((Clock.Today.Date.Year <= 2005))
                {
                TS = "Baseline";
                } else {
                TS = "Future";
                }

        }      
    }
}
```
          Manager DiagnosticsVariables
```csharp
using Models.Interfaces;
using System;
using Models.Core;
using System.Collections.Generic;
using System.Text;
using Models.Soils;
using Models.PMF;
using Models;
using System.Xml.Serialization;
using APSIM.Shared.Utilities;
using Models.Interfaces;
namespace Models
{
    [Serializable] 
    public class Script : Model
    {
        [Link] private Clock Clock;
        [Link] private Weather Met;
        [Link] private Fertiliser Fert;
        [Link] private Irrigation Irrig;
        [Link] private Plant Lucerne;
        [Link] private Zone zone;
        [ScopedLinkByName]
        private ISolute Urea;
        [ScopedLinkByName]
        private ISolute NO3;
        [ScopedLinkByName]
        private ISolute NH4;
        [ScopedLinkByName]
        private SoilNitrogen SoilNitrogen;
        [Link] Soils.Soil Soil;
        [Link] Models.Surface.SurfaceOrganicMatter SOM;
                    
        [XmlIgnore] public bool InitialDay { get; set; }
        
        [XmlIgnore] public double AccumPlantN { get; set; }
        [XmlIgnore] public double AccumMineralisation { get; set; }
        [XmlIgnore] public double AccumDenit { get; set; }
        [XmlIgnore] public double AccumFert { get; set; }
        [XmlIgnore] public double AccumLeach { get; set; }
        [XmlIgnore] public double AccumDetach { get; set; }
        [XmlIgnore] public double DeltaSoilOMN { get; set; }
        [XmlIgnore] public double DeltaSurfaceOMN { get; set; }
        [XmlIgnore] public double DeltaSoilMineralN { get; set; }
        [XmlIgnore] public double SoilNitrogenContent { get; set; }
        
        [XmlIgnore] public double AccumEO { get; set; }
        [XmlIgnore] public double AccumEP { get; set; }
        [XmlIgnore] public double AccumES { get; set; }
        [XmlIgnore] public double AccumDrainage { get; set; }
        [XmlIgnore] public double AccumRunoff { get; set; }
        [XmlIgnore] public double AccumOutflowLat { get; set; }
        [XmlIgnore] public double AccumIrrigation { get; set; }
        [XmlIgnore] public double AccumRainfall { get; set; }
        [XmlIgnore] public double SoilWaterDeficit { get; set; }
    
        [XmlIgnore] public double  InitialSoilOMN { get; set; }
        [XmlIgnore] public double  InitialSurfaceOMN { get; set; }
        [XmlIgnore] public double  InitialMineralN { get; set; }
        
        [XmlIgnore] public double SWC { get; set; }
        [XmlIgnore] public double DUL { get; set; }
        [XmlIgnore] public double OutFlowLat { get; set; }

        [XmlIgnore] public double FomN { get; set; }
        [XmlIgnore] public double BiomN { get; set; }
        [XmlIgnore] public double HumN { get; set; }
        [XmlIgnore] public double OrganicN { get; set; }
        [XmlIgnore] public double NO3N { get; set; }
        [XmlIgnore] public double NH4N { get; set; }
        [XmlIgnore] public double UreaN { get; set; }
        [XmlIgnore] public double MineralN { get; set; }
        [XmlIgnore] public double DltNMinRes { get; set; }
        [XmlIgnore] public double DltNMinTot { get; set; }
        
        [EventSubscribe("Commencing")]
        private void OnSimulationCommencing(object sender, EventArgs e)
        {
            InitialDay = true;
        }
        
        [EventSubscribe("DoManagement")]
        private void OnDoManagement(object sender, EventArgs e)
        {
            //!!!!!! Nitrogen balance components !!!!!!
            //!!!!!!^^^^^^^^^^^^^^^^^^^^^^^^^^^^^!!!!!!
            FomN = MathUtilities.Sum(SoilNitrogen.FOMN);
            HumN = MathUtilities.Sum(SoilNitrogen.HumicN);
            BiomN = MathUtilities.Sum(SoilNitrogen.MicrobialN);
            OrganicN = FomN + HumN + BiomN;
            NO3N = MathUtilities.Sum(NO3.kgha);
            NH4N = MathUtilities.Sum(NH4.kgha);
            UreaN = MathUtilities.Sum(Urea.kgha);
            MineralN = NO3N + NH4N + UreaN; 
            DltNMinRes = MathUtilities.Sum(SoilNitrogen.dlt_n_min_res);
            DltNMinTot = MathUtilities.Sum(SoilNitrogen.MineralisedN);
            int layers = Soil.Thickness.Length;
            if (InitialDay == true)
            {
                InitialSurfaceOMN = SOM.N;
                InitialSoilOMN = OrganicN;
                InitialMineralN = MineralN;
                InitialDay = false;
            }
            AccumFert += Fert.NitrogenApplied;
            DeltaSurfaceOMN = SOM.N - InitialSurfaceOMN;
            AccumLeach = AccumLeach - Soil.SoilWater.LeachNH4 - Soil.SoilWater.LeachNO3 - Soil.SoilWater.LeachUrea; //Fails
            AccumMineralisation += MathUtilities.Sum(SoilNitrogen.MineralisedN);
            AccumDenit -= MathUtilities.Sum(SoilNitrogen.Denitrification);
            AccumPlantN -= (double)zone.Get("Lucerne.Root.NUptake");
            DeltaSoilOMN = OrganicN - InitialSoilOMN;
            DeltaSoilMineralN = MineralN - InitialMineralN;
            SoilNitrogenContent = MineralN;
            
            //!!!!!! Water balance components !!!!!!
            //!!!!!!^^^^^^^^^^^^^^^^^^^^^^^^^^!!!!!!

            AccumIrrigation += Irrig.IrrigationApplied;
            AccumRainfall += Met.Rain;
            //AccumEP -= (double)zone.Get("[Lucerne].Leaf.Transpiration");
            AccumEP -= (double)zone.Get("Lucerne.Root.WaterUptake");
            SoilWaterDeficit = (SWC - DUL);
            double OutFlowLat = MathUtilities.Sum(Soil.SoilWater.LateralOutflow);
            AccumOutflowLat -= OutFlowLat;
        }
        
        [EventSubscribe("DoManagementCalculations")]
        private void OnDoManagementCalculations(object sender, EventArgs e)
        {
            FomN = MathUtilities.Sum(SoilNitrogen.FOMN);
            HumN = MathUtilities.Sum(SoilNitrogen.HumicN);
            BiomN = MathUtilities.Sum(SoilNitrogen.MicrobialN);
            
            
            AccumEO -= Soil.SoilWater.Eo;
            AccumES -= Soil.SoilWater.Es; 
            AccumDrainage -= Soil.SoilWater.Drainage;
            AccumRunoff -= Soil.SoilWater.Runoff;
            SWC = MathUtilities.Sum(Soil.SoilWater.SWmm);
            DUL = MathUtilities.Sum(Soil.DULmm);
        }
    }
}
```
          Manager LucerneSowingRule
            CultivarName = Kaituna
            RowSpacing = 150
            SowingDepth = 20
            SowingRate = 100
            SowingDate = 1972-10-08
```csharp
using System;
using Models.Core;
using Models.PMF;
using APSIM.Shared.Utilities;
        
namespace Models
{
    [Serializable] 
    [System.Xml.Serialization.XmlInclude(typeof(Model))]
    public class Script : Model
    {
        [Link] Plant Lucerne;
        [Link] Clock Clock;

        [Description("Spacing (mm) between rows")]
        public double RowSpacing { get; set; }
        [Description("Depth (mm) Grains are planted")]
        public double SowingDepth { get; set; }
        [Description("Seeds sown (/m2)")]
        public double SowingRate { get; set; }
        [Description("Cultivar")]
        [Display(Type=DisplayType.CultivarName)]
        public string CultivarName { get; set; }
        [Description("Sowing Date")]
        public DateTime SowingDate { get; set; }

        [EventSubscribe("DoManagement")]
        private void OnDoManagement(object sender, EventArgs e)
        {
            if (Clock.Today.Date == SowingDate)
                Lucerne.Sow(population: SowingRate, cultivar: CultivarName, depth: SowingDepth, rowSpacing: RowSpacing, budNumber: 1);
            //Lucerne.Sow(... Contains the following arguements:
            //Population  double  Required  Seeds sowing/m2
            //Cultivar    string  Required  "NameOfCultivar"
            //Depth       double  Optional  Depth (mm) seed sown.   Default is 100mm 
            //MaxCover    double  Optional  Proportion (0-1) of the ground row crop will cover.   Default is 1.0
            //BudNumber   double  Optional  Number of mainstems per seed sown.  Default is 1.0
            //RowSpacing  double  Optional  Spaceing (mm) between drill rows when crop is sown.  Default is 150mm
            //CropClass   string  Optional  Crop class to instantiate when crop is sown.  Default is "Plant"
        }
    }
}
```
          Manager PopulationSet
            SetDate = 2017-07-01
            Pop = 100
```csharp
using System;
using Models.Core;
using Models.PMF;
using APSIM.Shared.Utilities;
using Models.Soils;
        
namespace Models
{
    [Serializable] 
    [System.Xml.Serialization.XmlInclude(typeof(Model))]
    public class Script : Model
    {
        [Link] Plant Lucerne;
        [Link] Clock Clock;
         [Link] Zone zone;

        [Description("PopulationSet Date")]
        public DateTime SetDate { get; set; }
        [Description("New Population")]
        public double Pop{ get; set; }
        [EventSubscribe("DoManagement")]
        private void OnDoManagement(object sender, EventArgs e)
        {
            if (Clock.Today.Date == SetDate)
            {
            	object NewPop = Pop;
            	zone.Set("Lucerne.Population",NewPop);
            }
        }
    }
}
```
          Manager DefoliationManager
            Year = 0
            Rotation = 0
            HarvestFlag = False
            YearTransation = 01-Jun
            BudsDays = 0
            FloDays = 0
            DefoliationDates =
            HarvestWt = 0
```csharp
using System;
using System.Collections.Generic;
using Models.Core;
using Models.PMF;
using Models.PMF.Interfaces;
using System.Xml.Serialization;
using APSIM.Shared.Utilities;

namespace Models
{
    [Serializable] 
    [System.Xml.Serialization.XmlInclude(typeof(Model))]
    public class Script : Model
    {
        [Link] Plant Lucerne;
        [Link] Clock clock;
        [Link] Zone zone;
        [XmlIgnore] private RemovalFractions Remove { get; set; }



    public double Year { get;set;}
    public double Rotation { get;set;}
    bool YearPassed { get;set;}
    public bool HarvestFlag { get;set;}
    [Description("Change to the next growth year")]
    public string YearTransation { get;set;}
    public double BudsDays { get;set;}
    public double FloDays { get;set;}
    public string[] DefoliationDates { get;set;}
    //Work with Rog to add this new as an exercise
    public double HarvestWt { get; set; }

        [EventSubscribe("Commencing")]
        private void OnSimulationCommencing(object sender, EventArgs e)
        {   Year = 1;
            Rotation = 1;
            HarvestFlag=false;
            YearPassed= false;
            Remove = new RemovalFractions();

        }
        [EventSubscribe("EndOfDay")]
        private void OnEndOfDay(object sender, EventArgs e)

        {
        if (DateUtilities.WithinDates(YearTransation, clock.Today, YearTransation))
         YearPassed= true;
         HarvestFlag= false;
         BudsDays= (double)zone.Get("Lucerne.Phenology.BudsVisableDaysAfterCutting.Value()");
         FloDays= (double)zone.Get("Lucerne.Phenology.FloweringDaysAfterCutting.Value()");
        }
      
        public void Cut()
        {   /*double TtFlo=(double)zone.Get("Lucerne.Phenology.ThermalTimeAfterFlowering.Value()");
            double LeafWt= (double)zone.Get("Lucerne.Leaf.Wt");
            double NewLeaf= Math.Min(5,TtFlo*0.025);
            double LeafRemove= (LeafWt-NewLeaf)/LeafWt;
            double StemWt= (double)zone.Get("Lucerne.Stem.Wt");
            double NewStem= Math.Min(3,TtFlo*0.015);
            double StemRemove= (StemWt-NewStem)/StemWt;
            Remove.SetFractionToRemove("Leaf",LeafRemove*0.9);
            Remove.SetFractionToResidue("Leaf", LeafRemove*0.1);
            Remove.SetFractionToRemove("Stem", StemRemove*0.5);
            Remove.SetFractionToResidue("Stem",StemRemove*0.5);
            object LAIRemove= 1-Math.Min(0.1,TtFlo*0.0005);
            zone.Set("Lucerne.Leaf.Area.FractionRemovedOnCut",LAIRemove);*/
            Remove.SetPhenologyStage = 4;  
            Lucerne.RemoveBiomass("Cut", Remove);
            Rotation+=1;
            HarvestFlag= true;
            if (YearPassed)
            {Year+=1;
            Rotation=1;
            YearPassed=false;}

        }

        // Do defoliation
        [EventSubscribe("DoManagement")]
        private void OnDoManagement(object sender, EventArgs e)
        {
        HarvestWt = 0.0;	
        // Just an entry point to add another more dynamic trigger of defoliation (FIXME eit)
	     foreach (string ddMMM in DefoliationDates)
        	{
    			if (DateUtilities.DatesEqual(ddMMM, clock.Today))
        		{
        		double preHarvestBiomass = (double) zone.Get("Lucerne.Total.Wt");
        		Cut();
        		double postHarvestBiomass = (double) zone.Get("Lucerne.Total.Wt");
        		HarvestWt = preHarvestBiomass - postHarvestBiomass;
        		}
        	}
        }
    }
}
```
          Manager ExtraVariables
            StartDate = 1900-01-01
            EndDate = 2100-12-31
            DepthForReporting = 2300
```csharp
using System;
using System.Xml.Serialization;
using Models.Core;
using Models.Soils;
using Models.PMF;
using Models.Interfaces;
using APSIM.Shared.Utilities;
        
namespace Models
{
    [Serializable] 
    [System.Xml.Serialization.XmlInclude(typeof(Model))]
    public class Script : Model
    {
		//> Links to other Apsim models
        [Link] private Clock clock;
        [Link] private Zone myZone;
        [Link] private Weather weather;
        [Link] private Fertiliser myFertiliser;
        [Link] private Irrigation myIrrigator;
        [Link] private Models.Surface.SurfaceOrganicMatter SurfaceOM;
        [Link] private Soils.Soil Soil;
        [ScopedLinkByName] private SoilNitrogen SoilNitrogen;
        [ScopedLinkByName] private ISolute NO3;
        [ScopedLinkByName] private ISolute NH4;
        [ScopedLinkByName] private ISolute Urea;
        [ScopedLinkByName] Models.Report.Report Output;
        [Link] private ISummary mySummary;
        [Link(IsOptional = true)] private IPlant[] cropsInTheSimulation;

        //> User inputs from properties tab
		[Separator("Auxiliary manager for computing mySummary outputs")]
        [Description(" Date to start recording variables: ")]
        public DateTime StartDate { get; set; }
        [Description(" Date to end recording variables: ")]
        public DateTime EndDate { get; set; }
        [Description(" Depth of profile being recorded (mm):")]
        public double DepthForReporting { get; set; }

        //> Outputs from this manager
        [XmlIgnore] public double AccumRainfall { get; set; }
        [XmlIgnore] public double AccumIrrigation { get; set; }
        [XmlIgnore] public double AccumPET { get; set; }
        [XmlIgnore] public double AccumEvaporation { get; set; }
        [XmlIgnore] public double AccumTranspiration { get; set; }
        [XmlIgnore] public double AccumRunoff { get; set; }
        [XmlIgnore] public double AccumDrainage { get; set; }
        [XmlIgnore] public double AccumWaterFlowAtLayer { get; set; }
        [XmlIgnore] public double SumWaterAmountToLayer { get; set; }
        [XmlIgnore] public double DeltaSoilWaterTotal { get; set; }
        [XmlIgnore] public double DeltaSoilWaterToLayer { get; set; }
        [XmlIgnore] public double AverageMeanTemperature { get; set; }

        [XmlIgnore] public double AccumSurfaceOMMineralisation { get; set; }
        [XmlIgnore] public double AccumFertiliser { get; set; }
        [XmlIgnore] public double AccumUrine { get; set; }
        [XmlIgnore] public double AccumTotalSoilOMMineralised { get; set; }
        [XmlIgnore] public double AccumTotalDenitrifiedN { get; set; }
        [XmlIgnore] public double AccumTotalLeachedN { get; set; }
        [XmlIgnore] public double AccumUptakeN { get; set; }
        [XmlIgnore] public double AccumDetachedN { get; set; }

        [XmlIgnore] public double AccumSoilOMMineralisedToLayer { get; set; }
        [XmlIgnore] public double AccumDenitrifiedNToLayer { get; set; }
        [XmlIgnore] public double AccumFlowNAtLayer { get; set; }
        [XmlIgnore] public double SumUreaToLayer { get; set; }
        [XmlIgnore] public double SumNH4ToLayer { get; set; }
        [XmlIgnore] public double SumNO3ToLayer { get; set; }
        [XmlIgnore] public double SumMineralNToLayer { get; set; }
        [XmlIgnore] public double SumFOMNToLayer { get; set; }
        [XmlIgnore] public double SumMicrobialNToLayer { get; set; }
        [XmlIgnore] public double SumHumicNToLayer { get; set; }
        [XmlIgnore] public double SumOrganicNToLayer { get; set; }
        [XmlIgnore] public double SumOrganicCToLayer { get; set; }

        [XmlIgnore] public double DeltaSurfaceOMN { get; set; }
        [XmlIgnore] public double DeltaSoilFOMNTotal { get; set; }
        [XmlIgnore] public double DeltaSoilMBiomassNTotal { get; set; }
        [XmlIgnore] public double DeltaSoilHumicNTotal { get; set; }
        [XmlIgnore] public double DeltaSoilOrganicNTotal { get; set; }
        [XmlIgnore] public double DeltaSoilMineralNTotal { get; set; }
        [XmlIgnore] public double DeltaSoilOrganicCTotal { get; set; }

        [XmlIgnore] public double DeltaSoilFOMNToLayer { get; set; }
        [XmlIgnore] public double DeltaSoilMBiomassNToLayer { get; set; }
        [XmlIgnore] public double DeltaSoilHumicNToLayer { get; set; }
        [XmlIgnore] public double DeltaSoilOrganicNToLayer { get; set; }
        [XmlIgnore] public double DeltaSoilMineralNToLayer { get; set; }
        [XmlIgnore] public double DeltaSoilOrganicCToLayer { get; set; }

        [XmlIgnore] public double CropAboveGroundBiomassWt { get; set; }
        [XmlIgnore] public double CropAboveGroundBiomassN { get; set; }
        [XmlIgnore] public double CropAboveGroundBiomassNConc { get; set; }
        [XmlIgnore] public double CropBelowGroundBiomassWt { get; set; }
        [XmlIgnore] public double CropBelowGroundBiomassN { get; set; }
        [XmlIgnore] public double CropBelowGroundBiomassNConc { get; set; }
        [XmlIgnore] public double CropTotalBiomassWt { get; set; }
        [XmlIgnore] public double CropTotalBiomassN { get; set; }
        [XmlIgnore] public double CropTotalBiomassNConc { get; set; }
        [XmlIgnore] public double CropWaterDeficitFactor { get; set; }

        [XmlIgnore] public double TimeRecorded { get; set; }
        [XmlIgnore] public double NumberOfDaysWithWaterStress { get; set; }

        //> Internal variables
        private string cropSown { get; set; }
        private bool harvestHasHappened {get; set;}
        private string cropHarvested { get; set; }
        private string currentCrop = "none";
        private double numberDaysRecording {get; set;}
        private int reportingLayer;
        private string simulationYearStartDate;

        private double initialWaterContentTotal { get; set; }
        private double initialSurfaceOMN { get; set; }
        private double initialSoilFOMNTotal { get; set; }
        private double initialSoilBiomNTotal { get; set; }
        private double initialSoilHumNTotal { get; set; }
        private double initialSoilUreaTotal { get; set; }
        private double initialSoilNH4Total { get; set; }
        private double initialSoilNO3Total { get; set; }
        private double initialSoilOrgCTotal { get; set; }

        private double initialWaterContentToLayer { get; set; }
        private double initialSoilFOMNToLayer { get; set; }
        private double initialSoilBiomNToLayer { get; set; }
        private double initialSoilHumNToLayer { get; set; }
        private double initialSoilUreaToLayer { get; set; }
        private double initialSoilNH4ToLayer { get; set; }
        private double initialSoilNO3ToLayer { get; set; }
        private double initialSoilOrgCToLayer { get; set; }

        private double meanTemperatureSum {get; set;}

        [EventSubscribe("Commencing")]
        private void OnSimulationCommencing(object sender, EventArgs e)
        {
            mySummary.WriteMessage(this," ExtraVariables manager initialisation");

            // store the simulation start date, used to reset summaries
			simulationYearStartDate = clock.Today.ToString("dd-MMM");

            // get the index of layer down to which summaries will be calculated
            reportingLayer = -1;
            double depthFromSurface = 0.0;
            for (int z = 0; z < Soil.Thickness.Length; z++)
            {
                depthFromSurface += Soil.Thickness[z];
                if ((depthFromSurface - DepthForReporting) < 0.000000001)
                    reportingLayer = z;
            }

            // The harvest flag initialise
            harvestHasHappened = false;



            // write summary

	        mySummary.WriteMessage(this,"     Summaries are provided for the whole soil and for the top-soil down to the given depth of " + DepthForReporting.ToString("#0.0") + " mm");
        }

        [EventSubscribe("DoManagement")]
        private void OnDoManagement(object sender, EventArgs e)
        {
            // reset variables if crop has changed, or if today's date is the same as start of simulation
            harvestHasHappened = (bool)myZone.Get("[DefoliationManager].Script.HarvestFlag");
            if (harvestHasHappened)
            {
            	Output.DoOutput();
                ZeroVars();
            }
           
        }

        [EventSubscribe("DoManagementCalculations")]
        private void OnDoManagementCalculations(object sender, EventArgs e)
        {
            // summarise a series of variables
            if ((clock.Today.Date >= StartDate.Date) && (clock.Today.Date <= EndDate.Date))
            {
                SummariseVars();
            }
        }

        private void ZeroVars()
        {
            // zero accumulating variables
            numberDaysRecording = 0.0;
            meanTemperatureSum = 0.0;
            AccumRainfall = 0.0;
            AccumIrrigation = 0.0;
            AccumPET = 0.0;
            AccumTranspiration = 0.0;
            AccumEvaporation = 0.0;
            AccumRunoff = 0.0;
            AccumDrainage = 0.0;
            AccumWaterFlowAtLayer = 0.0;

            AccumSurfaceOMMineralisation = 0.0;
            AccumFertiliser = 0.0;
            AccumUrine = 0.0;
            AccumTotalSoilOMMineralised = 0.0;
            AccumTotalDenitrifiedN = 0.0;
            AccumTotalLeachedN = 0.0;
            AccumUptakeN = 0.0;
            AccumDetachedN = 0.0;

            AccumSoilOMMineralisedToLayer = 0.0;
            AccumDenitrifiedNToLayer = 0.0;
            AccumFlowNAtLayer = 0.0;
            SumUreaToLayer = 0.0;
            SumNH4ToLayer = 0.0;
            SumNO3ToLayer = 0.0;
            SumMineralNToLayer = 0.0;
            SumFOMNToLayer = 0.0;
            SumMicrobialNToLayer = 0.0;
            SumHumicNToLayer = 0.0;
            SumOrganicNToLayer = 0.0;
            SumOrganicCToLayer = 0.0;

            // get initial values
            initialSurfaceOMN = SurfaceOM.N;
            initialWaterContentTotal = MathUtilities.Sum(Soil.SoilWater.SWmm);
            initialSoilUreaTotal = MathUtilities.Sum(Urea.kgha);
            initialSoilNH4Total = MathUtilities.Sum(NH4.kgha);
            initialSoilNO3Total = MathUtilities.Sum(NO3.kgha);
            initialSoilFOMNTotal = MathUtilities.Sum(SoilNitrogen.FOMN);
            initialSoilBiomNTotal = MathUtilities.Sum(SoilNitrogen.MicrobialN);
            initialSoilHumNTotal = MathUtilities.Sum(SoilNitrogen.HumicN);
            initialSoilOrgCTotal = MathUtilities.Sum(SoilNitrogen.FOMC)
                                 + MathUtilities.Sum(SoilNitrogen.MicrobialC)
                                 + MathUtilities.Sum(SoilNitrogen.HumicC);

            initialWaterContentToLayer = MathUtilities.Sum(Soil.SoilWater.SWmm, 0, reportingLayer);
            initialSoilUreaToLayer = MathUtilities.Sum(Urea.kgha, 0, reportingLayer);
            initialSoilNH4ToLayer = MathUtilities.Sum(NH4.kgha, 0, reportingLayer);
            initialSoilNO3ToLayer = MathUtilities.Sum(NO3.kgha, 0, reportingLayer);
            initialSoilFOMNToLayer = MathUtilities.Sum(SoilNitrogen.FOMN, 0, reportingLayer);
            initialSoilBiomNToLayer = MathUtilities.Sum(SoilNitrogen.MicrobialN, 0, reportingLayer);
            initialSoilHumNToLayer = MathUtilities.Sum(SoilNitrogen.HumicN, 0, reportingLayer);
            initialSoilOrgCToLayer = MathUtilities.Sum(SoilNitrogen.FOMC, 0, reportingLayer)
                                   + MathUtilities.Sum(SoilNitrogen.MicrobialC, 0, reportingLayer)
                                   + MathUtilities.Sum(SoilNitrogen.HumicC, 0, reportingLayer);

            // crop outputs
			CropAboveGroundBiomassWt = 0.0;
			CropAboveGroundBiomassN = 0.0;
			CropAboveGroundBiomassNConc = 0.0;
			CropBelowGroundBiomassWt = 0.0;
			CropBelowGroundBiomassN = 0.0;
			CropBelowGroundBiomassNConc = 0.0;
			CropTotalBiomassWt = 0.0;
			CropTotalBiomassN = 0.0;
			CropTotalBiomassNConc = 0.0;
			CropWaterDeficitFactor = 0.0;
			NumberOfDaysWithWaterStress = 0.0;
        }

        private void SummariseVars()
        {
            numberDaysRecording += 1.0;
            TimeRecorded = numberDaysRecording;

            // get the water balance components
            AccumRainfall += weather.Rain;
            AccumIrrigation += myIrrigator.IrrigationApplied;
            AccumPET += Soil.SoilWater.Eo;
            foreach(IPlant crop in cropsInTheSimulation)
            {
            	AccumTranspiration += (crop as Plant).Root.WaterUptake;
            }
            AccumEvaporation += Soil.SoilWater.Es;
            AccumRunoff += Soil.SoilWater.Runoff;
            AccumDrainage += Soil.SoilWater.Drainage;
            AccumWaterFlowAtLayer += Soil.SoilWater.Flux[reportingLayer] - Soil.SoilWater.Flow[reportingLayer];
            SumWaterAmountToLayer = MathUtilities.Sum(Soil.SoilWater.SWmm, 0, reportingLayer);
            DeltaSoilWaterTotal = MathUtilities.Sum(Soil.SoilWater.SWmm) - initialWaterContentTotal;
            DeltaSoilWaterToLayer = MathUtilities.Sum(Soil.SoilWater.SWmm,0,1) - initialWaterContentToLayer;
            meanTemperatureSum += weather.MeanT;
            AverageMeanTemperature = meanTemperatureSum/TimeRecorded;

            // get the nitrogen balance components
            AccumSurfaceOMMineralisation += MathUtilities.Sum(SoilNitrogen.dlt_n_min_res);
            AccumFertiliser += myFertiliser.NitrogenApplied;
            //AccumUrine += (double)myZone.Get("[ReturnN].Script.AmountReturnedN");
            AccumTotalSoilOMMineralised += MathUtilities.Sum(SoilNitrogen.MineralisedN);
            AccumTotalDenitrifiedN += MathUtilities.Sum(SoilNitrogen.Denitrification);
            AccumTotalLeachedN += Soil.SoilWater.LeachNH4 + Soil.SoilWater.LeachNO3;
            foreach(IPlant crop in cropsInTheSimulation)
            {
            	AccumUptakeN -= (crop as Plant).Root.NUptake;
            	foreach(PMF.Interfaces.IOrgan organ in (crop as Plant).Organs)
            	{
            		string cropOrgan = (crop as Plant).Name + "." + organ.Name;
            		AccumDetachedN += (double)myZone.Get(cropOrgan + ".Detached.N");
            	}
            }
            AccumSoilOMMineralisedToLayer += MathUtilities.Sum(SoilNitrogen.MineralisedN, 0, reportingLayer);
            AccumDenitrifiedNToLayer += MathUtilities.Sum(SoilNitrogen.Denitrification, 0, reportingLayer);
            AccumFlowNAtLayer += Soil.SoilWater.FlowNH4[reportingLayer] + Soil.SoilWater.FlowNO3[reportingLayer];

            SumUreaToLayer = MathUtilities.Sum(Urea.kgha, 0, reportingLayer);
            SumNH4ToLayer = MathUtilities.Sum(NH4.kgha, 0, reportingLayer);
            SumNO3ToLayer = MathUtilities.Sum(NO3.kgha, 0, reportingLayer);
            SumMineralNToLayer = SumUreaToLayer + SumNH4ToLayer + SumNO3ToLayer;

            SumFOMNToLayer = MathUtilities.Sum(SoilNitrogen.FOMN, 0, reportingLayer);
            SumMicrobialNToLayer = MathUtilities.Sum(SoilNitrogen.MicrobialN, 0, reportingLayer);
            SumHumicNToLayer = MathUtilities.Sum(SoilNitrogen.HumicN, 0, reportingLayer);
            SumOrganicNToLayer = SumFOMNToLayer + SumMicrobialNToLayer + SumHumicNToLayer;
            SumOrganicCToLayer = MathUtilities.Sum(SoilNitrogen.FOMC, 0, reportingLayer)
                               + MathUtilities.Sum(SoilNitrogen.MicrobialC, 0, reportingLayer)
                               + MathUtilities.Sum(SoilNitrogen.HumicC, 0, reportingLayer);

            DeltaSurfaceOMN = SurfaceOM.N - initialSurfaceOMN;
            DeltaSoilFOMNTotal = MathUtilities.Sum(SoilNitrogen.FOMN) - initialSoilFOMNTotal;
            DeltaSoilMBiomassNTotal = MathUtilities.Sum(SoilNitrogen.MicrobialN) - initialSoilBiomNTotal;
            DeltaSoilHumicNTotal = MathUtilities.Sum(SoilNitrogen.HumicN) - initialSoilHumNTotal;
            DeltaSoilOrganicNTotal = (MathUtilities.Sum(SoilNitrogen.FOMN)
                                   + MathUtilities.Sum(SoilNitrogen.MicrobialN)
                                   + MathUtilities.Sum(SoilNitrogen.HumicN))
                                   - (initialSoilFOMNTotal + initialSoilBiomNTotal + initialSoilHumNTotal);
            DeltaSoilMineralNTotal = (MathUtilities.Sum(Urea.kgha)+MathUtilities.Sum(NH4.kgha)+MathUtilities.Sum(NO3.kgha))
                                   - (initialSoilUreaTotal + initialSoilNH4Total + initialSoilNO3Total);

            DeltaSoilOrganicCTotal = (MathUtilities.Sum(SoilNitrogen.FOMC)
                                   + MathUtilities.Sum(SoilNitrogen.MicrobialC)
                                   + MathUtilities.Sum(SoilNitrogen.HumicC))
                                   - initialSoilOrgCTotal;

            DeltaSoilFOMNToLayer = MathUtilities.Sum(SoilNitrogen.FOMN, 0, reportingLayer) - initialSoilFOMNToLayer;
            DeltaSoilMBiomassNToLayer = MathUtilities.Sum(SoilNitrogen.MicrobialN, 0, reportingLayer) - initialSoilBiomNToLayer;
            DeltaSoilHumicNToLayer = MathUtilities.Sum(SoilNitrogen.HumicN, 0, reportingLayer) - initialSoilHumNToLayer;
            DeltaSoilOrganicNToLayer = (MathUtilities.Sum(SoilNitrogen.FOMN, 0, reportingLayer)
                                     + MathUtilities.Sum(SoilNitrogen.MicrobialN, 0, reportingLayer)
                                     + MathUtilities.Sum(SoilNitrogen.HumicN, 0, reportingLayer))
                                     - (initialSoilFOMNToLayer + initialSoilBiomNToLayer + initialSoilHumNToLayer);
            DeltaSoilMineralNToLayer = (MathUtilities.Sum(Urea.kgha)+MathUtilities.Sum(NH4.kgha)+MathUtilities.Sum(NO3.kgha))
                                     - (initialSoilUreaToLayer + initialSoilNH4ToLayer + initialSoilNO3ToLayer);

            DeltaSoilOrganicCToLayer = (MathUtilities.Sum(SoilNitrogen.FOMC, 0, reportingLayer)
                                     + MathUtilities.Sum(SoilNitrogen.MicrobialC, 0, reportingLayer)
                                     + MathUtilities.Sum(SoilNitrogen.HumicC, 0, reportingLayer))
                                     - initialSoilOrgCToLayer;

			// get the plant outputs
			if(!harvestHasHappened)
			{ // skip recording on harvest day to avoid zeroing the outputs
				CropAboveGroundBiomassWt = 0.0;
				CropAboveGroundBiomassN = 0.0;
				CropAboveGroundBiomassNConc = 0.0;
				CropBelowGroundBiomassWt = 0.0;
				CropBelowGroundBiomassN = 0.0;
				CropBelowGroundBiomassNConc = 0.0;
				CropTotalBiomassWt = 0.0;
				CropTotalBiomassN = 0.0;
				CropTotalBiomassNConc = 0.0;
				double totalWaterDemand = 0.0;
				double totalWaterAllocation = 0.0;
	            foreach(IPlant crop in cropsInTheSimulation)
	            {
	            	string cropName = (crop as Plant).Name;
	            	CropAboveGroundBiomassWt += (double)myZone.Get(cropName + ".AboveGround.Wt") * 10.0;
	            	CropAboveGroundBiomassN += (double)myZone.Get(cropName + ".AboveGround.N") * 10.0;
	            	CropAboveGroundBiomassNConc += (double)myZone.Get(cropName + ".AboveGround.NConc") * 100.0;
	            	CropBelowGroundBiomassWt += (double)myZone.Get(cropName + ".BelowGround.Wt") * 10.0;
	            	CropBelowGroundBiomassN += (double)myZone.Get(cropName + ".BelowGround.N") * 10.0;
	            	CropBelowGroundBiomassNConc += (double)myZone.Get(cropName + ".BelowGround.NConc") * 100.0;
	            	CropTotalBiomassWt += (double)myZone.Get(cropName + ".Total.Wt") * 10.0;
	            	CropTotalBiomassN += (double)myZone.Get(cropName + ".Total.N") * 10.0;
	            	CropTotalBiomassNConc += (double)myZone.Get(cropName + ".Total.NConc") * 100.0;
	            	totalWaterDemand += (double)myZone.Get(cropName + ".Leaf.WaterDemand");
	            	totalWaterAllocation += (double)myZone.Get(cropName + ".Leaf.WaterAllocation");
	            }

	            CropWaterDeficitFactor = MathUtilities.Divide(totalWaterDemand, totalWaterAllocation, 0.0);
	            if(CropWaterDeficitFactor < 0.999999999)
	            {
	            	NumberOfDaysWithWaterStress += 1.0;
	            }
            }
        }
    }
}
```
          Manager ExtraVariables1
            StartDate = 1900-01-01
            EndDate = 2100-12-31
            DepthForReporting = 2300
```csharp
using System;
using System.Xml.Serialization;
using Models.Core;
using Models.Soils;
using Models.PMF;
using Models.Interfaces;
using APSIM.Shared.Utilities;
        
namespace Models
{
    [Serializable] 
    [System.Xml.Serialization.XmlInclude(typeof(Model))]
    public class Script : Model
    {
		//> Links to other Apsim models
        [Link] private Clock clock;
        [Link] private Zone myZone;
        [Link] private Weather weather;
        [Link] private Fertiliser myFertiliser;
        [Link] private Irrigation myIrrigator;
        [Link] private Models.Surface.SurfaceOrganicMatter SurfaceOM;
        [Link] private Soils.Soil Soil;
        [ScopedLinkByName] private SoilNitrogen SoilNitrogen;
        [ScopedLinkByName] private ISolute NO3;
        [ScopedLinkByName] private ISolute NH4;
        [ScopedLinkByName] private ISolute Urea;
        [ScopedLinkByName] Models.Report.Report Output;
        [Link] private ISummary mySummary;
        [Link(IsOptional = true)] private IPlant[] cropsInTheSimulation;

        //> User inputs from properties tab
		[Separator("Auxiliary manager for computing mySummary outputs")]
        [Description(" Date to start recording variables: ")]
        public DateTime StartDate { get; set; }
        [Description(" Date to end recording variables: ")]
        public DateTime EndDate { get; set; }
        [Description(" Depth of profile being recorded (mm):")]
        public double DepthForReporting { get; set; }

        //> Outputs from this manager
        [XmlIgnore] public double AccumRainfall { get; set; }
        [XmlIgnore] public double AccumIrrigation { get; set; }
        [XmlIgnore] public double AccumPET { get; set; }
        [XmlIgnore] public double AccumEvaporation { get; set; }
        [XmlIgnore] public double AccumTranspiration { get; set; }
        [XmlIgnore] public double AccumRunoff { get; set; }
        [XmlIgnore] public double AccumDrainage { get; set; }
        [XmlIgnore] public double AccumWaterFlowAtLayer { get; set; }
        [XmlIgnore] public double SumWaterAmountToLayer { get; set; }
        [XmlIgnore] public double DeltaSoilWaterTotal { get; set; }
        [XmlIgnore] public double DeltaSoilWaterToLayer { get; set; }
        [XmlIgnore] public double AverageMeanTemperature { get; set; }

        [XmlIgnore] public double AccumSurfaceOMMineralisation { get; set; }
        [XmlIgnore] public double AccumFertiliser { get; set; }
        [XmlIgnore] public double AccumUrine { get; set; }
        [XmlIgnore] public double AccumTotalSoilOMMineralised { get; set; }
        [XmlIgnore] public double AccumTotalDenitrifiedN { get; set; }
        [XmlIgnore] public double AccumTotalLeachedN { get; set; }
        [XmlIgnore] public double AccumUptakeN { get; set; }
        [XmlIgnore] public double AccumDetachedN { get; set; }

        [XmlIgnore] public double AccumSoilOMMineralisedToLayer { get; set; }
        [XmlIgnore] public double AccumDenitrifiedNToLayer { get; set; }
        [XmlIgnore] public double AccumFlowNAtLayer { get; set; }
        [XmlIgnore] public double SumUreaToLayer { get; set; }
        [XmlIgnore] public double SumNH4ToLayer { get; set; }
        [XmlIgnore] public double SumNO3ToLayer { get; set; }
        [XmlIgnore] public double SumMineralNToLayer { get; set; }
        [XmlIgnore] public double SumFOMNToLayer { get; set; }
        [XmlIgnore] public double SumMicrobialNToLayer { get; set; }
        [XmlIgnore] public double SumHumicNToLayer { get; set; }
        [XmlIgnore] public double SumOrganicNToLayer { get; set; }
        [XmlIgnore] public double SumOrganicCToLayer { get; set; }

        [XmlIgnore] public double DeltaSurfaceOMN { get; set; }
        [XmlIgnore] public double DeltaSoilFOMNTotal { get; set; }
        [XmlIgnore] public double DeltaSoilMBiomassNTotal { get; set; }
        [XmlIgnore] public double DeltaSoilHumicNTotal { get; set; }
        [XmlIgnore] public double DeltaSoilOrganicNTotal { get; set; }
        [XmlIgnore] public double DeltaSoilMineralNTotal { get; set; }
        [XmlIgnore] public double DeltaSoilOrganicCTotal { get; set; }

        [XmlIgnore] public double DeltaSoilFOMNToLayer { get; set; }
        [XmlIgnore] public double DeltaSoilMBiomassNToLayer { get; set; }
        [XmlIgnore] public double DeltaSoilHumicNToLayer { get; set; }
        [XmlIgnore] public double DeltaSoilOrganicNToLayer { get; set; }
        [XmlIgnore] public double DeltaSoilMineralNToLayer { get; set; }
        [XmlIgnore] public double DeltaSoilOrganicCToLayer { get; set; }

        [XmlIgnore] public double CropAboveGroundBiomassWt { get; set; }
        [XmlIgnore] public double CropAboveGroundBiomassN { get; set; }
        [XmlIgnore] public double CropAboveGroundBiomassNConc { get; set; }
        [XmlIgnore] public double CropBelowGroundBiomassWt { get; set; }
        [XmlIgnore] public double CropBelowGroundBiomassN { get; set; }
        [XmlIgnore] public double CropBelowGroundBiomassNConc { get; set; }
        [XmlIgnore] public double CropTotalBiomassWt { get; set; }
        [XmlIgnore] public double CropTotalBiomassN { get; set; }
        [XmlIgnore] public double CropTotalBiomassNConc { get; set; }
        [XmlIgnore] public double CropWaterDeficitFactor { get; set; }

        [XmlIgnore] public double TimeRecorded { get; set; }
        [XmlIgnore] public double NumberOfDaysWithWaterStress { get; set; }
        [XmlIgnore] public string RotationSeasonOfYear { get;set;} // Label Rotations with spring/winter/summer/autumn flag

        //> Internal variables
        private string cropSown { get; set; }
        private bool harvestHasHappened {get; set;}
        private string cropHarvested { get; set; }
        private string currentCrop = "none";
        private double numberDaysRecording {get; set;}
        private int reportingLayer;
        private string simulationYearStartDate;

        private double initialWaterContentTotal { get; set; }
        private double initialSurfaceOMN { get; set; }
        private double initialSoilFOMNTotal { get; set; }
        private double initialSoilBiomNTotal { get; set; }
        private double initialSoilHumNTotal { get; set; }
        private double initialSoilUreaTotal { get; set; }
        private double initialSoilNH4Total { get; set; }
        private double initialSoilNO3Total { get; set; }
        private double initialSoilOrgCTotal { get; set; }

        private double initialWaterContentToLayer { get; set; }
        private double initialSoilFOMNToLayer { get; set; }
        private double initialSoilBiomNToLayer { get; set; }
        private double initialSoilHumNToLayer { get; set; }
        private double initialSoilUreaToLayer { get; set; }
        private double initialSoilNH4ToLayer { get; set; }
        private double initialSoilNO3ToLayer { get; set; }
        private double initialSoilOrgCToLayer { get; set; }

        private double meanTemperatureSum {get; set;}

        [EventSubscribe("Commencing")]
        private void OnSimulationCommencing(object sender, EventArgs e)
        {
            mySummary.WriteMessage(this," ExtraVariables manager initialisation");

            // store the simulation start date, used to reset summaries
			simulationYearStartDate = clock.Today.ToString("dd-MMM");

            // get the index of layer down to which summaries will be calculated
            reportingLayer = -1;
            double depthFromSurface = 0.0;
            for (int z = 0; z < Soil.Thickness.Length; z++)
            {
                depthFromSurface += Soil.Thickness[z];
                if ((depthFromSurface - DepthForReporting) < 0.000000001)
                    reportingLayer = z;
            }

            // The harvest flag initialise
            harvestHasHappened = false;



            // write summary

	        mySummary.WriteMessage(this,"     Summaries are provided for the whole soil and for the top-soil down to the given depth of " + DepthForReporting.ToString("#0.0") + " mm");
        }

        [EventSubscribe("DoManagement")]
        private void OnDoManagement(object sender, EventArgs e)
        {
         // Use meteorological seasons (FIXME: use more sophisticated option later)
         	if(DateUtilities.DatesEqual("1-Sep", clock.Today))
         	{
         	 Output.DoOutput();
             RotationSeasonOfYear= "Spring";
             ZeroVars();                
            }
            if (DateUtilities.DatesEqual("1-Dec", clock.Today))
            {
             Output.DoOutput();
             RotationSeasonOfYear= "Summer";           
             ZeroVars();
            }
            if (DateUtilities.DatesEqual("1-Mar", clock.Today))
            {
             Output.DoOutput();
             RotationSeasonOfYear= "Autumn";           
             ZeroVars();
            }
            if (DateUtilities.DatesEqual("1-Jun", clock.Today))
            {
             Output.DoOutput();
             RotationSeasonOfYear= "Winter";           
             ZeroVars();
            }           
        }


        [EventSubscribe("DoManagementCalculations")]
        private void OnDoManagementCalculations(object sender, EventArgs e)
        {
            // summarise a series of variables
            if ((clock.Today.Date >= StartDate.Date) && (clock.Today.Date <= EndDate.Date))
            {
                SummariseVars();
            }
        }



        private void ZeroVars()
        {
            // zero accumulating variables
            numberDaysRecording = 0.0;
            meanTemperatureSum = 0.0;
            AccumRainfall = 0.0;
            AccumIrrigation = 0.0;
            AccumPET = 0.0;
            AccumTranspiration = 0.0;
            AccumEvaporation = 0.0;
            AccumRunoff = 0.0;
            AccumDrainage = 0.0;
            AccumWaterFlowAtLayer = 0.0;

            AccumSurfaceOMMineralisation = 0.0;
            AccumFertiliser = 0.0;
            AccumUrine = 0.0;
            AccumTotalSoilOMMineralised = 0.0;
            AccumTotalDenitrifiedN = 0.0;
            AccumTotalLeachedN = 0.0;
            AccumUptakeN = 0.0;
            AccumDetachedN = 0.0;

            AccumSoilOMMineralisedToLayer = 0.0;
            AccumDenitrifiedNToLayer = 0.0;
            AccumFlowNAtLayer = 0.0;
            SumUreaToLayer = 0.0;
            SumNH4ToLayer = 0.0;
            SumNO3ToLayer = 0.0;
            SumMineralNToLayer = 0.0;
            SumFOMNToLayer = 0.0;
            SumMicrobialNToLayer = 0.0;
            SumHumicNToLayer = 0.0;
            SumOrganicNToLayer = 0.0;
            SumOrganicCToLayer = 0.0;

            // get initial values
            initialSurfaceOMN = SurfaceOM.N;
            initialWaterContentTotal = MathUtilities.Sum(Soil.SoilWater.SWmm);
            initialSoilUreaTotal = MathUtilities.Sum(Urea.kgha);
            initialSoilNH4Total = MathUtilities.Sum(NH4.kgha);
            initialSoilNO3Total = MathUtilities.Sum(NO3.kgha);
            initialSoilFOMNTotal = MathUtilities.Sum(SoilNitrogen.FOMN);
            initialSoilBiomNTotal = MathUtilities.Sum(SoilNitrogen.MicrobialN);
            initialSoilHumNTotal = MathUtilities.Sum(SoilNitrogen.HumicN);
            initialSoilOrgCTotal = MathUtilities.Sum(SoilNitrogen.FOMC)
                                 + MathUtilities.Sum(SoilNitrogen.MicrobialC)
                                 + MathUtilities.Sum(SoilNitrogen.HumicC);

            initialWaterContentToLayer = MathUtilities.Sum(Soil.SoilWater.SWmm, 0, reportingLayer);
            initialSoilUreaToLayer = MathUtilities.Sum(Urea.kgha, 0, reportingLayer);
            initialSoilNH4ToLayer = MathUtilities.Sum(NH4.kgha, 0, reportingLayer);
            initialSoilNO3ToLayer = MathUtilities.Sum(NO3.kgha, 0, reportingLayer);
            initialSoilFOMNToLayer = MathUtilities.Sum(SoilNitrogen.FOMN, 0, reportingLayer);
            initialSoilBiomNToLayer = MathUtilities.Sum(SoilNitrogen.MicrobialN, 0, reportingLayer);
            initialSoilHumNToLayer = MathUtilities.Sum(SoilNitrogen.HumicN, 0, reportingLayer);
            initialSoilOrgCToLayer = MathUtilities.Sum(SoilNitrogen.FOMC, 0, reportingLayer)
                                   + MathUtilities.Sum(SoilNitrogen.MicrobialC, 0, reportingLayer)
                                   + MathUtilities.Sum(SoilNitrogen.HumicC, 0, reportingLayer);

            // crop outputs
			CropAboveGroundBiomassWt = 0.0;
			CropAboveGroundBiomassN = 0.0;
			CropAboveGroundBiomassNConc = 0.0;
			CropBelowGroundBiomassWt = 0.0;
			CropBelowGroundBiomassN = 0.0;
			CropBelowGroundBiomassNConc = 0.0;
			CropTotalBiomassWt = 0.0;
			CropTotalBiomassN = 0.0;
			CropTotalBiomassNConc = 0.0;
			CropWaterDeficitFactor = 0.0;
			NumberOfDaysWithWaterStress = 0.0;
        }

        private void SummariseVars()
        {
            numberDaysRecording += 1.0;
            TimeRecorded = numberDaysRecording;

            // get the water balance components
            AccumRainfall += weather.Rain;
            AccumIrrigation += myIrrigator.IrrigationApplied;
            AccumPET += Soil.SoilWater.Eo;
            foreach(IPlant crop in cropsInTheSimulation)
            {
            	AccumTranspiration += (crop as Plant).Root.WaterUptake;
            }
            AccumEvaporation += Soil.SoilWater.Es;
            AccumRunoff += Soil.SoilWater.Runoff;
            AccumDrainage += Soil.SoilWater.Drainage;
            AccumWaterFlowAtLayer += Soil.SoilWater.Flux[reportingLayer] - Soil.SoilWater.Flow[reportingLayer];
            SumWaterAmountToLayer = MathUtilities.Sum(Soil.SoilWater.SWmm, 0, reportingLayer);
            DeltaSoilWaterTotal = MathUtilities.Sum(Soil.SoilWater.SWmm) - initialWaterContentTotal;
            DeltaSoilWaterToLayer = MathUtilities.Sum(Soil.SoilWater.SWmm,0,1) - initialWaterContentToLayer;
            meanTemperatureSum += weather.MeanT;
            AverageMeanTemperature = meanTemperatureSum/TimeRecorded;

            // get the nitrogen balance components
            AccumSurfaceOMMineralisation += MathUtilities.Sum(SoilNitrogen.dlt_n_min_res);
            AccumFertiliser += myFertiliser.NitrogenApplied;
            //AccumUrine += (double)myZone.Get("[ReturnN].Script.AmountReturnedN");
            AccumTotalSoilOMMineralised += MathUtilities.Sum(SoilNitrogen.MineralisedN);
            AccumTotalDenitrifiedN += MathUtilities.Sum(SoilNitrogen.Denitrification);
            AccumTotalLeachedN += Soil.SoilWater.LeachNH4 + Soil.SoilWater.LeachNO3;
            foreach(IPlant crop in cropsInTheSimulation)
            {
            	AccumUptakeN -= (crop as Plant).Root.NUptake;
            	foreach(PMF.Interfaces.IOrgan organ in (crop as Plant).Organs)
            	{
            		string cropOrgan = (crop as Plant).Name + "." + organ.Name;
            		AccumDetachedN += (double)myZone.Get(cropOrgan + ".Detached.N");
            	}
            }
            AccumSoilOMMineralisedToLayer += MathUtilities.Sum(SoilNitrogen.MineralisedN, 0, reportingLayer);
            AccumDenitrifiedNToLayer += MathUtilities.Sum(SoilNitrogen.Denitrification, 0, reportingLayer);
            AccumFlowNAtLayer += Soil.SoilWater.FlowNH4[reportingLayer] + Soil.SoilWater.FlowNO3[reportingLayer];

            SumUreaToLayer = MathUtilities.Sum(Urea.kgha, 0, reportingLayer);
            SumNH4ToLayer = MathUtilities.Sum(NH4.kgha, 0, reportingLayer);
            SumNO3ToLayer = MathUtilities.Sum(NO3.kgha, 0, reportingLayer);
            SumMineralNToLayer = SumUreaToLayer + SumNH4ToLayer + SumNO3ToLayer;

            SumFOMNToLayer = MathUtilities.Sum(SoilNitrogen.FOMN, 0, reportingLayer);
            SumMicrobialNToLayer = MathUtilities.Sum(SoilNitrogen.MicrobialN, 0, reportingLayer);
            SumHumicNToLayer = MathUtilities.Sum(SoilNitrogen.HumicN, 0, reportingLayer);
            SumOrganicNToLayer = SumFOMNToLayer + SumMicrobialNToLayer + SumHumicNToLayer;
            SumOrganicCToLayer = MathUtilities.Sum(SoilNitrogen.FOMC, 0, reportingLayer)
                               + MathUtilities.Sum(SoilNitrogen.MicrobialC, 0, reportingLayer)
                               + MathUtilities.Sum(SoilNitrogen.HumicC, 0, reportingLayer);

            DeltaSurfaceOMN = SurfaceOM.N - initialSurfaceOMN;
            DeltaSoilFOMNTotal = MathUtilities.Sum(SoilNitrogen.FOMN) - initialSoilFOMNTotal;
            DeltaSoilMBiomassNTotal = MathUtilities.Sum(SoilNitrogen.MicrobialN) - initialSoilBiomNTotal;
            DeltaSoilHumicNTotal = MathUtilities.Sum(SoilNitrogen.HumicN) - initialSoilHumNTotal;
            DeltaSoilOrganicNTotal = (MathUtilities.Sum(SoilNitrogen.FOMN)
                                   + MathUtilities.Sum(SoilNitrogen.MicrobialN)
                                   + MathUtilities.Sum(SoilNitrogen.HumicN))
                                   - (initialSoilFOMNTotal + initialSoilBiomNTotal + initialSoilHumNTotal);
            DeltaSoilMineralNTotal = (MathUtilities.Sum(Urea.kgha)+MathUtilities.Sum(NH4.kgha)+MathUtilities.Sum(NO3.kgha))
                                   - (initialSoilUreaTotal + initialSoilNH4Total + initialSoilNO3Total);

            DeltaSoilOrganicCTotal = (MathUtilities.Sum(SoilNitrogen.FOMC)
                                   + MathUtilities.Sum(SoilNitrogen.MicrobialC)
                                   + MathUtilities.Sum(SoilNitrogen.HumicC))
                                   - initialSoilOrgCTotal;

            DeltaSoilFOMNToLayer = MathUtilities.Sum(SoilNitrogen.FOMN, 0, reportingLayer) - initialSoilFOMNToLayer;
            DeltaSoilMBiomassNToLayer = MathUtilities.Sum(SoilNitrogen.MicrobialN, 0, reportingLayer) - initialSoilBiomNToLayer;
            DeltaSoilHumicNToLayer = MathUtilities.Sum(SoilNitrogen.HumicN, 0, reportingLayer) - initialSoilHumNToLayer;
            DeltaSoilOrganicNToLayer = (MathUtilities.Sum(SoilNitrogen.FOMN, 0, reportingLayer)
                                     + MathUtilities.Sum(SoilNitrogen.MicrobialN, 0, reportingLayer)
                                     + MathUtilities.Sum(SoilNitrogen.HumicN, 0, reportingLayer))
                                     - (initialSoilFOMNToLayer + initialSoilBiomNToLayer + initialSoilHumNToLayer);
            DeltaSoilMineralNToLayer = (MathUtilities.Sum(Urea.kgha)+MathUtilities.Sum(NH4.kgha)+MathUtilities.Sum(NO3.kgha))
                                     - (initialSoilUreaToLayer + initialSoilNH4ToLayer + initialSoilNO3ToLayer);

            DeltaSoilOrganicCToLayer = (MathUtilities.Sum(SoilNitrogen.FOMC, 0, reportingLayer)
                                     + MathUtilities.Sum(SoilNitrogen.MicrobialC, 0, reportingLayer)
                                     + MathUtilities.Sum(SoilNitrogen.HumicC, 0, reportingLayer))
                                     - initialSoilOrgCToLayer;

			// get the plant outputs
			if(!harvestHasHappened)
			{ // skip recording on harvest day to avoid zeroing the outputs
				CropAboveGroundBiomassWt = 0.0;
				CropAboveGroundBiomassN = 0.0;
				CropAboveGroundBiomassNConc = 0.0;
				CropBelowGroundBiomassWt = 0.0;
				CropBelowGroundBiomassN = 0.0;
				CropBelowGroundBiomassNConc = 0.0;
				CropTotalBiomassWt = 0.0;
				CropTotalBiomassN = 0.0;
				CropTotalBiomassNConc = 0.0;
				double totalWaterDemand = 0.0;
				double totalWaterAllocation = 0.0;
	            foreach(IPlant crop in cropsInTheSimulation)
	            {
	            	string cropName = (crop as Plant).Name;
	            	CropAboveGroundBiomassWt += (double)myZone.Get(cropName + ".AboveGround.Wt") * 10.0;
	            	CropAboveGroundBiomassN += (double)myZone.Get(cropName + ".AboveGround.N") * 10.0;
	            	CropAboveGroundBiomassNConc += (double)myZone.Get(cropName + ".AboveGround.NConc") * 100.0;
	            	CropBelowGroundBiomassWt += (double)myZone.Get(cropName + ".BelowGround.Wt") * 10.0;
	            	CropBelowGroundBiomassN += (double)myZone.Get(cropName + ".BelowGround.N") * 10.0;
	            	CropBelowGroundBiomassNConc += (double)myZone.Get(cropName + ".BelowGround.NConc") * 100.0;
	            	CropTotalBiomassWt += (double)myZone.Get(cropName + ".Total.Wt") * 10.0;
	            	CropTotalBiomassN += (double)myZone.Get(cropName + ".Total.N") * 10.0;
	            	CropTotalBiomassNConc += (double)myZone.Get(cropName + ".Total.NConc") * 100.0;
	            	totalWaterDemand += (double)myZone.Get(cropName + ".Leaf.WaterDemand");
	            	totalWaterAllocation += (double)myZone.Get(cropName + ".Leaf.WaterAllocation");
	            }

	            CropWaterDeficitFactor = MathUtilities.Divide(totalWaterDemand, totalWaterAllocation, 0.0);
	            if(CropWaterDeficitFactor < 0.999999999)
	            {
	            	NumberOfDaysWithWaterStress += 1.0;
	            }
            }
        }
    }
}
```
        MicroClimate: a_interception=0; b_interception=1; c_interception=0; d_interception=0; soil_albedo=0.23; SoilHeatFluxFraction=0.4; NightInterceptionFraction=0.5; ReferenceHeight=2
        Irrigation
        Fertiliser
        SurfaceOrganicMatter surface organic matter: InitialResidueName=wheat; InitialResidueType=wheat; InitialResidueMass=0; InitialStandingFraction=0; InitialCPR=0; InitialCNR=80; FractionFaecesAdded=0.5
        Operations IrrigationEvents
          2015-01-13  [Irrigation].Apply(26);
          2015-01-14  [Irrigation].Apply(26);
          2015-03-31  [Irrigation].Apply(21);
          2015-04-01  [Irrigation].Apply(21);
          2015-11-03  [Irrigation].Apply(16);
          2015-11-04  [Irrigation].Apply(16);
          2015-12-26  [Irrigation].Apply(20);
          2015-12-27  [Irrigation].Apply(20);
          2016-01-19  [Irrigation].Apply(21);
          2016-01-20  [Irrigation].Apply(21);
          2016-02-09  [Irrigation].Apply(21);
          2016-02-10  [Irrigation].Apply(21);
          2016-05-13  [Irrigation].Apply(40);
          2016-05-14  [Irrigation].Apply(25);
          2017-01-09  [Irrigation].Apply(21);
          2017-01-10  [Irrigation].Apply(21);
          2017-02-20  [Irrigation].Apply(21);
          2017-02-21  [Irrigation].Apply(21);
          2017-11-14  [Irrigation].Apply(40);
          2017-11-15  [Irrigation].Apply(40);
          2017-11-20  [Irrigation].Apply(40);
          2017-11-27  [Irrigation].Apply(20);
          2017-11-28  [Irrigation].Apply(20);
          2017-12-08  [Irrigation].Apply(30);
          2018-01-03  [Irrigation].Apply(20);
          2018-02-15  [Irrigation].Apply(20);
          2018-02-24  [Irrigation].Apply(20);
          2018-11-12  [Irrigation].Apply(30);
          2019-01-08  [Irrigation].Apply(40);
          2019-01-28  [Irrigation].Apply(45);
          2019-01-29  [Irrigation].Apply(45);
          2019-02-07  [Irrigation].Apply(30);
          2019-02-18  [Irrigation].Apply(45);
          2019-02-19  [Irrigation].Apply(45);
          2019-02-22  [Irrigation].Apply(30);
          2019-03-07  [Irrigation].Apply(40);
        Plant Lucerne: CropType=Lucerne; IsEnding=false; DaysAfterEnding=0
        Soil: Latitude=0; Longitude=0
          Analysis: Thickness=[100, 200, 300, 300, 300, 300]; PH=[6.6, 6.2, 5.7, 5.5, 5.5, 5.5]; PHUnits=Water; BoronUnits=0
          InitialWater Initial water: PercentMethod=1; FractionFull=0.998443
          Water
            Thickness  BD    AirDry  LL15   DUL   SAT
            100        1.26  0.05    0.075  0.35  0.38
            100        1.26  0.06    0.078  0.35  0.38
            100        1.26  0.07    0.07   0.32  0.39
            100        1.44  0.07    0.07   0.29  0.32
            100        1.44  0.069   0.07   0.27  0.3
            100        1.44  0.07    0.07   0.31  0.297
            100        1.57  0.07    0.07   0.33  0.32
            100        1.57  0.07    0.07   0.35  0.34
            100        1.57  0.07    0.07   0.34  0.35
            100        1.58  0.07    0.07   0.34  0.35
            100        1.58  0.07    0.07   0.34  0.35
            100        1.58  0.07    0.07   0.34  0.35
            100        1.58  0.08    0.08   0.34  0.35
            100        1.59  0.078   0.08   0.33  0.35
            100        1.59  0.08    0.08   0.33  0.35
            100        1.59  0.087   0.09   0.32  0.34
            100        1.59  0.09    0.09   0.3   0.33
            100        1.59  0.09    0.09   0.3   0.33
            100        1.59  0.09    0.09   0.3   0.33
            100        1.59  0.08    0.08   0.31  0.33
            100        1.59  0.09    0.09   0.31  0.33
            100        1.59  0.09    0.09   0.32  0.34
            100        1.59  0.09    0.09   0.35  0.4
            SoilCrop LucerneSoil
              LL=[0.1, 0.13, 0.12, 0.12, 0.11, 0.08, 0.08, 0.08, 0.09, 0.11, 0.12, 0.15, 0.15, 0.15, 0.16, 0.2, 0.25, 0.25, 0.25, 0.25, 0.23, 0.15, 0.15]
              KL=[0.06, 0.06, 0.03, 0.03, 0.03, 0.03, 0.03, 0.03, 0.03, 0.03, 0.03, 0.03, 0.03, 0.03, 0.03, 0.03, 0.03, 0.03, 0.03, 0.03, 0.03, 0.03, 0.03]
              XF=[1, 1, 1, 1, 1, 1, 1, 1, 1, 1, 1, 1, 1, 1, 1, 1, 1, 1, 1, 1, 1, 1, 1]
          SoilWater: SummerDate=1-Oct; SummerU=6; SummerCona=3; WinterDate=1-Mar; WinterU=5; WinterCona=2.5; DiffusConst=0; DiffusSlope=0; Salb=0.13; CN2Bare=0; CNRed=0; CNCov=0.8; max_pond=0; Thickness=[100, 200, 300, 300, 300, 300]; SWCON=[0.55, 0.55, 0.55, 0.55, 0.55, 0.55]; ResidueInterception=0
          SoilNitrogen: fom_types=[default, manure, mucuna, lablab, shemp, stable]; fract_carb=[0.2, 0.3, 0.54, 0.57, 0.45, 0]; fract_cell=[0.7, 0.3, 0.37, 0.37, 0.47, 0.1]; fract_lign=[0.1, 0.4, 0.09, 0.06, 0.08, 0.9]
            SoilNitrogenNO3 NO3
            SoilNitrogenNH4 NH4
            SoilNitrogenUrea Urea
            SoilNitrogenPlantAvailableNO3 PlantAvailableNO3
            SoilNitrogenPlantAvailableNH4 PlantAvailableNH4
          SoilOrganicMatter: RootCN=30; EnrACoeff=7.4; EnrBCoeff=0.2; OCUnits=Total
            Thickness  OC    SoilCN  FBiom  FInert  RootWt
            100        1.82  11.5    0.025  0.3     1243.93
            200        1.47  11.5    0.025  0.4     833.832
            300        1.2   11.5    0.015  0.75    457.617
            300        1.03  11.5    0.01   0.9     251.145
            300        0.47  11.5    0.01   0.96    137.831
            300        0.47  11.5    0.01   0.96    75.6435
          Sample: NO3Units=kg/ha; NH4Units=ppm; SWUnits=Volumetric; OCUnits=Total; PHUnits=Water
            Thickness  NO3  NH4
            100        217  0
            200        30   0
            300        5    0
            300        5    0
            300        0    0
            300        0    0
          CERESSoilTemperature
        Report Output: EventNames=[Clock].DoReport
          VariableNames:
            [Clock].Today as Date
            [Clock].Today.Year as Year
            [Clock].Today.DayOfYear as DayOfYear
            [Clock].Today as ReportDate
            [ExtraVariables1].Script.RotationSeasonOfYear as RotationSeason
            [FactorLabels].Script.AGENT_NO as AGENT_NO
            [FactorLabels].Script.Lat as Lat
            [FactorLabels].Script.Lon as Lon
            [FactorLabels].Script.GCM as GCM
            [FactorLabels].Script.RCP as RCP
            [FactorLabels].Script.TS as TimeSlice
            [FactorLabels].Script.SoilStamp as SoilStamp
            [Lucerne].Population as PlantPopulation
            [Lucerne].AboveGround.Wt *10 as ShootWt
            [Lucerne].TapRoot.Wt*10 as TapRoot
            ([Lucerne].Total.Wt)*10 as TotalPlantBiomass
            [Soil].SoilWater.Drainage as Drainage
            [Soil].SoilWater.Runoff as Runoff
            sum([Soil].SoilWater.SWmm) as TotalSWC
            ([Soil].SoilWater.LeachNH4 + [Soil].SoilWater.LeachNO3) as LeachedN
            ([Lucerne].Leaf.Transpiration + [Soil].SoilWater.Es) as ET
            [Soil].SoilWater.Eo as Eo
            [Soil].SoilWater.Es as Evaporation
            [Soil].SoilWater.WaterTable as WaterTable
            sum([Soil].SoilWater.SWmm) as SoilWater_Total
            (-[Lucerne].Root.NUptake as UptakeN
            ([Lucerne].Total.N)*10 as TotalPlantN
            [DefoliationManager].Script.BudsDays as BudsDays
            [DefoliationManager].Script.FloDays as FloDays
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