Simulations: Version=92
  DataStore
  Experiment LnP
    Factors
      Permutation
        Factor Crop
          CompositeFactor Lucerne
            Specifications:
              [SlurpSowingRule].Script.SowingDate=2010-10-21
              [SlurpSowingRule].Script.CultivarName=Lucerne
              [SlurpSowingRule].Script.MaxG = 0.006
              [SlurpSowingRule].Script.R50 = 175
        Factor SKL
          CompositeFactor 01: Specifications=[Soil].Physical.SlurpSoil
            SoilCrop SlurpSoil
              LL=[0.1, 0.1, 0.09, 0.021, 0.036, 0.041, 0.043, 0.037, 0.052, 0.05, 0.05, 0.05, 0.05]
              KL=[0.01, 0.01, 0.01, 0.01, 0.01, 0.01, 0.01, 0.01, 0.01, 0.01, 0.01, 0.01, 0.01]
              XF=[1, 1, 1, 1, 1, 1, 1, 1, 1, 1, 1, 1, 1]
    Simulation LandPBase
      Weather: FileName=%root%\Examples\WeatherFiles\lincoln.met
      Clock: Start=2010-10-21; End=2012-07-31
      Summary
      SoilArbitrator Soil Arbitrator
      Zone Field: Area=1; Slope=0; AspectAngle=0; Altitude=50
        Folder ManagerFolder
          Memo
            ### ReportOnDates
            This manager controls the report frequence. The current setup reports simulation results on the dates which had observation values.
            Currently disabled by `[Clock].DoReport` in the report frequence panel in the report node.

            ### SlurpSowingRule
            This manager controls the sowing date, depth and other initial parameters for setting up the stage.

            ### SetCropVariables
            This manager controls the canopy data as input.
            The current setup requires three numeric input data:
            1. Daily fractional light interception.
            	- Users can provide the data by providing a file path to the prepared data file.
            	- The default column names are "Date" and "LightInterception".
            	- Users can change the manager panle to match preferred names in the file.
            	- This value is also used to calculate the height changes.
            2. Extinction coefficient.
            	Users can provide a daily value along with the fractional light interception data.
            3. Maximum plant height when crop was full canopy cover.
          Manager ReportOnDates
            TodayString =
```csharp
using APSIM.Shared.Utilities;
using System.Xml.Serialization;
using Models;
using Models.PMF;
using Models.Soils;
using System.Text;
using System.Collections.Generic;
using Models.Core;
using System;

namespace Models
{
    [Serializable] 
    public class Script : Model
    {
        [Link] Clock Clock;
        [Link] Models.Report DataRep;
        
        public List<string> ObsDates;
        public string TodayString { get; set; }
        
        [EventSubscribe("StartOfSimulation")]
        private void OnStartOfSimulation(object sender, EventArgs e)
        {
            ObsDates = new List<string>();
            ObsDates.Add("2011-01-04");
            ObsDates.Add("2011-01-14");
            ObsDates.Add("2011-01-24");
            ObsDates.Add("2011-01-25");
            ObsDates.Add("2011-02-10");
            ObsDates.Add("2011-02-19");
            ObsDates.Add("2011-03-02");
            ObsDates.Add("2011-03-15");
            ObsDates.Add("2011-03-25");
            ObsDates.Add("2011-04-07");
            ObsDates.Add("2011-04-08");
            ObsDates.Add("2011-04-28");
            ObsDates.Add("2011-05-11");
            ObsDates.Add("2011-05-24");
            ObsDates.Add("2011-06-02");
            ObsDates.Add("2011-06-14");
            ObsDates.Add("2011-02-03");
            ObsDates.Add("2011-02-11");
            ObsDates.Add("2011-02-13");
            ObsDates.Add("2011-03-22");
            ObsDates.Add("2011-04-06");
            ObsDates.Add("2011-04-12");
            ObsDates.Add("2011-04-27");
            ObsDates.Add("2011-06-07");
            ObsDates.Add("2011-02-21");
            ObsDates.Add("2011-03-03");
            ObsDates.Add("2011-03-27");
            ObsDates.Add("2011-04-18");
            ObsDates.Add("2011-05-04");
            ObsDates.Add("2011-05-13");
            ObsDates.Add("2011-05-29");
            ObsDates.Add("2011-06-08");
            ObsDates.Add("2011-05-05");
            ObsDates.Add("2011-05-07");
            ObsDates.Add("2011-05-27");
            ObsDates.Add("2011-05-18");
            ObsDates.Add("2011-06-20");
            ObsDates.Add("2011-08-29");
            ObsDates.Add("2011-09-08");
            ObsDates.Add("2011-09-18");
            ObsDates.Add("2011-09-27");
            ObsDates.Add("2011-10-05");
            ObsDates.Add("2011-10-12");
            ObsDates.Add("2011-10-20");
            ObsDates.Add("2011-10-27");
            ObsDates.Add("2011-11-03");
            ObsDates.Add("2011-11-17");
            ObsDates.Add("2011-11-24");
            ObsDates.Add("2011-12-01");
            ObsDates.Add("2011-12-08");
            ObsDates.Add("2011-12-15");
            ObsDates.Add("2011-12-23");
            ObsDates.Add("2012-01-16");
            ObsDates.Add("2012-02-07");
            ObsDates.Add("2012-02-21");
            ObsDates.Add("2012-02-29");
            ObsDates.Add("2012-03-04");
            ObsDates.Add("2012-03-16");
            ObsDates.Add("2012-03-23");
            ObsDates.Add("2012-04-06");
            ObsDates.Add("2012-04-20");
            ObsDates.Add("2012-04-25");
            ObsDates.Add("2012-05-28");
            ObsDates.Add("2012-06-11");
            ObsDates.Add("2012-07-11");
            ObsDates.Add("2011-11-30");
            ObsDates.Add("2011-12-07");
            ObsDates.Add("2011-12-13");
            ObsDates.Add("2011-12-21");
            ObsDates.Add("2011-12-28");
            ObsDates.Add("2012-01-04");
            ObsDates.Add("2012-01-11");
            ObsDates.Add("2012-01-12");
            ObsDates.Add("2012-02-08");
            ObsDates.Add("2012-02-15");
            ObsDates.Add("2012-02-22");
            ObsDates.Add("2012-03-07");
            ObsDates.Add("2012-03-14");
            ObsDates.Add("2012-03-21");
            ObsDates.Add("2012-03-28");
            ObsDates.Add("2012-03-29");
            ObsDates.Add("2012-04-18");
            ObsDates.Add("2012-05-02");
            ObsDates.Add("2012-05-16");
            ObsDates.Add("2012-05-30");
            ObsDates.Add("2012-06-13");
            ObsDates.Add("2012-01-19");
            ObsDates.Add("2012-01-25");
            ObsDates.Add("2012-02-01");
            ObsDates.Add("2012-02-02");
            ObsDates.Add("2012-04-04");
            ObsDates.Add("2012-04-11");
            ObsDates.Add("2012-04-12");
            ObsDates.Add("2012-03-22");
            ObsDates.Add("2012-05-14");
            ObsDates.Add("2012-05-15");
            ObsDates.Add("2012-04-26");
        }
        
        [EventSubscribe("DoReport")]
        private void OnDoReport(object sender, EventArgs e)
        {
            TodayString = Clock.Today.ToString("yyyy-MM-dd");
            if (ObsDates.Contains(TodayString))
                DataRep.DoOutput();
        }

    }
}
```
          Manager SlurpSowingRule
            SowingDate = 03/14/2011 00:00:00
            CultivarName = Lucerne
            MaxG = 0.006
            R50 = 100
            InitialRootDepth = 15
            RootDepth = 2000
            RFV = 10
            KLReductionFactor = -0.002
            KLReductionDepth = 150
            YKLModifiers =
            XDepth =
```csharp
using Models.Soils;
using APSIM.Shared.Utilities;
using Models.PMF;
using Models.Core;
using System;
        
namespace Models
{
    [Serializable] 
    [System.Xml.Serialization.XmlInclude(typeof(Model))]
    public class Script : Model
    {
        [Link] Plant Slurp;
        [Link] Clock Clock;
        [Link] Soil Soil;
        [Link] Zone zone;
        
        [Description("Cultivar")]
        public string CultivarName { get; set; }
        [Description("Initial Root Depth")]
        public double InitialRootDepth { get; set; }
        [Description("Sowing Date")]
        public DateTime SowingDate { get; set; }
        [Description("Maximum Root Depth")]
        public double RootDepth { get; set; }
        [Description("Roof Front Velocity (RFV)")]
        public double RFV { get; set; }
        [Description("Factor to change Kl modifier with Depth (KLR)")]
        public double KLReductionFactor { get; set; }
        [Description("Depth that KL starts to decline")]
        public double KLReductionDepth { get; set; }
        
        public double[] YKLModifiers { get; set; }
        public double[] XDepth { get; set; }
        private double Depth { get; set; }
        
        [Description("Maximum Stomatal Conductance (MaxG350)")]
        public double MaxG { get; set; }
        [Description("Stomatal Radn response (R50)")]
        public double R50 { get; set; }
        
        [EventSubscribe("DoManagement")]
        private void OnDoManagement(object sender, EventArgs e)
        {
            if (Clock.Today.Date == SowingDate)
            {
                Slurp.Sow(cultivar: CultivarName, population: 1, depth: InitialRootDepth, rowSpacing: 150);
                
                YKLModifiers = new double[Soil.Thickness.Length];
                XDepth = new double[Soil.Thickness.Length];
                Depth = 0;
                for (int layer = 0; layer < Soil.Thickness.Length; layer++)
                {
                    Depth += Soil.Thickness[layer] / 2;  //Add half of the thickness of the current layer so depth is the mid depth of that layer
                    if (Depth <= KLReductionDepth)
                    {
                        YKLModifiers[layer] = 1;
                        XDepth[layer] = Depth;
                    }
                    else
                    {
                        double KLMod = 1 * Math.Exp(-KLReductionFactor * (Depth - KLReductionDepth));
                        YKLModifiers[layer] = KLMod;
                        XDepth[layer] = Depth;
                    }
                    Depth += Soil.Thickness[layer] / 2;  //Add the other half of the current layer so depth is the top of the next layer
                }
                object KLMods = YKLModifiers;
                zone.Set("Slurp.Root.KLModifier.XYPairs.Y", KLMods);
                object Depths = XDepth;
                zone.Set("Slurp.Root.KLModifier.XYPairs.X", Depths);
                object RD = RootDepth;
                zone.Set("Slurp.Root.MaximumRootDepth.FixedValue", RD);
                object RV = RFV;
                zone.Set("Slurp.Root.RootFrontVelocity.Potential.FixedValue", RV);
                object GMaxValue = MaxG;
                zone.Set("Slurp.Leaf.Gsmax350", GMaxValue); 
                object R50Value = R50; 
                zone.Set("Slurp.Leaf.R50", R50Value); 
                
            }
        }
    }
}
```
          Manager SetCropVariables
            CoverFile = C:\Data\Master\03processed-data\CoverDataAshleyDeneSD1.csv
            Datecol = Date
            Ext_coef = -
            MaximumHeight = 395
            Treatment = LightInterception
            Extinctioncoefficient = k
            CoverRead = 0
            leaflai = 0
```csharp
using Models.Soils;
using System.Data;
using APSIM.Shared.Utilities;
using System.Xml.Serialization;
using Models;
using Models.PMF;
using System.Text;
using System.Collections.Generic;
using Models.Core;
using System;
namespace Models
{
    [Serializable] 
    //[System.Xml.Serialization.XmlInclude(typeof(Model))]
    public class Script : Model
    {
        [Link] Plant SCUM;
        [Link] Clock Clock;
        [Link] Zone zone;
        [Link] Simulation Simulation;
        [Link] Soil Soil;
        
        [Description("File of Light interception and Extinction coefficient")]
        public string CoverFile { get; set; }
        [Description("Column name for the date")]
        public string Datecol { get; set; }

        //[Description("Extinction coefficient (if constant).")]
        public double Ext_coef { get; set; }
        [Description("Maximum height of the crop at full cover")]
        public double MaximumHeight { get; set; }
        
        [XmlIgnore] private DataTable Covers { get; set; }
        [Description("Column name for the fractional light interception")]
        public string Treatment { get; set; }
        [Description("Column name for the Extinction coefficient")]
        public string Extinctioncoefficient { get; set; }

        public double CoverRead { get; set; }

        public double leaflai { get; private set; }
                
        [EventSubscribe("StartOfSimulation")]
        private void OnStartOfSimulation(object sender, EventArgs e)
        {
           
            string fullFileName = PathUtilities.GetAbsolutePath(CoverFile, Simulation.FileName);
            
            ApsimTextFile textFile = new ApsimTextFile();
            textFile.Open(fullFileName);
            Covers = textFile.ToTable();
            textFile.Close();
        }
        
        [EventSubscribe("StartOfDay")]
        private void OnStartOfDay(object sender, EventArgs e)
        {
            foreach (DataRow row in Covers.Rows)
            {
                DateTime TodayDate = Convert.ToDateTime(row[Datecol]);
                if (TodayDate.Date == Clock.Today.Date)
                {
                    CoverRead = Convert.ToDouble(row[Treatment]);

                    Ext_coef = Convert.ToDouble(row[Extinctioncoefficient]);
                  
                }
            }
        
            if ((bool)zone.Get("Slurp.IsAlive") == true)
            {
                //Only assign cover valuse if crop is emerged
                
                if (CoverRead == 1)
                    leaflai = Math.Log(0.01) / -Ext_coef;
                else
                {
                    if (CoverRead > 0)
                        leaflai = Math.Log(1 - CoverRead) / -Ext_coef;
                    else
                        leaflai = 0;
                }
                //Summary.WriteMessage(this, "LAI " + leaflai);
                object LAIResetValue = leaflai;
                zone.Set("Slurp.Leaf.Area.FixedValue", LAIResetValue);  
                object HeightResetValue = CoverRead * MaximumHeight;
                zone.Set("Slurp.Leaf.Tallness.FixedValue", HeightResetValue);  
            }
            
            /*if ((Clock.Today.DayOfYear == 160) && (Clock.Today.Year == 2011))
                Soil.SoilWater.Reset();
                */
        }
        /*[EventSubscribe("StartOfDay")]
        private void OnEndOfDay(object sender, EventArgs e)
        {
            if ((Clock.Today.DayOfYear == 66) && (Clock.Today.Year == 2012) && (Irrigation == "Rain"))
            {
                if (Cover == "Lucerne")
                {
                    double[] ValuesToSet = { 0.18, 0.21, 0.20, 0.06, 0.05, 0.06, 0.07, 0.08, 0.10, 0.14, 0.14, 0.14, 0.14 };
                    Soil.SoilWater.SW = ValuesToSet;
                }
                if (Cover == "Ryegrass")
                {
                    double[] ValuesToSet = { 0.14, 0.20, 0.25, 0.11, 0.07, 0.08, 0.09, 0.09, 0.11, 0.14, 0.14, 0.14, 0.14 };
                    Soil.SoilWater.SW = ValuesToSet;
                }
            }
        }*/
    }
}
```
        Soil: Latitude=0; Longitude=0
          Chemical
            Thickness  NO3N     NH4N  PH
            100        180.833  0     6.6
            200        12.5     0     6.2
            300        1.38889  0     5.7
            300        1.38889  0     5.5
            300        0        0     5.5
            300        0        0     5.5
          Physical
            Thickness  BD   AirDry  LL15   DUL    SAT
            150        1.2  0.05    0.1    0.29   0.46
            150        1.2  0.1     0.1    0.28   0.46
            100        1.2  0.09    0.09   0.35   0.48
            200        1.2  0.021   0.021  0.145  0.32
            200        1.2  0.036   0.036  0.1    0.24
            200        1.2  0.041   0.041  0.1    0.24
            200        1.2  0.043   0.043  0.11   0.25
            200        1.2  0.037   0.037  0.12   0.26
            200        1.2  0.052   0.052  0.14   0.27
            200        1.2  0.05    0.05   0.14   0.27
            200        1.2  0.05    0.05   0.14   0.27
            200        1.2  0.05    0.05   0.14   0.27
            400        1.2  0.05    0.05   0.14   0.27
            SoilCrop SlurpSoil
              LL=[0.1, 0.1, 0.09, 0.021, 0.036, 0.041, 0.043, 0.037, 0.052, 0.05, 0.05, 0.05, 0.05]
              KL=[0.06, 0.06, 0.06, 0.06, 0.06, 0.06, 0.06, 0.06, 0.06, 0.06, 0.06, 0.06, 0.06]
              XF=[1, 1, 1, 1, 1, 1, 1, 1, 1, 1, 1, 1, 1]
          WaterBalance SoilWater: SummerDate=1-Nov; SummerU=9; SummerCona=4.4; WinterDate=1-Apr; WinterU=9; WinterCona=4.4; DiffusConst=0; DiffusSlope=0; Salb=0.18; CN2Bare=68; CNRed=20; CNCov=0.8; Slope=0; DischargeWidth=0; CatchmentArea=0
            Thickness  SWCON  KLAT
            150        0.7    0
            150        0.7    0
            100        0.95   0
            200        0.95   0
            200        0.95   0
            200        0.95   0
            200        0.95   0
            200        0.95   0
            200        0.95   0
            200        0.95   0
            200        0.95   0
            200        0.95   0
            400        0.95   0
          SoilNitrogen: fom_types=[default, manure, mucuna, lablab, shemp, stable]; fract_carb=[0.2, 0.3, 0.54, 0.57, 0.45, 0]; fract_cell=[0.7, 0.3, 0.37, 0.37, 0.47, 0.1]; fract_lign=[0.1, 0.4, 0.09, 0.06, 0.08, 0.9]
            SoilNitrogenNO3 NO3
            SoilNitrogenNH4 NH4
            SoilNitrogenUrea Urea
            SoilNitrogenPlantAvailableNO3 PlantAvailableNO3
            SoilNitrogenPlantAvailableNH4 PlantAvailableNH4
          Organic: FOMCNRatio=30
            Thickness  Carbon  SoilCNRatio  FBiom  FInert  FOM
            100        1.82    11.5         0.025  0.3     1243.93
            200        1.47    11.5         0.025  0.4     833.832
            300        1.2     11.5         0.015  0.75    457.617
            300        1.03    11.5         0.01   0.9     251.145
            300        0.47    11.5         0.01   0.96    137.831
            300        0.47    11.5         0.01   0.96    75.6435
          Sample Initial nitrogen: Thickness=[100, 200, 300, 300, 300, 300]; SWUnits=Volumetric; OCUnits=Total; PHUnits=Water
          Sample Initial water: SWUnits=Volumetric; OCUnits=Total; PHUnits=Water
            Thickness=[150, 150, 100, 200, 200, 200, 200, 200, 200, 200, 200, 200, 400]
            SW=[0.32, 0.32, 0.32, 0.166, 0.102, 0.105, 0.115, 0.117, 0.126, 0.126, 0.126, 0.126, 0.126]
          CERESSoilTemperature
        Plant Slurp: CropType=Slurp
        MicroClimate: a_interception=0; b_interception=1; c_interception=0; d_interception=0; soil_albedo=0.23; SoilHeatFluxFraction=0.4; MinimumHeightDiffForNewLayer=0; NightInterceptionFraction=0.5; ReferenceHeight=2
        Irrigation
        Fertiliser
        SurfaceOrganicMatter surface organic matter: InitialResidueName=wheat; InitialResidueType=wheat; InitialResidueMass=2000; InitialStandingFraction=0; InitialCPR=0; InitialCNR=80
        Report: EventNames=[Clock].DoReport
          VariableNames:
            [Clock].Today
            [SlurpSowingRule].Script.KLReductionDepth as InitialDepth
            [SlurpSowingRule].Script.KLReductionFactor as KLR
            [SlurpSowingRule].Script.RFV as RFV
            [SetCropVariables].Script.Ext_coef as k
            [Slurp].Leaf.CoverTotal as cover
            [Slurp].Leaf.LAI as LAI
            [Soil].SoilWater.SW as SW
            [Slurp].Root.Depth as RootDepth
            [Slurp].Leaf.Height as Height
            sum([Soil].SoilWater.SWmm) as PSWC
        Report SummaryNumbers: EventNames=[Clock].EndOfSimulation
          VariableNames:
            [Clock].Today as Date
            [SlurpSowingRule].Script.CultivarName as CropNameCheck
            [SlurpSowingRule].Script.KLReductionFactor as KLRCheck
            [SlurpSowingRule].Script.RootDepth as RDpCheck
            [SlurpSowingRule].Script.RFV as RFVCheck
            [SlurpSowingRule].Script.YKLModifiers as KLmodCheck
            [SlurpSowingRule].Script.XDepth as KLdepCheck
            [SetCropVariables].Script.Ext_coef as k
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