Simulations: Version=92
  DataStore
    ExcelInput ProfileSWC: SheetNames=[ProfileSWC]
      FileNames=[%root%\Tests\Validation\Slurp\ShallowSoilTest\SoilWaterContent.xlsx]
    ExcelInput LayerSWC: SheetNames=[LayerSWC]
      FileNames=[%root%\Tests\Validation\Slurp\ShallowSoilTest\SoilWaterContent.xlsx]
    Input Cover: FileNames=[C:\Data\Master\03processed-data\LAIAshleyDeneSD1.csv]
    Input: FileNames=[C:\Data\Master\03processed-data\LAIAshleyDeneSD1.csv]
    PredictedObserved ProfileWater: PredictedTableName=Report; ObservedTableName=ProfileSWC; FieldNameUsedForMatch=Clock.Today
      Tests: POName=ProfileWater
        AcceptedStats:
          {Name=PSWC, n=448, Slope=0.755295, Intercept=46.6419, SEslope=0.0326356, SEintercept=7.32217, R2=0.545645, RMSE=34.8308, NSE=0.442165, ME=-7.0615, MAE=26.9238, RSR=0.746049}
        AcceptedStatsName=Name n Slope Intercept SEslope SEintercept R2 RMSE NSE ME MAE RSR
    PredictedObserved CanopyCover: PredictedTableName=Report; ObservedTableName=Cover; FieldNameUsedForMatch=Clock.Today
      Tests: POName=CanopyCover
        AcceptedStats:
          {Name=Slurp.Leaf.CoverTotal, n=824, Slope=1.01351, Intercept=-0.0419308, SEslope=0.00703231, SEintercept=0.00556681, R2=0.961932, RMSE=0.0684226, NSE=0.947707, ME=-0.0320311, MAE=0.0331172, RSR=0.228538}
        AcceptedStatsName=Name n Slope Intercept SEslope SEintercept R2 RMSE NSE ME MAE RSR
  Simulation SlurpExample
    Memo
      This is a simple test that plants SLURP, changes its leaf area index and potential biomass production on one occasion and presents some graphs of Plant, N and Water balance components to show things are working.
    Weather: FileName=%root%\Examples\WeatherFiles\lincoln.met
    Clock: Start=2010-10-20; End=2012-07-31
    Summary
    SoilArbitrator Soil Arbitrator
    Zone Field: Area=1; Slope=0; AspectAngle=0; Altitude=50
      Folder ManagerFolder
        Manager SlurpSowingRule
          CultivarName = StaticCrop
          InitialRootDepth = 600
          SowingDate = 10/21/2010 00:00:00
```csharp
using APSIM.Shared.Utilities;
using Models.PMF;
using Models.Core;
using System;
        
namespace Models
{
    [Serializable] 
    [System.Xml.Serialization.XmlInclude(typeof(Model))]
    public class Script : Model
    {
        [Link] Plant Slurp;
        [Link] Clock Clock;

        [Description("Cultivar")]
        [Display(Type=DisplayType.CultivarName, PlantName = "Slurp")]
        public string CultivarName { get; set; }
        [Description("Initial Root Depth")]
        public double InitialRootDepth { get; set; }
        [Description("Sowing Date")]
        public DateTime SowingDate { get; set; }

               
        [EventSubscribe("DoManagement")]
        private void OnDoManagement(object sender, EventArgs e)
        {
            if (Clock.Today.Date == SowingDate)
                Slurp.Sow(cultivar: CultivarName, population: 1, depth: InitialRootDepth, rowSpacing: 150);
            //Potato.Sow(... Contains the following arguements:
            //Population  double  Optional  Seeds sowing/m2.  Default is zero
            //Cultivar    string  Required  "NameOfCultivar"
            //Depth       double  Optional  Depth (mm) seed sown.   Default is 100mm 
            //MaxCover    double  Optional  Proportion (0-1) of the ground row crop will cover.   Default is 1.0
            //BudNumber   double  Optional  Number of mainstems per seed sown.  Default is 1.0
            //RowSpacing  double  Optional  Spaceing (mm) between drill rows when crop is sown.  Default is 150mm
            //CropClass   string  Optional  Crop class to instantiate when crop is sown.  Default is "Plant"
        }
    }
}
```
        Manager SetCropVariables
          CoverFile = C:\Data\Master\03processed-data\CoverDataAshleyDeneSD1.csv
          Ext_coef = 0.8
          MaximumHeight = 600
          Cover = LAImod
          Treatment =
          leaflai = 0
```csharp
using Models.Soils;
using System.Data;
using APSIM.Shared.Utilities;
using System.Xml.Serialization;
using Models;
using Models.PMF;
using System.Text;
using System.Collections.Generic;
using Models.Core;
using System;
namespace Models
{
    [Serializable] 
    //[System.Xml.Serialization.XmlInclude(typeof(Model))]
    public class Script : Model
    {
        [Link] Plant SCUM;
        [Link] Clock Clock;
        [Link] Zone zone;
        [Link] Simulation Simulation;
        [Link] Soil Soil;
        
        [Description("File of Yields")]
        public string CoverFile { get; set; }
        [Description("Extinction coefficient")]
        public  double Ext_coef { get; set; }
        [Description("Maximum height of the crop at full cover")]
        public double MaximumHeight { get; set; }
        
        [XmlIgnore] private DataTable Covers { get; set; }

        [Description("Column name for the LAI data")]
        public string Cover { get; set; }
        //public string Irrigation { get; set; }

        public string Treatment { get; set; }
        
        private double CoverRead { get; set; }
        public double leaflai { get; private set; }
                
        [EventSubscribe("StartOfSimulation")]
        private void OnStartOfSimulation(object sender, EventArgs e)
        {
            
            Treatment = Cover;
            
            string fullFileName = PathUtilities.GetAbsolutePath(CoverFile, Simulation.FileName);
            
            ApsimTextFile textFile = new ApsimTextFile();
            textFile.Open(fullFileName);
            Covers = textFile.ToTable();
            textFile.Close();
        }
        
        [EventSubscribe("StartOfDay")]
        private void OnStartOfDay(object sender, EventArgs e)
        {
            foreach (DataRow row in Covers.Rows)
            {
                DateTime TodayDate = Convert.ToDateTime(row["Clock.Today"]);
                if (TodayDate.Date == Clock.Today.Date)
                {
                    CoverRead = Convert.ToDouble(row[Treatment]);
                }
            }
        
            if ((bool)zone.Get("Slurp.IsAlive") == true)
            {
                //Only assign cover valuse if crop is emerged
                
                /*if (CoverRead == 1)
                    leaflai = Math.Log(0.01) / -Ext_coef;
                else
                {
                    if (CoverRead > 0)
                        leaflai = Math.Log(1 - CoverRead) / -Ext_coef;
                    else
                        leaflai = 0;
                }
                */
                leaflai = CoverRead;
                //Summary.WriteMessage(this, "LAI " + leaflai);
                object LAIResetValue = leaflai;
                zone.Set("Slurp.Leaf.Area.FixedValue", LAIResetValue);  
                object HeightResetValue = CoverRead * MaximumHeight;
                zone.Set("Slurp.Leaf.Tallness.FixedValue", HeightResetValue);  
            }
            
          
        }

    }
}
```
      Soil: Latitude=0; Longitude=0
        Chemical
          Thickness  NO3N     NH4N  PH
          100        14.1667  0     6.6
          200        12.5     0     6.2
          300        1.38889  0     5.7
          300        1.38889  0     5.5
          300        0        0     5.5
          300        0        0     5.5
        InitialWater Initial water: PercentMethod=1; FractionFull=1
        Physical
          Thickness  BD   AirDry  LL15  DUL   SAT
          100        1.2  0.08    0.13  0.33  0.5
          200        1.2  0.13    0.13  0.33  0.5
          300        1.2  0.1     0.1   0.31  0.44
          300        1.2  0.06    0.06  0.3   0.46
          300        1.2  0.04    0.04  0.3   0.44
          300        1.2  0.02    0.02  0.3   0.44
          SoilCrop SlurpSoil: LL=[0.13, 0.13, 0.1, 0.08, 0.11, 0.11]; KL=[0.06, 0.06, 0.06, 0.06, 0.06, 0.06]; XF=[1, 1, 1, 1, 1, 1]
          SoilCrop PotatoSoil: LL=[0.13, 0.13, 0.27, 0.27, 0.3, 0.3]; KL=[0.1, 0.06, 0.03, 0.01, 0, 0]; XF=[1, 1, 0.1, 0, 0, 0]
        WaterBalance SoilWater: SummerDate=1-Nov; SummerU=9; SummerCona=4.4; WinterDate=1-Apr; WinterU=9; WinterCona=4.4; DiffusConst=88; DiffusSlope=35.4; Salb=0.18; CN2Bare=68; CNRed=20; CNCov=0.8; Slope=0; DischargeWidth=0; CatchmentArea=0
          Thickness  SWCON  KLAT
          100        0.55   0
          200        0.55   0
          300        0.55   0
          300        0.55   0
          300        0.55   0
          300        0.55   0
        Organic: FOMCNRatio=30
          Thickness  Carbon  SoilCNRatio  FBiom  FInert  FOM
          100        1.82    11.5         0.025  0.3     1243.93
          200        1.47    11.5         0.025  0.4     833.832
          300        1.2     11.5         0.015  0.75    457.617
          300        1.03    11.5         0.01   0.9     251.145
          300        0.47    11.5         0.01   0.96    137.831
          300        0.47    11.5         0.01   0.96    75.6435
        Sample Initial nitrogen: Thickness=[100, 200, 300, 300, 300, 300]; SWUnits=Volumetric; OCUnits=Total; PHUnits=Water
        CERESSoilTemperature
        Nutrient
      Plant Slurp: CropType=Slurp
      MicroClimate: a_interception=0; b_interception=1; c_interception=0; d_interception=0; soil_albedo=0.23; SoilHeatFluxFraction=0.4; MinimumHeightDiffForNewLayer=0; NightInterceptionFraction=0.5; ReferenceHeight=2
      Irrigation
      Fertiliser
      SurfaceOrganicMatter surface organic matter: InitialResidueName=wheat; InitialResidueType=wheat; InitialResidueMass=2000; InitialStandingFraction=0; InitialCPR=0; InitialCNR=80
      Report: EventNames=[Clock].DoReport
        VariableNames:
          [Clock].Today
          [Slurp].Leaf.CoverTotal
          [Slurp].Leaf.CoverDead
          [Slurp].Leaf.LAI
          [Slurp].Leaf.Height
          [Slurp].Leaf.Fw
          [Slurp].Leaf.Fn
          [Slurp].Leaf.Transpiration
          [Slurp].Leaf.WaterDemand
          [Slurp].Root.Depth
          ([Soil].SoilWater.LeachNH4 + [Soil].SoilWater.LeachNO3 + [Soil].SoilWater.LeachUrea) as Leach
          [Soil].SoilWater.Eo
          [Soil].SoilWater.Es
          [Soil].SoilWater.Drainage
          [Soil].SoilWater.Runoff
          [Soil].SoilWater.pond
          [Slurp].Root.WaterUptake
          [Weather].Rain
          sum([Soil].SoilWater.SWmm) - sum([Soil].DULmm) as SoilWaterDeficit
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