Simulations: Version=107
  Replacements
    Plant Slurp: CropType=Slurp; IsAlive=false; IsEnding=false; DaysAfterEnding=0
      Memo TitlePage
        # SLURP: the Sound of a crop using water

        This model has been built using the Plant Modelling Framework (PMF) of [brown_plant_2014] to provide a simple representation of crops.  It is usefull for water and nitrogen balance studies where the focus is on soil processes and a very simple crop is adequate.  The model does not predict crop growth, development or yields.  It simply takes up water and nitrogen.   .

        SLURP has no phenology so the behaviour of the SLURP is the same throughout its ontology (with the exception of root depth being able to increase).  SLURP consists of 2 organs:

           1. Leaf which ls represented with a Simpleleaf class and provides a Water uptake demand to the soil arbitrator.
           2. Root which extracts water and nitrogen from the soil for plant growth

        #Inclusion in APSIM simulations
        A Slurp crop is included in a simulation the same as any other APSIM crop

         * The Slurp object needs to be dragged or copied from the Crop folder in the tool box into the field of your simulation.
         * It is then planted with a sowing rule
        ~~~
        Slurp.Sow(cultivar: StaticCrop, population: 1, depth: 10, rowSpacing: 150);
        ~~~
          * Note that SLURP has no notion of population or rowSpacing but these parameters are required by the Sow method so filler values are provided
          * `depth` in the Sow arguement is the depth that the crop is sown at.  While this has no effect on emergence in SLURP it sets the depth that the root system is initialised at.  For static crops this depth should be set to the rooting depth that is expected as roots will not grow during the simulation

        #Altering Slurp properties during runs
        In some cases users will wish to change properties of Slurp while the simulation is running.  This can be done using a the set method in a manager script.

        ~~~
        object LAIResetValue = leaflai;
        zone.Set("Slurp.Leaf.LAIFunction.Value()", LAIResetValue);
        object HeightResetValue = CoverToday * MaximumHeight;
        zone.Set("Slurp.Leaf.HeightFunction.Value()", HeightResetValue);
        ~~~
      Phenology
        Constant ThermalTime: FixedValue=1; Units=days
        GenericPhase Initial: Start=Initialisation; End=Sowing
          VariableReference Progression: VariableName=[Phenology].ThermalTime
          Constant Target: FixedValue=0; Units=d
        GenericPhase Ongoing: Start=Sowing; End=Never
          VariableReference Progression: VariableName=[Phenology].ThermalTime
          Constant Target: FixedValue=1e+15; Units=d
      OrganArbitrator Arbitrator
        BiomassTypeArbitrator DMArbitration
          Folder PotentialPartitioningMethods
            ReallocationMethod
            AllocateFixationMethod
            RetranslocationMethod
            SendPotentialDMAllocationsMethod
          Folder AllocationMethods
            NutrientConstrainedAllocationMethod
            DryMatterAllocationsMethod
          PrioritythenRelativeAllocation ArbitrationMethod
        BiomassTypeArbitrator NArbitration
          Folder PotentialPartitioningMethods
            ReallocationMethod
          Folder ActualPartitioningMethods
            AllocateFixationMethod
            RetranslocationMethod
          Folder AllocationMethods
            NitrogenAllocationsMethod
          PrioritythenRelativeAllocation ArbitrationMethod
          AllocateUptakesMethod
        WaterUptakeMethod
        NitrogenUptakeMethod
      Root: GrowthRespiration=0; MaintenanceRespiration=0
        RootShapeCylindre RootShape
        MultiplyFunction RootFrontVelocity
          HourlyInterpolation TemperatureEffect: agregationMethod=0
            XYPairs Response: X=[0, 26, 35]; Y=[0, 1, 1]
            ThreeHourSin InterpolationMethod
          Constant Potential: FixedValue=0; Units=mm/d
          Constant DMConversionEfficiency: FixedValue=1
        Constant MaxDailyNUptake: FixedValue=1; Units=g/m2
        Constant DMConversionEfficiency: FixedValue=1; Units=g/m2
        Constant RemobilisationCost: FixedValue=0
        Constant MaximumRootDepth: FixedValue=1000; Units=mm
        Constant NitrogenDemandSwitch: FixedValue=1; Units=0-1
        Constant MaximumNConc: FixedValue=0.01
        Constant MinimumNConc: FixedValue=0.01
        LinearInterpolationFunction KLModifier
          XYPairs: X=[0, 400, 1500]; Y=[1, 1, 0]
          Memo Description
            This is important in SLURP as it is set for each species to represent their differences in rooting patterns between crop species
          VariableReference XValue: VariableName=[Root].LayerMidPointDepth
        Constant SenescenceRate: FixedValue=0; Units=/d
        Constant SpecificRootLength: FixedValue=105; Units=m/g
        LinearInterpolationFunction KNO3
          XYPairs: X=[0, 0.003]; Y=[0.02, 0.02]
          VariableReference XValue: VariableName=[Root].LengthDensity
        LinearInterpolationFunction KNH4
          XYPairs: X=[0, 0.003]; Y=[0, 0]
          VariableReference XValue: VariableName=[Root].LengthDensity
        BiomassRemoval BiomassRemovalDefaults
          OrganBiomassRemovalType Harvest: FractionLiveToRemove=0; FractionDeadToRemove=0; FractionLiveToResidue=0; FractionDeadToResidue=0
          OrganBiomassRemovalType Cut: FractionLiveToRemove=0; FractionDeadToRemove=0; FractionLiveToResidue=0; FractionDeadToResidue=0
          OrganBiomassRemovalType Prune: FractionLiveToRemove=0; FractionDeadToRemove=0; FractionLiveToResidue=0; FractionDeadToResidue=0
          OrganBiomassRemovalType Graze: FractionLiveToRemove=0; FractionDeadToRemove=0; FractionLiveToResidue=0; FractionDeadToResidue=0
        LinearInterpolationFunction NUptakeSWFactor
          XYPairs: X=[0, 1]; Y=[0, 1]
          VariableReference XValue: VariableName=[Root].RWC
        Constant CarbonConcentration: FixedValue=0.4
        Constant MaintenanceRespirationFunction: FixedValue=0
        BiomassDemand DMDemands
          MultiplyFunction Structural
            PartitionFractionDemandFunction DMDemandFunction
              Constant PartitionFraction: FixedValue=0; Units=0-1
            Constant StructuralFraction: FixedValue=1
          Constant Metabolic: FixedValue=0
          StorageDMDemandFunction Storage
            SubtractFunction StorageFraction
              Constant One: FixedValue=1
              VariableReference StructuralFraction: VariableName=[Root].DMDemands.Structural.StructuralFraction
        BiomassDemand NDemands
          MultiplyFunction Structural
            VariableReference MinNconc: VariableName=[Root].minimumNconc
            VariableReference PotentialDMAllocation: VariableName=[Root].potentialDMAllocation.Structural
          MultiplyFunction Metabolic
            SubtractFunction MetabolicNconc
              VariableReference CritNconc: VariableName=[Root].criticalNConc
              VariableReference MinNconc: VariableName=[Root].minimumNconc
            VariableReference PotentialDMAllocation: VariableName=[Root].potentialDMAllocation.Structural
          StorageNDemandFunction Storage
            VariableReference NitrogenDemandSwitch: VariableName=[Root].nitrogenDemandSwitch
            VariableReference MaxNconc: VariableName=[Root].maximumNconc
        VariableReference CriticalNConc: VariableName=[Root].MinimumNConc
        BiomassDemand InitialWt
          Constant Structural: FixedValue=0.005; Units=g/plant
          Constant Metabolic: FixedValue=0
          Constant Storage: FixedValue=0
      SimpleLeaf Leaf: Albedo=0.018; Gsmax350=0.01; R50=200; LeafInitialisationStage=Sowing; Height=0; BaseHeight=0; Width=0; FRGR=0; PotentialEP=0; WaterDemand=0; KDead=0; LAIDead=0
        Constant StomatalConductanceCO2Modifier: FixedValue=1
        Constant DetachmentRate: FixedValue=0; Units=/d
        Constant RemobilisationCost: FixedValue=0
        MultiplyFunction InitialWt
          Constant InitialPlantWt: FixedValue=0; Units=g/plant
          VariableReference Population: VariableName=[Plant].Population
        Constant LaiDead: FixedValue=0; Units=m^2/m^2
        Constant Photosynthesis: FixedValue=5; Units=g/m2/d
        HourlyInterpolation FRGR: agregationMethod=0
          XYPairs Response: X=[0, 10, 25, 40]; Y=[0, 1, 1, 0]
          ThreeHourSin InterpolationMethod
        Constant MaximumNConc: FixedValue=0.05; Units=g/g
        Constant MinimumNConc: FixedValue=0.05; Units=g/g
        Constant Area: FixedValue=5; Units=m2/m2
        Constant ExtinctionCoefficient: FixedValue=0.7
        Constant Tallness: FixedValue=400; Units=mm
        Constant NReallocationFactor: FixedValue=0
        Constant SenescenceRate: FixedValue=0
        BiomassRemoval BiomassRemovalDefaults: same as Replacements.Slurp.Root.BiomassRemovalDefaults
        Constant MaintenanceRespiration: FixedValue=0; Units=0-1
        Constant DMConversionEfficiency: FixedValue=1; Units=0-1
        Constant NRetranslocationFactor: FixedValue=0
        Constant NitrogenDemandSwitch: FixedValue=1
        Constant DMReallocationFactor: FixedValue=0
        Constant DMRetranslocationFactor: FixedValue=0
        VariableReference CriticalNConc: VariableName=[Leaf].MinimumNConc
        Constant CarbonConcentration: FixedValue=0.4
        BiomassDemand DMDemands
          MultiplyFunction Structural
            PartitionFractionDemandFunction DMDemandFunction
              Constant PartitionFraction: FixedValue=1; Units=0-1
            Constant StructuralFraction: FixedValue=0.5; Units=0-1
          Constant Metabolic: FixedValue=0
          StorageDMDemandFunction Storage
            SubtractFunction StorageFraction
              Constant One: FixedValue=1
              VariableReference StructuralFraction: VariableName=[Leaf].DMDemands.Structural.StructuralFraction
        BiomassDemand NDemands
          MultiplyFunction Structural
            VariableReference MinNconc: VariableName=[Leaf].minimumNconc
            VariableReference PotentialDMAllocation: VariableName=[Leaf].potentialDMAllocation.Structural
          MultiplyFunction Metabolic
            SubtractFunction MetabolicNconc
              VariableReference CritNconc: VariableName=[Leaf].criticalNConc
              VariableReference MinNconc: VariableName=[Leaf].minimumNconc
            VariableReference PotentialDMAllocation: VariableName=[Leaf].potentialDMAllocation.Structural
          StorageNDemandFunction Storage
            VariableReference NitrogenDemandSwitch: VariableName=[Leaf].nitrogenDemandSwitch
            VariableReference MaxNconc: VariableName=[Leaf].maximumNconc
      Cultivar StaticCrop
        Memo Description
          The static crop is the base crop and uses all the paramaters values specified above.
      Cultivar StaticTree
        Command:
          [Root].MaximumRootDepth.FixedValue = 2600
          [Leaf].ExtinctionCoefficient.FixedValue = 0.65
          [Leaf].Tallness.FixedValue = 5000
          [Root].KLModifier.XYPairs.X = 0, 400, 500, 1000, 1500, 2000
          [Root].KLModifier.XYPairs.Y = 1, 1, 0.9, 0.6, 0.3, 0.1
        Memo Description
          The static tree is similar to the static crop but is taller, has a deeper root system and a lower extinction coefficient
      Cultivar Pasture
        Command:
          [Root].MaximumRootDepth.FixedValue = 800
          [Root].RootFrontVelocity.Potential.FixedValue = 10
          [Leaf].ExtinctionCoefficient.FixedValue = 0.65
          [Root].KLModifier.XYPairs.X = 0, 200, 300, 500, 1000
          [Root].KLModifier.XYPairs.Y = 1, 1, 0.2, 0.03, 0.0
          [Leaf].Gsmax350 = 0.004
          [Leaf].R50 = 175
        Memo Description
          The pasture differs from the base crop because its has a RootFrontVelocity of 15 (as opposed to zero) which means the roots grow downward from sowing untill the MaximumRootDepth is reached.  It ExtinctionCoefficient and MaximumRootDepth are different to the base StaticCrop and it has a different pattern of kl with depth.
      Cultivar Lucerne
        Command:
          [Root].MaximumRootDepth.FixedValue = 2500
          [Root].RootFrontVelocity.Potential.FixedValue = 11
          [Leaf].ExtinctionCoefficient.FixedValue = 0.8
          [Root].KLModifier.XYPairs.X = 0, 200, 500, 1000, 1500, 2000
          [Root].KLModifier.XYPairs.Y = 1, 1, 0.5, 0.2, 0.08, 0.03
          [Leaf].Gsmax350 = 0.006
          [Leaf].R50 = 150
        Memo Description
          Lucerne also grows root depth like pasture but has a greater root depth, different kl pattern and different extinction coefficient
      Cultivar Slurp
        Command:
          [Root].MaximumRootDepth.FixedValue = 2500
          [Root].RootFrontVelocity.Potential.FixedValue = 11
          [Leaf].ExtinctionCoefficient.FixedValue = 0.8
          [Root].KLModifier.XYPairs.X = 0, 200, 500, 1000, 1500, 2000
          [Root].KLModifier.XYPairs.Y = 1, 1, 0.5, 0.2, 0.08, 0.03
          [Leaf].Gsmax350 = 0.006
          [Leaf].R50 = 150
        Memo Description
          Slurp also grows root depth like pasture but has a greater root depth, different kl pattern and different extinction coefficient
    Report: EventNames=[Clock].DoReport
      VariableNames:
        [Clock].Today
        [Soil].Physical.SlurpSoil.KL[1] as SKL
        [Weather].Rain as Rainfall
        [SetCropVariables].Script.Ext_coef as k
        [Slurp].Leaf.CoverTotal as cover
        [Slurp].Leaf.LAI as LAI
        [Slurp].Leaf.Height as Height
        [Slurp].Root.Depth as RootDepth
        [Soil].SoilWater.SW as SW
        sum([Soil].SoilWater.SWmm) as SWC
    Report SummaryNumbers: EventNames=[Clock].EndOfSimulation
      VariableNames:
        [Clock].Today
        [SlurpSowingRule].Script.CultivarName as CropNameCheck
        [Soil].Physical.SlurpSoil.KL as kl
        //[SlurpSowingRule].Script.KLReductionFactor as KLRCheck
        [SlurpSowingRule].Script.RootDepth as RDpCheck
        [SlurpSowingRule].Script.RFV as RFVCheck
        [SlurpSowingRule].Script.YKLModifiers as KLmodCheck
        [SlurpSowingRule].Script.XDepth as KLdepCheck
        [SetCropVariables].Script.CoverRead as CoverCheck
  DataStore
    ExcelInput ObsAllData: FileNames=[C:\Data\Master\03processed-data\20200630Whole.xlsx]; SheetNames=[Observed]
    PredictedObserved: PredictedTableName=Report; ObservedTableName=Observed; FieldNameUsedForMatch=Clock.Today; AllColumns=false
  Folder NewZealand
    Experiment Iversen12
      DisabledSimNames=[Iversen12SowingDateSD9, Iversen12SowingDateSD10, Iversen_12SowingDateSD10, Iversen_12SowingDateSD9, Iversen_12SowingDateSD8, Iversen_12SowingDateSD7, Iversen_12SowingDateSD6, Iversen_12SowingDateSD5, Iversen_12SowingDateSD4, Iversen_12SowingDateSD3]
      Factors
        Factor SowingDate
          CompositeFactor SD1
            Specifications:
              [SlurpSowingRule].Script.SowingDate = 2010-10-04
              [Clock].StartDate = 2010-10-04
              [Soil]
              [SetCropVariables].Script.CoverFile = C:\Data\Master\03processed-data\CoverData\LAIIversen12SD1.csv
              [SlurpSowingRule].Script.RFV = 15
            Soil: SoilType=Udic Haplustept (US), Pallic orthic brown soil (NZ); Site=Ashley Dene: Lincoln University Research Farm; NearestTown=Lincoln; Country=New Zealand; Latitude=999999; Longitude=999999
              Comments=Soil water characterised from NNM (2 years). Stone content and BD  from Di and Cameron 2002. Soil saturation from Cichota 2013.
              Chemical
                Thickness  NO3N  NH4N  PH
                200        31    8     6
                100        1.5   0.05  -
                100        1     0.03  -
                100        1     0.01  -
                100        1     0.01  -
                100        0.7   0.01  -
                100        0.5   0.01  -
                100        0.5   0.01  -
                100        0.5   0.01  -
                100        0.5   0.01  -
                100        0.5   0.01  -
                100        0.5   0.01  -
                100        0.5   0.01  -
                100        0.5   0.01  -
                100        0.5   0.01  -
                100        0.5   0.01  -
                100        0.5   0.01  -
                100        0.05  0.01  -
                100        0.05  0.01  -
                100        0.05  0.01  -
                100        0.05  0.01  -
                100        0     0     -
              Physical
                Thickness  BD    AirDry  LL15   DUL    SAT
                200        1.15  0.092   0.092  0.361  0.361
                100        1.15  0.138   0.138  0.358  0.358
                100        1.31  0.128   0.128  0.305  0.305
                100        1.31  0.108   0.108  0.288  0.288
                100        1.95  0.092   0.092  0.29   0.29
                100        1.95  0.09    0.09   0.3    0.3
                100        1.95  0.094   0.094  0.306  0.306
                100        1.95  0.113   0.113  0.323  0.323
                100        1.95  0.139   0.139  0.329  0.329
                100        1.95  0.126   0.126  0.322  0.322
                100        1.95  0.11    0.11   0.31   0.31
                100        1.95  0.094   0.094  0.293  0.293
                100        1.95  0.102   0.102  0.309  0.309
                100        1.95  0.11    0.11   0.341  0.341
                100        1.95  0.162   0.162  0.346  0.346
                100        1.95  0.213   0.213  0.353  0.353
                100        1.95  0.226   0.226  0.37   0.37
                100        1.95  0.249   0.249  0.379  0.379
                100        1.95  0.259   0.259  0.369  0.369
                100        1.95  0.269   0.269  0.37   0.37
                100        1.95  0.275   0.275  0.368  0.368
                100        1.95  0.281   0.281  0.368  0.368
                SoilCrop SlurpSoil
                  LL=[0.092, 0.138, 0.128, 0.108, 0.092, 0.09, 0.094, 0.113, 0.139, 0.126, 0.11, 0.094, 0.102, 0.11, 0.162, 0.213, 0.226, 0.249, 0.259, 0.269, 0.275, 0.281]
                  KL=[0.085, 0.0808545, 0.0769112, 0.0731602, 0.0695921, 0.0661981, 0.0629695, 0.0598985, 0.0569772, 0.0541984, 0.0515551, 0.0490407, 0.046649, 0.0443739, 0.0422098, 0.0401512, 0.038193, 0.0363303, 0.0345584, 0.032873, 0.0312698, 0.0297447]
                  XF=[1, 1, 1, 1, 1, 1, 1, 1, 1, 1, 1, 1, 1, 1, 1, 1, 1, 1, 1, 1, 1, 1]
              WaterBalance SoilWater: SummerDate=1-Oct; SummerU=5; SummerCona=4.4; WinterDate=1-Mar; WinterU=5; WinterCona=2.5; DiffusConst=88; DiffusSlope=35.4; Salb=0.18; CN2Bare=68; CNRed=20; CNCov=0.8
                Thickness=[200, 100, 100, 100, 100, 100, 100, 100, 100, 100, 100, 100, 100, 100, 100, 100, 100, 100, 100, 100, 100, 100]
                SWCON=[0.99, 0.99, 0.99, 0.99, 0.99, 0.99, 0.99, 0.99, 0.99, 0.99, 0.99, 0.99, 0.99, 0.99, 0.99, 0.99, 0.99, 0.99, 0.99, 0.99, 0.99, 0.99]
              SoilNitrogen: fom_types=[default, manure, mucuna, lablab, shemp, stable]; fract_carb=[0.2, 0.3, 0.54, 0.57, 0.45, 0]; fract_cell=[0.7, 0.3, 0.37, 0.37, 0.47, 0.1]; fract_lign=[0.1, 0.4, 0.09, 0.06, 0.08, 0.9]; NPartitionApproach=0
                SoilNitrogenNO3 NO3
                SoilNitrogenNH4 NH4
                SoilNitrogenUrea Urea
                SoilNitrogenPlantAvailableNO3 PlantAvailableNO3
                SoilNitrogenPlantAvailableNH4 PlantAvailableNH4
              Organic: FOMCNRatio=50
                Thickness  Carbon  SoilCNRatio  FBiom  FInert  FOM
                200        3.57    14.5         0.025  0.45    194.46
                100        1.47    14.5         0.025  0.6     170.68
                100        1.2     14.5         0.015  0.75    149.808
                100        1.03    14.5         0.01   0.9     131.489
                100        0.47    14.5         0.01   0.96    115.409
                100        0.47    14.5         0.01   0.96    101.296
                100        0.47    14.5         0.01   0.96    88.9093
                100        0.47    14.5         0.01   0.96    78.0369
                100        0.47    14.5         0.01   0.96    68.4941
                100        0.47    14.5         0.01   0.96    60.1182
                100        0.47    14.5         0.01   0.96    52.7666
                100        0.47    14.5         0.01   0.96    46.3139
                100        0.47    14.5         0.01   0.96    40.6504
                100        0.47    14.5         0.01   0.96    35.6794
                100        0.47    14.5         0.01   0.96    31.3163
                100        0.47    14.5         0.01   0.96    27.4867
                100        0.47    14.5         0.01   0.96    24.1255
                100        0.47    14.5         0.01   0.96    21.1753
                100        0.47    14.5         0.01   0.96    18.5858
                100        0.47    14.5         0.01   0.96    16.313
                100        0.47    14.5         0.01   0.96    14.3182
                100        0.47    14.5         0.01   0.96    12.5673
              Sample Initial nitrogen: SWUnits=Volumetric; OCUnits=Total; PHUnits=Water
                Thickness=[200, 100, 100, 100, 100, 100, 100, 100, 100, 100, 100, 100, 100, 100, 100, 100, 100, 100, 100, 100, 100, 100, -]
              CERESSoilTemperature
              Sample InitialConditions: SWUnits=Volumetric; OCUnits=Total; PHUnits=Water
                Thickness=[200, 100, 100, 100, 100, 100, 100, 100, 100, 100, 100, 100, 100, 100, 100, 100, 100, 100, 100, 100, 100, 100]
                SW=[0.244, 0.299, 0.274, 0.262, 0.27, 0.292, 0.306, 0.314, 0.297, 0.316, 0.309, 0.288, 0.303, 0.339, 0.343, 0.352, 0.365, 0.366, 0.363, 0.366, 0.358, 0.362]
          CompositeFactor SD2
            Specifications:
              [SlurpSowingRule].Script.SowingDate = 2010-11-04
              [Clock].StartDate = 2010-11-04
              [Soil]
              [SetCropVariables].Script.CoverFile = C:\Data\Master\03processed-data\CoverData\LAIIversen12SD2.csv
              [SlurpSowingRule].Script.RFV = 15
            Soil: SoilType=Udic Haplustept (US), Pallic orthic brown soil (NZ); Site=Ashley Dene: Lincoln University Research Farm; NearestTown=Lincoln; Country=New Zealand; Latitude=999999; Longitude=999999
              Comments=Soil water characterised from NNM (2 years). Stone content and BD  from Di and Cameron 2002. Soil saturation from Cichota 2013.
              Chemical
                Thickness  NO3N  NH4N
                200        31    8
                100        1.5   0.05
                100        1     0.03
                100        1     0.01
                100        1     0.01
                100        0.7   0.01
                100        0.5   0.01
                100        0.5   0.01
                100        0.5   0.01
                100        0.5   0.01
                100        0.5   0.01
                100        0.5   0.01
                100        0.5   0.01
                100        0.5   0.01
                100        0.5   0.01
                100        0.5   0.01
                100        0.5   0.01
                100        0.05  0.01
                100        0.05  0.01
                100        0.05  0.01
                100        0.05  0.01
                100        0     0
                PH=[6, -, -, -, -, -, -, -, -, -, -, -, -, -, -, -, -, -, -, -, -, -, -]
              Physical
                Thickness  BD    AirDry  LL15   DUL    SAT
                200        1.15  0.092   0.092  0.375  0.375
                100        1.15  0.143   0.143  0.366  0.366
                100        1.31  0.155   0.155  0.318  0.318
                100        1.31  0.142   0.142  0.292  0.292
                100        1.95  0.127   0.127  0.295  0.295
                100        1.95  0.133   0.133  0.303  0.303
                100        1.95  0.144   0.144  0.315  0.315
                100        1.95  0.133   0.133  0.327  0.327
                100        1.95  0.135   0.135  0.337  0.337
                100        1.95  0.145   0.145  0.336  0.336
                100        1.95  0.134   0.134  0.319  0.319
                100        1.95  0.124   0.124  0.31   0.31
                100        1.95  0.127   0.127  0.34   0.34
                100        1.95  0.131   0.131  0.341  0.341
                100        1.95  0.176   0.176  0.346  0.346
                100        1.95  0.22    0.22   0.36   0.36
                100        1.95  0.238   0.238  0.37   0.37
                100        1.95  0.256   0.256  0.375  0.375
                100        1.95  0.271   0.271  0.374  0.374
                100        1.95  0.286   0.286  0.364  0.364
                100        1.95  0.288   0.288  0.368  0.368
                100        1.95  0.29    0.29   0.368  0.368
                SoilCrop SlurpSoil
                  LL=[0.092, 0.143, 0.155, 0.142, 0.127, 0.133, 0.144, 0.133, 0.135, 0.145, 0.134, 0.124, 0.127, 0.131, 0.176, 0.22, 0.238, 0.256, 0.271, 0.286, 0.288, 0.29]
                  KL=[0.065, 0.062, 0.059, 0.056, 0.053, 0.051, 0.048, 0.046, 0.044, 0.041, 0.039, 0.038, 0.036, 0.034, 0.032, 0.031, 0.029, 0.028, 0.026, 0.025, 0.024, 0.023]
                  XF=[1, 1, 1, 1, 1, 1, 1, 1, 1, 1, 1, 1, 1, 1, 1, 1, 1, 1, 1, 1, 1, 1]
              WaterBalance SoilWater: same as NewZealand.Iversen12.Factors.SowingDate.SD1.Soil.SoilWater
              SoilNitrogen: same as NewZealand.Iversen12.Factors.SowingDate.SD1.Soil.SoilNitrogen
              Organic: same as NewZealand.Iversen12.Factors.SowingDate.SD1.Soil.Organic
              Sample Initial nitrogen: same as NewZealand.Iversen12.Factors.SowingDate.SD1.Soil.Initial nitrogen
              CERESSoilTemperature
              Sample InitialConditions: SWUnits=Volumetric; OCUnits=Total; PHUnits=Water
                Thickness=[200, 100, 100, 100, 100, 100, 100, 100, 100, 100, 100, 100, 100, 100, 100, 100, 100, 100, 100, 100, 100, 100]
                SW=[0.375, 0.189, 0.205, 0.206, 0.203, 0.241, 0.277, 0.302, 0.323, 0.326, 0.318, 0.307, 0.333, 0.339, 0.345, 0.353, 0.361, 0.37, 0.372, 0.355, 0.365, 0.355]
          CompositeFactor SD3
            Specifications:
              [SlurpSowingRule].Script.SowingDate = 2010-12-02
              [Clock].StartDate = 2010-12-02
              [Soil]
              [SetCropVariables].Script.CoverFile = C:\Data\Master\03processed-data\CoverData\LAIIversen12SD3.csv
              [SlurpSowingRule].Script.RFV = 35
            Soil: SoilType=Udic Haplustept (US), Pallic orthic brown soil (NZ); Site=Ashley Dene: Lincoln University Research Farm; NearestTown=Lincoln; Country=New Zealand; Latitude=999999; Longitude=999999
              Comments=Soil water characterised from NNM (2 years). Stone content and BD  from Di and Cameron 2002. Soil saturation from Cichota 2013.
              Chemical: same as NewZealand.Iversen12.Factors.SowingDate.SD2.Soil.Chemical
              Physical
                Thickness  BD    AirDry  LL15   DUL    SAT
                200        1.15  0.107   0.107  0.368  0.368
                100        1.15  0.158   0.158  0.368  0.368
                100        1.31  0.166   0.166  0.327  0.327
                100        1.31  0.17    0.17   0.305  0.305
                100        1.95  0.173   0.173  0.311  0.311
                100        1.95  0.168   0.168  0.324  0.324
                100        1.95  0.159   0.159  0.335  0.335
                100        1.95  0.141   0.141  0.338  0.338
                100        1.95  0.122   0.122  0.319  0.319
                100        1.95  0.11    0.11   0.302  0.302
                100        1.95  0.1     0.1    0.277  0.277
                100        1.95  0.09    0.09   0.271  0.271
                100        1.95  0.132   0.132  0.289  0.289
                100        1.95  0.174   0.174  0.321  0.321
                100        1.95  0.159   0.159  0.34   0.34
                100        1.95  0.144   0.144  0.349  0.349
                100        1.95  0.192   0.192  0.373  0.373
                100        1.95  0.238   0.238  0.376  0.376
                100        1.95  0.261   0.261  0.38   0.38
                100        1.95  0.283   0.283  0.377  0.377
                100        1.95  0.282   0.282  0.352  0.352
                100        1.95  0.282   0.282  0.35   0.35
                SoilCrop SlurpSoil
                  LL=[0.107, 0.158, 0.166, 0.17, 0.173, 0.168, 0.159, 0.141, 0.122, 0.11, 0.1, 0.09, 0.132, 0.174, 0.159, 0.144, 0.192, 0.238, 0.261, 0.283, 0.282, 0.282]
                  KL=[0.055, 0.052, 0.05, 0.047, 0.045, 0.043, 0.041, 0.039, 0.037, 0.035, 0.033, 0.032, 0.03, 0.029, 0.027, 0.026, 0.025, 0.024, 0.022, 0.021, 0.02, 0.019]
                  XF=[1, 1, 1, 1, 1, 1, 1, 1, 1, 1, 1, 1, 1, 1, 1, 1, 1, 1, 1, 1, 1, 1]
              WaterBalance SoilWater: same as NewZealand.Iversen12.Factors.SowingDate.SD1.Soil.SoilWater
              SoilNitrogen: same as NewZealand.Iversen12.Factors.SowingDate.SD1.Soil.SoilNitrogen
              Organic: same as NewZealand.Iversen12.Factors.SowingDate.SD1.Soil.Organic
              Sample Initial nitrogen: same as NewZealand.Iversen12.Factors.SowingDate.SD1.Soil.Initial nitrogen
              CERESSoilTemperature
              Sample InitialConditions: SWUnits=Volumetric; OCUnits=Total; PHUnits=Water
                Thickness=[200, 100, 100, 100, 100, 100, 100, 100, 100, 100, 100, 100, 100, 100, 100, 100, 100, 100, 100, 100, 100, 100]
                SW=[0.233, 0.288, 0.268, 0.256, 0.269, 0.29, 0.305, 0.318, 0.298, 0.285, 0.274, 0.271, 0.288, 0.315, 0.34, 0.346, 0.368, 0.362, 0.366, 0.368, 0.341, 0.338]
          CompositeFactor SD4
            Specifications:
              [SlurpSowingRule].Script.SowingDate = 2011-01-10
              [Clock].StartDate = 2011-01-10
              [Soil]
              [SetCropVariables].Script.CoverFile = C:\Data\Master\03processed-data\CoverData\LAIIversen12SD4.csv
              [SlurpSowingRule].Script.RFV = 30
            Soil: SoilType=Udic Haplustept (US), Pallic orthic brown soil (NZ); Site=Ashley Dene: Lincoln University Research Farm; NearestTown=Lincoln; Country=New Zealand; Latitude=999999; Longitude=999999
              Comments=Soil water characterised from NNM (2 years). Stone content and BD  from Di and Cameron 2002. Soil saturation from Cichota 2013.
              Chemical: same as NewZealand.Iversen12.Factors.SowingDate.SD2.Soil.Chemical
              Physical
                Thickness  BD    AirDry  LL15   DUL    SAT
                200        1.15  0.158   0.158  0.37   0.37
                100        1.15  0.169   0.169  0.368  0.368
                100        1.31  0.15    0.15   0.314  0.314
                100        1.31  0.128   0.128  0.294  0.294
                100        1.95  0.12    0.12   0.297  0.297
                100        1.95  0.109   0.109  0.318  0.318
                100        1.95  0.106   0.106  0.322  0.322
                100        1.95  0.12    0.12   0.32   0.32
                100        1.95  0.104   0.104  0.3    0.3
                100        1.95  0.079   0.079  0.275  0.275
                100        1.95  0.086   0.086  0.264  0.264
                100        1.95  0.099   0.099  0.274  0.274
                100        1.95  0.121   0.121  0.295  0.295
                100        1.95  0.142   0.142  0.307  0.307
                100        1.95  0.167   0.167  0.324  0.324
                100        1.95  0.191   0.191  0.341  0.341
                100        1.95  0.2     0.2    0.338  0.338
                100        1.95  0.225   0.225  0.348  0.348
                100        1.95  0.258   0.258  0.368  0.368
                100        1.95  0.291   0.291  0.384  0.384
                100        1.95  0.289   0.289  0.381  0.381
                100        1.95  0.286   0.286  0.357  0.357
                SoilCrop SlurpSoil
                  LL=[0.158, 0.169, 0.15, 0.128, 0.12, 0.109, 0.106, 0.12, 0.104, 0.079, 0.086, 0.099, 0.121, 0.142, 0.167, 0.191, 0.2, 0.225, 0.258, 0.291, 0.289, 0.286]
                  KL=[0.045, 0.043, 0.041, 0.039, 0.037, 0.035, 0.033, 0.032, 0.03, 0.029, 0.027, 0.026, 0.025, 0.023, 0.022, 0.021, 0.02, 0.019, 0.018, 0.017, 0.017, 0.016]
                  XF=[1, 1, 1, 1, 1, 1, 1, 1, 1, 1, 1, 1, 1, 1, 1, 1, 1, 1, 1, 1, 1, 1]
              WaterBalance SoilWater: same as NewZealand.Iversen12.Factors.SowingDate.SD1.Soil.SoilWater
              SoilNitrogen: same as NewZealand.Iversen12.Factors.SowingDate.SD1.Soil.SoilNitrogen
              Organic: same as NewZealand.Iversen12.Factors.SowingDate.SD1.Soil.Organic
              Sample Initial nitrogen: same as NewZealand.Iversen12.Factors.SowingDate.SD1.Soil.Initial nitrogen
              CERESSoilTemperature
              Sample InitialConditions: SWUnits=Volumetric; OCUnits=Total; PHUnits=Water
                Thickness=[200, 100, 100, 100, 100, 100, 100, 100, 100, 100, 100, 100, 100, 100, 100, 100, 100, 100, 100, 100, 100, 100]
                SW=[0.261, 0.288, 0.247, 0.232, 0.231, 0.232, 0.249, 0.275, 0.272, 0.242, 0.227, 0.252, 0.295, 0.307, 0.324, 0.34, 0.331, 0.348, 0.368, 0.373, 0.372, 0.348]
          CompositeFactor SD5
            Specifications:
              [SlurpSowingRule].Script.SowingDate = 2011-02-07
              [Clock].StartDate = 2011-02-7
              [Soil]
              [SetCropVariables].Script.CoverFile = C:\Data\Master\03processed-data\CoverData\LAIIversen12SD5.csv
              [SlurpSowingRule].Script.RFV = 10
            Soil: SoilType=Udic Haplustept (US), Pallic orthic brown soil (NZ); Site=Ashley Dene: Lincoln University Research Farm; NearestTown=Lincoln; Country=New Zealand; Latitude=999999; Longitude=999999
              Comments=Soil water characterised from NNM (2 years). Stone content and BD  from Di and Cameron 2002. Soil saturation from Cichota 2013.
              Chemical: same as NewZealand.Iversen12.Factors.SowingDate.SD2.Soil.Chemical
              Physical
                Thickness  BD    AirDry  LL15   DUL    SAT
                200        1.15  0.154   0.154  0.369  0.369
                100        1.15  0.172   0.172  0.37   0.37
                100        1.31  0.176   0.176  0.326  0.326
                100        1.31  0.16    0.16   0.309  0.309
                100        1.95  0.13    0.13   0.307  0.307
                100        1.95  0.125   0.125  0.312  0.312
                100        1.95  0.114   0.114  0.308  0.308
                100        1.95  0.09    0.09   0.312  0.312
                100        1.95  0.091   0.091  0.314  0.314
                100        1.95  0.126   0.126  0.318  0.318
                100        1.95  0.115   0.115  0.312  0.312
                100        1.95  0.103   0.103  0.317  0.317
                100        1.95  0.138   0.138  0.303  0.303
                100        1.95  0.174   0.174  0.308  0.308
                100        1.95  0.181   0.181  0.329  0.329
                100        1.95  0.187   0.187  0.346  0.346
                100        1.95  0.18    0.18   0.334  0.334
                100        1.95  0.2     0.2    0.34   0.34
                100        1.95  0.227   0.227  0.361  0.361
                100        1.95  0.253   0.253  0.367  0.367
                100        1.95  0.268   0.268  0.356  0.356
                100        1.95  0.283   0.283  0.346  0.346
                SoilCrop SlurpSoil
                  LL=[0.154, 0.172, 0.176, 0.16, 0.13, 0.125, 0.114, 0.09, 0.091, 0.126, 0.115, 0.103, 0.138, 0.174, 0.181, 0.187, 0.18, 0.2, 0.227, 0.253, 0.268, 0.283]
                  KL=[0.065, 0.062, 0.059, 0.056, 0.053, 0.051, 0.048, 0.046, 0.044, 0.041, 0.039, 0.038, 0.036, 0.034, 0.032, 0.031, 0.029, 0.028, 0.026, 0.025, 0.024, 0.023]
                  XF=[1, 1, 1, 1, 1, 1, 1, 1, 1, 1, 1, 1, 1, 1, 1, 1, 1, 1, 1, 1, 1, 1]
              WaterBalance SoilWater: same as NewZealand.Iversen12.Factors.SowingDate.SD1.Soil.SoilWater
              SoilNitrogen: same as NewZealand.Iversen12.Factors.SowingDate.SD1.Soil.SoilNitrogen
              Organic: same as NewZealand.Iversen12.Factors.SowingDate.SD1.Soil.Organic
              Sample Initial nitrogen: same as NewZealand.Iversen12.Factors.SowingDate.SD1.Soil.Initial nitrogen
              CERESSoilTemperature
              Sample InitialConditions: SWUnits=Volumetric; OCUnits=Total; PHUnits=Water
                Thickness=[200, 100, 100, 100, 100, 100, 100, 100, 100, 100, 100, 100, 100, 100, 100, 100, 100, 100, 100, 100, 100, 100]
                SW=[0.197, 0.272, 0.256, 0.239, 0.226, 0.225, 0.245, 0.24, 0.225, 0.252, 0.266, 0.271, 0.25, 0.285, 0.32, 0.337, 0.332, 0.34, 0.361, 0.36, 0.355, 0.341]
          CompositeFactor SD6
            Specifications:
              [SlurpSowingRule].Script.SowingDate = 2011-10-10
              [Clock].StartDate = 2011-10-10
              [Soil]
              [SetCropVariables].Script.CoverFile = C:\Data\Master\03processed-data\CoverData\LAIIversen12SD6.csv
              [SlurpSowingRule].Script.RFV = 15
            Soil: SoilType=Udic Haplustept (US), Pallic orthic brown soil (NZ); Site=Ashley Dene: Lincoln University Research Farm; NearestTown=Lincoln; Country=New Zealand; Latitude=999999; Longitude=999999
              Comments=Soil water characterised from NNM (2 years). Stone content and BD  from Di and Cameron 2002. Soil saturation from Cichota 2013.
              Chemical: same as NewZealand.Iversen12.Factors.SowingDate.SD2.Soil.Chemical
              Physical
                Thickness  BD    AirDry  LL15   DUL    SAT
                200        1.15  0.116   0.116  0.37   0.37
                100        1.15  0.161   0.161  0.333  0.333
                100        1.31  0.168   0.168  0.309  0.309
                100        1.31  0.185   0.185  0.286  0.286
                100        1.95  0.174   0.174  0.28   0.28
                100        1.95  0.151   0.151  0.283  0.283
                100        1.95  0.152   0.152  0.295  0.295
                100        1.95  0.176   0.176  0.312  0.312
                100        1.95  0.176   0.176  0.316  0.316
                100        1.95  0.171   0.171  0.315  0.315
                100        1.95  0.204   0.204  0.32   0.32
                100        1.95  0.237   0.237  0.326  0.326
                100        1.95  0.226   0.226  0.337  0.337
                100        1.95  0.216   0.216  0.343  0.343
                100        1.95  0.237   0.237  0.344  0.344
                100        1.95  0.259   0.259  0.344  0.344
                100        1.95  0.262   0.262  0.359  0.359
                100        1.95  0.264   0.264  0.367  0.367
                100        1.95  0.29    0.29   0.38   0.38
                100        1.95  0.315   0.315  0.378  0.378
                100        1.95  0.313   0.313  0.373  0.373
                100        1.95  0.309   0.309  0.365  0.365
                SoilCrop SlurpSoil
                  LL=[0.116, 0.161, 0.168, 0.185, 0.174, 0.151, 0.152, 0.176, 0.176, 0.171, 0.204, 0.237, 0.226, 0.216, 0.237, 0.259, 0.262, 0.264, 0.29, 0.315, 0.313, 0.309]
                  KL=[0.05, 0.045, 0.041, 0.037, 0.034, 0.03, 0.027, 0.025, 0.022, 0.02, 0.018, 0.017, 0.015, 0.014, 0.012, 0.011, 0.01, 0.009, 0.008, 0.007, 0.007, 0.006]
                  XF=[1, 1, 1, 1, 1, 1, 1, 1, 1, 1, 1, 1, 1, 1, 1, 1, 1, 1, 1, 1, 1, 1]
              WaterBalance SoilWater: same as NewZealand.Iversen12.Factors.SowingDate.SD1.Soil.SoilWater
              SoilNitrogen: same as NewZealand.Iversen12.Factors.SowingDate.SD1.Soil.SoilNitrogen
              Organic: same as NewZealand.Iversen12.Factors.SowingDate.SD1.Soil.Organic
              Sample Initial nitrogen: same as NewZealand.Iversen12.Factors.SowingDate.SD1.Soil.Initial nitrogen
              CERESSoilTemperature
              Sample InitialConditions: SWUnits=Volumetric; OCUnits=Total; PHUnits=Water
                Thickness=[200, 100, 100, 100, 100, 100, 100, 100, 100, 100, 100, 100, 100, 100, 100, 100, 100, 100, 100, 100, 100, 100]
                SW=[0.257, 0.33, 0.305, 0.284, 0.277, 0.283, 0.295, 0.309, 0.313, 0.315, 0.319, 0.322, 0.336, 0.339, 0.342, 0.336, 0.355, 0.354, 0.37, 0.372, 0.366, 0.357]
          CompositeFactor SD7
            Specifications:
              [SlurpSowingRule].Script.SowingDate = 2011-11-07
              [Clock].StartDate = 2011-11-07
              [Soil]
              [SetCropVariables].Script.CoverFile = C:\Data\Master\03processed-data\CoverData\LAIIversen12SD7.csv
              [SlurpSowingRule].Script.RFV = 35
            Soil: SoilType=Udic Haplustept (US), Pallic orthic brown soil (NZ); Site=Ashley Dene: Lincoln University Research Farm; NearestTown=Lincoln; Country=New Zealand; Latitude=999999; Longitude=999999
              Comments=Soil water characterised from NNM (2 years). Stone content and BD  from Di and Cameron 2002. Soil saturation from Cichota 2013.
              Chemical: same as NewZealand.Iversen12.Factors.SowingDate.SD2.Soil.Chemical
              Physical
                Thickness  BD    AirDry  LL15   DUL    SAT
                200        1.15  0.141   0.141  0.331  0.331
                100        1.15  0.171   0.171  0.356  0.356
                100        1.31  0.163   0.163  0.311  0.311
                100        1.31  0.156   0.156  0.3    0.3
                100        1.95  0.132   0.132  0.297  0.297
                100        1.95  0.134   0.134  0.293  0.293
                100        1.95  0.161   0.161  0.312  0.312
                100        1.95  0.177   0.177  0.316  0.316
                100        1.95  0.161   0.161  0.31   0.31
                100        1.95  0.161   0.161  0.31   0.31
                100        1.95  0.162   0.162  0.3    0.3
                100        1.95  0.161   0.161  0.286  0.286
                100        1.95  0.162   0.162  0.304  0.304
                100        1.95  0.163   0.163  0.322  0.322
                100        1.95  0.157   0.157  0.322  0.322
                100        1.95  0.152   0.152  0.35   0.35
                100        1.95  0.206   0.206  0.374  0.374
                100        1.95  0.258   0.258  0.364  0.364
                100        1.95  0.282   0.282  0.355  0.355
                100        1.95  0.302   0.302  0.358  0.358
                100        1.95  0.304   0.304  0.357  0.357
                100        1.95  0.305   0.305  0.345  0.345
                SoilCrop SlurpSoil
                  LL=[0.141, 0.171, 0.163, 0.156, 0.132, 0.134, 0.161, 0.177, 0.161, 0.161, 0.162, 0.161, 0.162, 0.163, 0.157, 0.152, 0.206, 0.258, 0.282, 0.302, 0.304, 0.305]
                  KL=[0.085, 0.081, 0.077, 0.073, 0.07, 0.066, 0.063, 0.06, 0.057, 0.054, 0.052, 0.049, 0.047, 0.044, 0.042, 0.04, 0.038, 0.036, 0.035, 0.033, 0.031, 0.03]
                  XF=[1, 1, 1, 1, 1, 1, 1, 1, 1, 1, 1, 1, 1, 1, 1, 1, 1, 1, 1, 1, 1, 1]
              WaterBalance SoilWater: same as NewZealand.Iversen12.Factors.SowingDate.SD1.Soil.SoilWater
              SoilNitrogen: same as NewZealand.Iversen12.Factors.SowingDate.SD1.Soil.SoilNitrogen
              Organic: same as NewZealand.Iversen12.Factors.SowingDate.SD1.Soil.Organic
              Sample Initial nitrogen: same as NewZealand.Iversen12.Factors.SowingDate.SD1.Soil.Initial nitrogen
              CERESSoilTemperature
              Sample InitialConditions: SWUnits=Volumetric; OCUnits=Total; PHUnits=Water
                Thickness=[200, 100, 100, 100, 100, 100, 100, 100, 100, 100, 100, 100, 100, 100, 100, 100, 100, 100, 100, 100, 100, 100]
                SW=[0.273, 0.335, 0.304, 0.286, 0.287, 0.289, 0.305, 0.313, 0.307, 0.308, 0.294, 0.284, 0.3, 0.319, 0.318, 0.348, 0.37, 0.36, 0.351, 0.353, 0.349, 0.343]
          CompositeFactor SD8
            Specifications:
              [SlurpSowingRule].Script.SowingDate = 2011-12-09
              [Clock].StartDate = 2011-12-09
              [Soil]
              [SetCropVariables].Script.CoverFile = C:\Data\Master\03processed-data\CoverData\LAIIversen12SD8.csv
              [SlurpSowingRule].Script.RFV = 35
            Soil: SoilType=Udic Haplustept (US), Pallic orthic brown soil (NZ); Site=Ashley Dene: Lincoln University Research Farm; NearestTown=Lincoln; Country=New Zealand; Latitude=999999; Longitude=999999
              Comments=Soil water characterised from NNM (2 years). Stone content and BD  from Di and Cameron 2002. Soil saturation from Cichota 2013.
              Chemical: same as NewZealand.Iversen12.Factors.SowingDate.SD2.Soil.Chemical
              Physical
                Thickness  BD    AirDry  LL15   DUL    SAT
                200        1.15  0.158   0.158  0.335  0.335
                100        1.15  0.181   0.181  0.313  0.313
                100        1.31  0.183   0.183  0.278  0.278
                100        1.31  0.164   0.164  0.257  0.257
                100        1.95  0.156   0.156  0.231  0.231
                100        1.95  0.18    0.18   0.239  0.239
                100        1.95  0.189   0.189  0.269  0.269
                100        1.95  0.193   0.193  0.275  0.275
                100        1.95  0.202   0.202  0.274  0.274
                100        1.95  0.191   0.191  0.286  0.286
                100        1.95  0.163   0.163  0.268  0.268
                100        1.95  0.134   0.134  0.235  0.235
                100        1.95  0.138   0.138  0.217  0.217
                100        1.95  0.142   0.142  0.236  0.236
                100        1.95  0.162   0.162  0.252  0.252
                100        1.95  0.207   0.207  0.264  0.264
                100        1.95  0.261   0.261  0.309  0.309
                100        1.95  0.311   0.311  0.36   0.36
                100        1.95  0.311   0.311  0.367  0.367
                100        1.95  0.311   0.311  0.358  0.358
                100        1.95  0.308   0.308  0.361  0.361
                100        1.95  0.31    0.31   0.356  0.356
                SoilCrop SlurpSoil
                  LL=[0.158, 0.181, 0.183, 0.164, 0.156, 0.18, 0.189, 0.193, 0.202, 0.191, 0.163, 0.134, 0.138, 0.142, 0.162, 0.207, 0.261, 0.311, 0.311, 0.311, 0.308, 0.31]
                  KL=[0.095, 0.09, 0.086, 0.082, 0.078, 0.074, 0.07, 0.067, 0.064, 0.061, 0.058, 0.055, 0.052, 0.05, 0.047, 0.045, 0.043, 0.041, 0.039, 0.037, 0.035, 0.033]
                  XF=[1, 1, 1, 1, 1, 1, 1, 1, 1, 1, 1, 1, 1, 1, 1, 1, 1, 1, 1, 1, 1, 1]
              WaterBalance SoilWater: same as NewZealand.Iversen12.Factors.SowingDate.SD1.Soil.SoilWater
              SoilNitrogen: same as NewZealand.Iversen12.Factors.SowingDate.SD1.Soil.SoilNitrogen
              Organic: same as NewZealand.Iversen12.Factors.SowingDate.SD1.Soil.Organic
              Sample Initial nitrogen: same as NewZealand.Iversen12.Factors.SowingDate.SD1.Soil.Initial nitrogen
              CERESSoilTemperature
              Sample InitialConditions: SWUnits=Volumetric; OCUnits=Total; PHUnits=Water
                Thickness=[200, 100, 100, 100, 100, 100, 100, 100, 100, 100, 100, 100, 100, 100, 100, 100, 100, 100, 100, 100, 100, 100]
                SW=[0.308, 0.223, 0.218, 0.209, 0.21, 0.239, 0.269, 0.275, 0.274, 0.28, 0.265, 0.23, 0.21, 0.23, 0.245, 0.263, 0.307, 0.357, 0.366, 0.357, 0.355, 0.355]
          CompositeFactor SD9
            Specifications:
              [SlurpSowingRule].Script.SowingDate = 2012-01-10
              [Clock].StartDate = 2012-01-10
              [Soil]
              [SetCropVariables].Script.CoverFile = C:\Data\Master\03processed-data\CoverData\LAIIversen12SD9.csv
              [SlurpSowingRule].Script.RFV = 15
            Soil: SoilType=Udic Haplustept (US), Pallic orthic brown soil (NZ); Site=Ashley Dene: Lincoln University Research Farm; NearestTown=Lincoln; Country=New Zealand; Latitude=999999; Longitude=999999
              Comments=Soil water characterised from NNM (2 years). Stone content and BD  from Di and Cameron 2002. Soil saturation from Cichota 2013.
              Chemical: same as NewZealand.Iversen12.Factors.SowingDate.SD2.Soil.Chemical
              Physical
                Thickness  BD    AirDry  LL15   DUL    SAT
                200        1.15  0.193   0.193  0.342  0.342
                100        1.15  0.253   0.253  0.354  0.354
                100        1.31  0.223   0.223  0.306  0.306
                100        1.31  0.197   0.197  0.263  0.263
                100        1.95  0.184   0.184  0.242  0.242
                100        1.95  0.179   0.179  0.251  0.251
                100        1.95  0.194   0.194  0.263  0.263
                100        1.95  0.175   0.175  0.229  0.229
                100        1.95  0.182   0.182  0.223  0.223
                100        1.95  0.191   0.191  0.238  0.238
                100        1.95  0.183   0.183  0.236  0.236
                100        1.95  0.174   0.174  0.234  0.234
                100        1.95  0.189   0.189  0.24   0.24
                100        1.95  0.203   0.203  0.259  0.259
                100        1.95  0.238   0.238  0.3    0.3
                100        1.95  0.272   0.272  0.317  0.317
                100        1.95  0.287   0.287  0.348  0.348
                100        1.95  0.302   0.302  0.354  0.354
                100        1.95  0.307   0.307  0.351  0.351
                100        1.95  0.311   0.311  0.363  0.363
                100        1.95  0.309   0.309  0.365  0.365
                100        1.95  0.306   0.306  0.351  0.351
                SoilCrop SlurpSoil
                  LL=[0.193, 0.253, 0.223, 0.197, 0.184, 0.179, 0.194, 0.175, 0.182, 0.191, 0.183, 0.174, 0.189, 0.203, 0.238, 0.272, 0.287, 0.302, 0.307, 0.311, 0.309, 0.306]
                  XF=[1, 1, 1, 1, 1, 1, 1, 1, 1, 1, 1, 1, 1, 1, 1, 1, 1, 1, 1, 1, 1, 1]
              WaterBalance SoilWater: same as NewZealand.Iversen12.Factors.SowingDate.SD1.Soil.SoilWater
              SoilNitrogen: same as NewZealand.Iversen12.Factors.SowingDate.SD1.Soil.SoilNitrogen
              Organic: same as NewZealand.Iversen12.Factors.SowingDate.SD1.Soil.Organic
              Sample Initial nitrogen: same as NewZealand.Iversen12.Factors.SowingDate.SD1.Soil.Initial nitrogen
              CERESSoilTemperature
              Sample InitialConditions: SWUnits=Volumetric; OCUnits=Total; PHUnits=Water
                Thickness=[200, 100, 100, 100, 100, 100, 100, 100, 100, 100, 100, 100, 100, 100, 100, 100, 100, 100, 100, 100, 100, 100]
                SW=[0.246, 0.342, 0.296, 0.259, 0.24, 0.25, 0.257, 0.228, 0.22, 0.236, 0.232, 0.23, 0.236, 0.254, 0.289, 0.314, 0.347, 0.352, 0.351, 0.359, 0.359, 0.348]
          CompositeFactor SD10
            Specifications:
              [SlurpSowingRule].Script.SowingDate = 2012-02-17
              [Clock].StartDate = 2012-02-17
              [Soil]
              [SetCropVariables].Script.CoverFile = C:\Data\Master\03processed-data\CoverData\LAIIversen12SD10.csv
              [SlurpSowingRule].Script.RFV = 15
            Soil: SoilType=Udic Haplustept (US), Pallic orthic brown soil (NZ); Site=Ashley Dene: Lincoln University Research Farm; NearestTown=Lincoln; Country=New Zealand; Latitude=999999; Longitude=999999
              Comments=Soil water characterised from NNM (2 years). Stone content and BD  from Di and Cameron 2002. Soil saturation from Cichota 2013.
              Chemical: same as NewZealand.Iversen12.Factors.SowingDate.SD2.Soil.Chemical
              Physical
                Thickness  BD    AirDry  LL15   DUL    SAT
                200        1.15  0.226   0.226  0.351  0.351
                100        1.15  0.27    0.27   0.327  0.327
                100        1.31  0.24    0.24   0.296  0.296
                100        1.31  0.213   0.213  0.272  0.272
                100        1.95  0.2     0.2    0.257  0.257
                100        1.95  0.206   0.206  0.243  0.243
                100        1.95  0.21    0.21   0.236  0.236
                100        1.95  0.207   0.207  0.233  0.233
                100        1.95  0.202   0.202  0.226  0.226
                100        1.95  0.208   0.208  0.226  0.226
                100        1.95  0.213   0.213  0.23   0.23
                100        1.95  0.215   0.215  0.235  0.235
                100        1.95  0.194   0.194  0.225  0.225
                100        1.95  0.172   0.172  0.204  0.204
                100        1.95  0.208   0.208  0.22   0.22
                100        1.95  0.235   0.235  0.249  0.249
                100        1.95  0.261   0.261  0.277  0.277
                100        1.95  0.28    0.28   0.29   0.29
                100        1.95  0.291   0.291  0.306  0.306
                100        1.95  0.299   0.299  0.314  0.314
                100        1.95  0.3     0.3    0.318  0.318
                100        1.95  0.299   0.299  0.316  0.316
                SoilCrop SlurpSoil
                  LL=[0.226, 0.27, 0.24, 0.213, 0.2, 0.206, 0.21, 0.207, 0.202, 0.208, 0.213, 0.215, 0.194, 0.172, 0.208, 0.235, 0.261, 0.28, 0.291, 0.299, 0.3, 0.299]
                  XF=[1, 1, 1, 1, 1, 1, 1, 1, 1, 1, 1, 1, 1, 1, 1, 1, 1, 1, 1, 1, 1, 1]
              WaterBalance SoilWater: same as NewZealand.Iversen12.Factors.SowingDate.SD1.Soil.SoilWater
              SoilNitrogen: same as NewZealand.Iversen12.Factors.SowingDate.SD1.Soil.SoilNitrogen
              Organic: same as NewZealand.Iversen12.Factors.SowingDate.SD1.Soil.Organic
              Sample Initial nitrogen: same as NewZealand.Iversen12.Factors.SowingDate.SD1.Soil.Initial nitrogen
              CERESSoilTemperature
              Sample InitialConditions: SWUnits=Volumetric; OCUnits=Total; PHUnits=Water
                Thickness=[200, 100, 100, 100, 100, 100, 100, 100, 100, 100, 100, 100, 100, 100, 100, 100, 100, 100, 100, 100, 100, 100]
                SW=[0.248, 0.327, 0.284, 0.255, 0.244, 0.239, 0.236, 0.233, 0.226, 0.224, 0.228, 0.234, 0.223, 0.2, 0.211, 0.237, 0.267, 0.289, 0.306, 0.314, 0.318, 0.316]
      Simulation Iversen12
        Clock: Start=2010-10-01; End=2012-07-31
        Summary summaryfile
        Weather: FileName=C:\Data\Master\01raw-data\ClimateAndObserved\Iversen12.met
        SoilArbitrator Soil Arbitrator
        Zone Field: Area=1; Slope=0; AspectAngle=0; Altitude=50
          Folder ManagerFolder
            Memo
              # ReportOnDates
              Disabled by [Clock].DoReport

              # SlurpSowingRule
              Critical manager to control the sowing rules and canopy paramters.

              # SetCropVariables
              Critical manager that controls the fractional light interception and extinction coeficient data input.
            Manager ReportOnDates
              TodayString =
```csharp
using APSIM.Shared.Utilities;
using System.Xml.Serialization;
using Models;
using Models.PMF;
using Models.Soils;
using System.Text;
using System.Collections.Generic;
using Models.Core;
using System;

namespace Models
{
    [Serializable] 
    public class Script : Model
    {
        [Link] Clock Clock;
        [Link] Models.Report DataRep;
        
        public List<string> ObsDates;
        public string TodayString { get; set; }
        
        [EventSubscribe("StartOfSimulation")]
        private void OnStartOfSimulation(object sender, EventArgs e)
        {
            ObsDates = new List<string>();
            ObsDates.Add("2011-06-09");
            ObsDates.Add("2011-10-06");
            ObsDates.Add("2011-10-20");
            ObsDates.Add("2011-10-26");
            ObsDates.Add("2011-11-03");
            ObsDates.Add("2011-11-12");
            ObsDates.Add("2011-11-17");
            ObsDates.Add("2011-11-30");
            ObsDates.Add("2011-12-14");
            ObsDates.Add("2011-12-28");
            ObsDates.Add("2012-01-11");
            ObsDates.Add("2012-01-25");
            ObsDates.Add("2012-02-08");
            ObsDates.Add("2012-02-22");
            ObsDates.Add("2012-03-07");
            ObsDates.Add("2012-03-21");
            ObsDates.Add("2012-04-04");
            ObsDates.Add("2012-04-18");
            ObsDates.Add("2012-05-02");
            ObsDates.Add("2012-05-16");
            ObsDates.Add("2012-05-30");
            ObsDates.Add("2012-06-13");
            ObsDates.Add("2012-08-06");
            ObsDates.Add("2012-08-29");
            ObsDates.Add("2012-09-13");
            ObsDates.Add("2012-09-26");
            ObsDates.Add("2012-10-10");
            ObsDates.Add("2012-10-24");
            ObsDates.Add("2012-11-08");
            ObsDates.Add("2012-11-21");
            ObsDates.Add("2012-12-05");
            ObsDates.Add("2012-12-19");
            ObsDates.Add("2013-01-04");
            ObsDates.Add("2013-01-16");
            ObsDates.Add("2013-01-30");
            ObsDates.Add("2013-02-13");
            ObsDates.Add("2013-02-27");
            ObsDates.Add("2013-03-13");
            ObsDates.Add("2013-03-27");
            ObsDates.Add("2013-04-10");
            ObsDates.Add("2013-04-23");
            ObsDates.Add("2013-05-08");
            ObsDates.Add("2013-06-26");
            ObsDates.Add("2013-08-27");
            ObsDates.Add("2013-09-12");
            ObsDates.Add("2013-10-01");
            ObsDates.Add("2013-10-14");
            ObsDates.Add("2013-10-30");
            ObsDates.Add("2013-11-12");
            ObsDates.Add("2013-11-26");
            ObsDates.Add("2013-12-10");
            ObsDates.Add("2013-12-24");
            ObsDates.Add("2014-01-07");
            ObsDates.Add("2014-01-21");
            ObsDates.Add("2014-02-04");
            ObsDates.Add("2014-02-18");
            ObsDates.Add("2014-03-26");
            ObsDates.Add("2014-04-15");
        }
        
        [EventSubscribe("DoReport")]
        private void OnDoReport(object sender, EventArgs e)
        {
            TodayString = Clock.Today.ToString("yyyy-MM-dd");
            if (ObsDates.Contains(TodayString))
                DataRep.DoOutput();
        }

    }
}
```
            Manager SlurpSowingRule
              SowingDate = 02/17/2012 00:00:00
              RFV = 10
              KLReductionFactor = -0.002
              CultivarName = Slurp
              InitialRootDepth = 15
              RootDepth = 2300
              KLReductionDepth = 150
              YKLModifiers =
              XDepth =
              MaxG = 0.006
              R50 = 175
```csharp
using Models.Soils;
using APSIM.Shared.Utilities;
using Models.PMF;
using Models.Core;
using System;
        
namespace Models
{
    [Serializable] 
    [System.Xml.Serialization.XmlInclude(typeof(Model))]
    public class Script : Model
    {
        [Link] Plant Slurp;
        [Link] Clock Clock;
        [Link] Soil Soil;
        [Link] Zone zone;
        
        [Description("Cultivar")]
        public string CultivarName { get; set; }
        [Description("Initial Root Depth")]
        public double InitialRootDepth { get; set; }
        [Description("Sowing Date")]
        public DateTime SowingDate { get; set; }
        [Description("Maximum Root Depth")]
        public double RootDepth { get; set; }
        [Description("Roof Front Velocity")]
        public double RFV { get; set; }
        [Description("Factor to change Kl modifier with Depth")]
        public double KLReductionFactor { get; set; }
        [Description("Depth that KL starts to decline")]
        public double KLReductionDepth { get; set; }
        
        public double[] YKLModifiers { get; set; }
        public double[] XDepth { get; set; }
        private double Depth { get; set; }
        
        [Description("Maximum Stomatal Conductance")]
        public double MaxG { get; set; }
        [Description("Stomatal Radn response")]
        public double R50 { get; set; }
        
        [EventSubscribe("DoManagement")]
        private void OnDoManagement(object sender, EventArgs e)
        {
            if (Clock.Today.Date == SowingDate)
            {
                Slurp.Sow(cultivar: CultivarName, population: 1, depth: InitialRootDepth, rowSpacing: 150);
                
                YKLModifiers = new double[Soil.Thickness.Length];
                XDepth = new double[Soil.Thickness.Length];
                Depth = 0;
                for (int layer = 0; layer < Soil.Thickness.Length; layer++)
                {
                    Depth += Soil.Thickness[layer] / 2;  //Add half of the thickness of the current layer so depth is the mid depth of that layer
                    if (Depth <= KLReductionDepth)
                    {
                        YKLModifiers[layer] = 1;
                        XDepth[layer] = Depth;
                    }
                    else
                    {
                        double KLMod = 1 * Math.Exp(-KLReductionFactor * (Depth - KLReductionDepth));
                        YKLModifiers[layer] = KLMod;
                        XDepth[layer] = Depth;
                    }
                    Depth += Soil.Thickness[layer] / 2;  //Add the other half of the current layer so depth is the top of the next layer
                }
                /*object KLMods = YKLModifiers;
                zone.Set("Slurp.Root.KLModifier.XYPairs.Y", KLMods);
                object Depths = XDepth;
                zone.Set("Slurp.Root.KLModifier.XYPairs.X", Depths);
                */
                object RD = RootDepth;
                zone.Set("Slurp.Root.MaximumRootDepth.FixedValue", RD);
                object RV = RFV;
                zone.Set("Slurp.Root.RootFrontVelocity.Potential.FixedValue", RV);
                object GMaxValue = MaxG;
                zone.Set("Slurp.Leaf.Gsmax350", GMaxValue); 
                object R50Value = R50; 
                zone.Set("Slurp.Leaf.R50", R50Value); 
                
            }
        }
    }
}
```
            Manager SetCropVariables
              CoverFile = C:/Data/Master/03processed-data/CoverData/CoverDataAshleyDeneSD10.csv
              Ext_coef = 0
              MaximumHeight = 595
              LAI = LAImod
              Extinctioncoefficient = 0.94
              Treatment =
              CoverRead = 0
              leaflai = 0
```csharp
using Models.Soils;
using System.Data;
using APSIM.Shared.Utilities;
using System.Xml.Serialization;
using Models;
using Models.PMF;
using System.Text;
using System.Collections.Generic;
using Models.Core;
using System;
namespace Models
{
    [Serializable] 
    //[System.Xml.Serialization.XmlInclude(typeof(Model))]
    public class Script : Model
    {
        [Link] Plant SCUM;
        [Link] Clock Clock;
        [Link] Zone zone;
        [Link] Simulation Simulation;
        [Link] Soil Soil;
        [Link] ISummary mysum;
        
        [Description("File of Light interception and Extinction coefficient")]
        public string CoverFile { get; set; }
        //[Description("Extinction coefficient (if constant).")]
        public double Ext_coef { get; set; }
        [Description("Maximum height of the crop at full cover")]
        public double MaximumHeight { get; set; }
        
        [XmlIgnore] private DataTable Covers { get; set; }
        [Description("Column name for the LEAF AREA INDEX")]
        public string LAI { get; set; }
        //[Description("Column name for the USER provide Extinction coefficient")]
        [Description("USER provide Extinction coefficient")]
        public double Extinctioncoefficient { get; set; }
        //public string Irrigation { get; set; }
        public string Treatment { get; set; }
        
        public double CoverRead { get; set; }
        public double leaflai { get; private set; }
                
        [EventSubscribe("StartOfSimulation")]
        private void OnStartOfSimulation(object sender, EventArgs e)
        {
            
            Treatment = LAI;
            
            string fullFileName = PathUtilities.GetAbsolutePath(CoverFile, Simulation.FileName);
            
            ApsimTextFile textFile = new ApsimTextFile();
            textFile.Open(fullFileName);
            Covers = textFile.ToTable();
            textFile.Close();
        }
        
        [EventSubscribe("StartOfDay")]
        private void OnStartOfDay(object sender, EventArgs e)
        {
            foreach (DataRow row in Covers.Rows)
            {
                DateTime TodayDate = Convert.ToDateTime(row["Clock.Today"]);
                if (TodayDate.Date == Clock.Today.Date)
                {
                	mysum.WriteMessage(this, "Date" + Clock.Today.Date);
                    leaflai = Convert.ToDouble(row[Treatment]);
                    //Ext_coef = Convert.ToDouble(row[Extinctioncoefficient]);
                }
            }
        
            //if ((bool)zone.Get("Slurp.IsAlive") == true)
            //{
                //Only assign cover valuse if crop is emerged

                CoverRead = 1 - Math.Exp( - Extinctioncoefficient * leaflai);

                /*
                if (CoverRead == 1)
                    leaflai = Math.Log(0.01) / -Ext_coef;
                else
                {
                    if (CoverRead > 0)
                        leaflai = Math.Log(1 - CoverRead) / -Ext_coef;
                    else
                        leaflai = 0;
                }
                */

                //Summary.WriteMessage(this, "LAI " + leaflai);
                object LAIResetValue = leaflai;
                zone.Set("Slurp.Leaf.Area.FixedValue", LAIResetValue);  
                object kResetValue = Extinctioncoefficient;
                zone.Set("Slurp.Leaf.ExtinctionCoefficient.FixedValue", kResetValue);  
                object HeightResetValue = CoverRead * MaximumHeight;
                zone.Set("Slurp.Leaf.Tallness.FixedValue", HeightResetValue);  
            //}
            
            /*if ((Clock.Today.DayOfYear == 160) && (Clock.Today.Year == 2011))
                Soil.SoilWater.Reset();
                */
        }
        /*[EventSubscribe("StartOfDay")]
        private void OnEndOfDay(object sender, EventArgs e)
        {
            if ((Clock.Today.DayOfYear == 66) && (Clock.Today.Year == 2012) && (Irrigation == "Rain"))
            {
                if (Cover == "Lucerne")
                {
                    double[] ValuesToSet = { 0.18, 0.21, 0.20, 0.06, 0.05, 0.06, 0.07, 0.08, 0.10, 0.14, 0.14, 0.14, 0.14 };
                    Soil.SoilWater.SW = ValuesToSet;
                }
                if (Cover == "Ryegrass")
                {
                    double[] ValuesToSet = { 0.14, 0.20, 0.25, 0.11, 0.07, 0.08, 0.09, 0.09, 0.11, 0.14, 0.14, 0.14, 0.14 };
                    Soil.SoilWater.SW = ValuesToSet;
                }
            }
        }*/
    }
}
```
          Soil: SoilType=Udic Haplustept (US), Pallic orthic brown soil (NZ); Site=Ashley Dene: Lincoln University Research Farm; NearestTown=Lincoln; Country=New Zealand; Latitude=999999; Longitude=999999
            Comments=Soil water characterised from NNM (2 years). Stone content and BD  from Di and Cameron 2002. Soil saturation from Cichota 2013.
            Chemical
              Thickness  NO3N  NH4N
              200        31    8
              100        1.5   0.05
              100        1     0.03
              100        1     0.01
              100        1     0.01
              100        0.7   0.01
              100        0.5   0.01
              100        0.5   0.01
              100        0.5   0.01
              100        0.5   0.01
              100        0.5   0.01
              100        0.5   0.01
              100        0.5   0.01
              100        0.5   0.01
              100        0.5   0.01
              100        0.5   0.01
              100        0.5   0.01
              100        0.05  0.01
              100        0.05  0.01
              100        0.05  0.01
              100        0.05  0.01
              100        0     0
            Physical
              Thickness  BD    AirDry  LL15   DUL    SAT
              200        1.15  0.136   0.136  0.284  0.284
              100        1.15  0.167   0.167  0.239  0.239
              100        1.31  0.131   0.131  0.182  0.182
              100        1.31  0.103   0.103  0.134  0.134
              100        1.95  0.09    0.09   0.117  0.117
              100        1.95  0.082   0.082  0.111  0.111
              100        1.95  0.079   0.079  0.106  0.106
              100        1.95  0.075   0.075  0.107  0.107
              100        1.95  0.083   0.083  0.117  0.117
              100        1.95  0.101   0.101  0.118  0.118
              100        1.95  0.099   0.099  0.116  0.116
              100        1.95  0.088   0.088  0.112  0.112
              100        1.95  0.083   0.083  0.107  0.107
              100        1.95  0.085   0.085  0.103  0.103
              100        1.95  0.09    0.09   0.108  0.108
              100        1.95  0.093   0.093  0.113  0.113
              100        1.95  0.094   0.094  0.111  0.111
              100        1.95  0.098   0.098  0.11   0.11
              100        1.95  0.1     0.1    0.113  0.113
              100        1.95  0.103   0.103  0.115  0.115
              100        1.95  0.109   0.109  0.119  0.119
              100        1.95  0.113   0.113  0.123  0.123
              SoilCrop SlurpSoil
                LL=[0.136, 0.167, 0.131, 0.103, 0.09, 0.082, 0.079, 0.075, 0.083, 0.101, 0.099, 0.088, 0.083, 0.085, 0.09, 0.093, 0.094, 0.098, 0.1, 0.103, 0.109, 0.113]
                KL=[0.01, 0.01, 0.01, 0.01, 0.01, 0.01, 0.01, 0.01, 0.01, 0.01, 0.01, 0.01, 0.01, 0.01, 0.01, 0.01, 0.01, 0.01, 0.01, 0.01, 0.01, 0.01]
                XF=[1, 1, 1, 1, 1, 1, 1, 1, 1, 1, 1, 1, 1, 1, 1, 1, 1, 1, 1, 1, 1, 1]
            WaterBalance SoilWater: same as NewZealand.Iversen12.Factors.SowingDate.SD1.Soil.SoilWater
            SoilNitrogen: same as NewZealand.Iversen12.Factors.SowingDate.SD1.Soil.SoilNitrogen
            Organic: same as NewZealand.Iversen12.Factors.SowingDate.SD1.Soil.Organic
            Sample InitialConditions: SWUnits=Volumetric; OCUnits=Total; PHUnits=Water
              Thickness=[200, 100, 100, 100, 100, 100, 100, 100, 100, 100, 100, 100, 100, 100, 100, 100, 100, 100, 100, 100, 100, 100]
              SW=[0.188, 0.197, 0.154, 0.113, 0.09, 0.082, 0.079, 0.075, 0.083, 0.101, 0.099, 0.088, 0.083, 0.085, 0.09, 0.093, 0.094, 0.098, 0.1, 0.103, 0.109, 0.113]
            CERESSoilTemperature
          Plant Slurp
          MicroClimate: a_interception=0; b_interception=1; c_interception=0; d_interception=0; soil_albedo=0.23; SoilHeatFluxFraction=0.4; MinimumHeightDiffForNewLayer=0; NightInterceptionFraction=0.5; ReferenceHeight=2
          Irrigation
          Fertiliser
          SurfaceOrganicMatter surface organic matter: InitialResidueName=wheat; InitialResidueType=wheat; InitialResidueMass=2000; InitialStandingFraction=0; InitialCPR=0; InitialCNR=80
          Report: EventNames=[Clock].DoReport
          Report SummaryNumbers: EventNames=[Clock].EndOfSimulation
    Experiment AshleyDene
      DisabledSimNames=[AshleyDeneSowingDateSD1, AshleyDeneSowingDateSD3, AshleyDeneSowingDateSD4, AshleyDeneSowingDateSD5, AshleyDeneSowingDateSD7, AshleyDeneSowingDateSD10, AshleyDeneSowingDateSD9, AshleyDeneSowingDateSD8, AshleyDeneSowingDateSD6]
      Factors
        Factor SowingDate
          CompositeFactor SD1
            Specifications:
              [SlurpSowingRule].Script.SowingDate = 2010-10-21
              [Clock].StartDate = 2010-10-21
              [SlurpSowingRule].Script.RFV = 35
              [SetCropVariables].Script.CoverFile = C:\Data\Master\03processed-data\CoverData\LAIAshleyDeneSD1.csv
              [Soil]
            Soil: SoilType=Udic Haplustept (US), Pallic orthic brown soil (NZ); Site=Ashley Dene: Lincoln University Research Farm; NearestTown=Lincoln; Country=New Zealand; Latitude=999999; Longitude=999999
              Comments=Soil water characterised from NNM (2 years). Stone content and BD  from Di and Cameron 2002. Soil saturation from Cichota 2013.
              Chemical: same as NewZealand.Iversen12.Factors.SowingDate.SD1.Soil.Chemical
              Physical
                Thickness  BD    AirDry  LL15   DUL    SAT
                200        1.15  0.063   0.063  0.27   0.27
                100        1.15  0.08    0.08   0.194  0.194
                100        1.31  0.074   0.074  0.158  0.158
                100        1.31  0.076   0.076  0.135  0.135
                100        1.95  0.069   0.069  0.118  0.118
                100        1.95  0.07    0.07   0.114  0.114
                100        1.95  0.07    0.07   0.111  0.111
                100        1.95  0.07    0.07   0.115  0.115
                100        1.95  0.069   0.069  0.115  0.115
                100        1.95  0.07    0.07   0.11   0.11
                100        1.95  0.073   0.073  0.106  0.106
                100        1.95  0.079   0.079  0.116  0.116
                100        1.95  0.084   0.084  0.114  0.114
                100        1.95  0.086   0.086  0.13   0.13
                100        1.95  0.092   0.092  0.138  0.138
                100        1.95  0.096   0.096  0.134  0.134
                100        1.95  0.094   0.094  0.126  0.126
                100        1.95  0.095   0.095  0.128  0.128
                100        1.95  0.095   0.095  0.122  0.122
                100        1.95  0.095   0.095  0.116  0.116
                100        1.95  0.098   0.098  0.128  0.128
                100        1.95  0.1     0.1    0.147  0.147
                SoilCrop SlurpSoil
                  LL=[0.063, 0.08, 0.074, 0.076, 0.069, 0.07, 0.07, 0.07, 0.069, 0.07, 0.073, 0.079, 0.084, 0.086, 0.092, 0.096, 0.094, 0.095, 0.095, 0.095, 0.098, 0.1]
                  KL=[0.055, 0.05, 0.045, 0.041, 0.037, 0.033, 0.03, 0.027, 0.025, 0.022, 0.02, 0.018, 0.017, 0.015, 0.014, 0.012, 0.011, 0.01, 0.009, 0.008, 0.007, 0.007]
                  XF=[1, 1, 1, 1, 1, 1, 1, 1, 1, 1, 1, 1, 1, 1, 1, 1, 1, 1, 1, 1, 1, 1]
              WaterBalance SoilWater: same as NewZealand.Iversen12.Factors.SowingDate.SD1.Soil.SoilWater
              SoilNitrogen: same as NewZealand.Iversen12.Factors.SowingDate.SD1.Soil.SoilNitrogen
              Organic: same as NewZealand.Iversen12.Factors.SowingDate.SD1.Soil.Organic
              Sample Initial nitrogen: same as NewZealand.Iversen12.Factors.SowingDate.SD1.Soil.Initial nitrogen
              CERESSoilTemperature
              Sample InitialConditions: SWUnits=Volumetric; OCUnits=Total; PHUnits=Water
                Thickness=[200, 100, 100, 100, 100, 100, 100, 100, 100, 100, 100, 100, 100, 100, 100, 100, 100, 100, 100, 100, 100, 100]
                SW=[0.09, 0.13, 0.11, 0.11, 0.102, 0.098, 0.1, 0.103, 0.101, 0.097, 0.096, 0.1, 0.106, 0.106, 0.114, 0.117, 0.112, 0.109, 0.11, 0.11, 0.114, 0.118]
          CompositeFactor SD2
            Specifications:
              [SlurpSowingRule].Script.SowingDate = 2010-11-09
              [Clock].StartDate = 2010-11-09
              [SlurpSowingRule].Script.RFV = 35
              [SetCropVariables].Script.CoverFile = C:\Data\Master\03processed-data\CoverData\LAIAshleyDeneSD2.csv
              [Soil]
            Soil: SoilType=Udic Haplustept (US), Pallic orthic brown soil (NZ); Site=Ashley Dene: Lincoln University Research Farm; NearestTown=Lincoln; Country=New Zealand; Latitude=999999; Longitude=999999
              Comments=Soil water characterised from NNM (2 years). Stone content and BD  from Di and Cameron 2002. Soil saturation from Cichota 2013.
              Chemical: same as NewZealand.Iversen12.Factors.SowingDate.SD2.Soil.Chemical
              Physical
                Thickness  BD    AirDry  LL15   DUL    SAT
                200        1.15  0.076   0.076  0.275  0.275
                100        1.15  0.096   0.096  0.221  0.221
                100        1.31  0.084   0.084  0.168  0.168
                100        1.31  0.073   0.073  0.135  0.135
                100        1.95  0.074   0.074  0.121  0.121
                100        1.95  0.072   0.072  0.118  0.118
                100        1.95  0.068   0.068  0.112  0.112
                100        1.95  0.064   0.064  0.108  0.108
                100        1.95  0.064   0.064  0.102  0.102
                100        1.95  0.064   0.064  0.101  0.101
                100        1.95  0.064   0.064  0.101  0.101
                100        1.95  0.064   0.064  0.111  0.111
                100        1.95  0.068   0.068  0.12   0.12
                100        1.95  0.064   0.064  0.123  0.123
                100        1.95  0.07    0.07   0.114  0.114
                100        1.95  0.07    0.07   0.109  0.109
                100        1.95  0.073   0.073  0.108  0.108
                100        1.95  0.076   0.076  0.112  0.112
                100        1.95  0.079   0.079  0.115  0.115
                100        1.95  0.082   0.082  0.114  0.114
                100        1.95  0.087   0.087  0.118  0.118
                100        1.95  0.102   0.102  0.12   0.12
                SoilCrop SlurpSoil
                  LL=[0.076, 0.096, 0.084, 0.073, 0.074, 0.072, 0.068, 0.064, 0.064, 0.064, 0.064, 0.064, 0.068, 0.064, 0.07, 0.07, 0.073, 0.076, 0.079, 0.082, 0.087, 0.102]
                  KL=[0.075, 0.0713422, 0.0678628, 0.0645531, 0.0614048, 0.0584101, 0.0555614, 0.0528516, 0.050274, 0.0478221, 0.0454898, 0.0432712, 0.0411609, 0.0391534, 0.0372439, 0.0354275, 0.0336997, 0.03205612, 0.0304927, 0.0290056, 0.027591, 0.0262453]
                  XF=[1, 1, 1, 1, 1, 1, 1, 1, 1, 1, 1, 1, 1, 1, 1, 1, 1, 1, 1, 1, 1, 1]
              WaterBalance SoilWater: same as NewZealand.Iversen12.Factors.SowingDate.SD1.Soil.SoilWater
              SoilNitrogen: same as NewZealand.Iversen12.Factors.SowingDate.SD1.Soil.SoilNitrogen
              Organic: same as NewZealand.Iversen12.Factors.SowingDate.SD1.Soil.Organic
              Sample Initial nitrogen: same as NewZealand.Iversen12.Factors.SowingDate.SD1.Soil.Initial nitrogen
              CERESSoilTemperature
              Sample InitialConditions: SWUnits=Volumetric; OCUnits=Total; PHUnits=Water
                Thickness=[200, 100, 100, 100, 100, 100, 100, 100, 100, 100, 100, 100, 100, 100, 100, 100, 100, 100, 100, 100, 100, 100]
                SW=[0.205, 0.189, 0.143, 0.114, 0.103, 0.101, 0.096, 0.093, 0.095, 0.087, 0.09, 0.095, 0.102, 0.103, 0.098, 0.095, 0.094, 0.102, 0.107, 0.107, 0.109, 0.114]
          CompositeFactor SD3
            Specifications:
              [SlurpSowingRule].Script.SowingDate = 2010-12-08
              [Clock].StartDate = 2010-12-08
              [SlurpSowingRule].Script.RFV = 30
              [SetCropVariables].Script.CoverFile = C:\Data\Master\03processed-data\CoverData\LAIAshleyDeneSD3.csv
              [Soil]
            Soil: SoilType=Udic Haplustept (US), Pallic orthic brown soil (NZ); Site=Ashley Dene: Lincoln University Research Farm; NearestTown=Lincoln; Country=New Zealand; Latitude=999999; Longitude=999999
              Comments=Soil water characterised from NNM (2 years). Stone content and BD  from Di and Cameron 2002. Soil saturation from Cichota 2013.
              Chemical: same as NewZealand.Iversen12.Factors.SowingDate.SD2.Soil.Chemical
              Physical
                Thickness  BD    AirDry  LL15   DUL    SAT
                200        1.15  0.074   0.074  0.278  0.278
                100        1.15  0.086   0.086  0.212  0.212
                100        1.31  0.081   0.081  0.166  0.166
                100        1.31  0.079   0.079  0.143  0.143
                100        1.95  0.074   0.074  0.133  0.133
                100        1.95  0.07    0.07   0.119  0.119
                100        1.95  0.072   0.072  0.127  0.127
                100        1.95  0.069   0.069  0.117  0.117
                100        1.95  0.064   0.064  0.107  0.107
                100        1.95  0.063   0.063  0.104  0.104
                100        1.95  0.065   0.065  0.105  0.105
                100        1.95  0.067   0.067  0.109  0.109
                100        1.95  0.069   0.069  0.115  0.115
                100        1.95  0.072   0.072  0.117  0.117
                100        1.95  0.074   0.074  0.117  0.117
                100        1.95  0.076   0.076  0.114  0.114
                100        1.95  0.081   0.081  0.114  0.114
                100        1.95  0.088   0.088  0.113  0.113
                100        1.95  0.094   0.094  0.12   0.12
                100        1.95  0.1     0.1    0.123  0.123
                100        1.95  0.099   0.099  0.125  0.125
                100        1.95  0.095   0.095  0.123  0.123
                SoilCrop SlurpSoil
                  LL=[0.074, 0.086, 0.081, 0.079, 0.074, 0.07, 0.072, 0.069, 0.064, 0.063, 0.065, 0.067, 0.069, 0.072, 0.074, 0.076, 0.081, 0.088, 0.094, 0.1, 0.099, 0.095]
                  KL=[0.095, 0.086, 0.078, 0.07, 0.064, 0.058, 0.052, 0.047, 0.043, 0.039, 0.035, 0.032, 0.029, 0.026, 0.023, 0.021, 0.019, 0.017, 0.016, 0.014, 0.013, 0.012]
                  XF=[1, 1, 1, 1, 1, 1, 1, 1, 1, 1, 1, 1, 1, 1, 1, 1, 1, 1, 1, 1, 1, 1]
              WaterBalance SoilWater: same as NewZealand.Iversen12.Factors.SowingDate.SD1.Soil.SoilWater
              SoilNitrogen: same as NewZealand.Iversen12.Factors.SowingDate.SD1.Soil.SoilNitrogen
              Organic: same as NewZealand.Iversen12.Factors.SowingDate.SD1.Soil.Organic
              Sample Initial nitrogen: same as NewZealand.Iversen12.Factors.SowingDate.SD1.Soil.Initial nitrogen
              CERESSoilTemperature
              Sample InitialConditions: SWUnits=Volumetric; OCUnits=Total; PHUnits=Water
                Thickness=[200, 100, 100, 100, 100, 100, 100, 100, 100, 100, 100, 100, 100, 100, 100, 100, 100, 100, 100, 100, 100, 100]
                SW=[0.133, 0.139, 0.116, 0.109, 0.099, 0.094, 0.105, 0.096, 0.088, 0.088, 0.085, 0.091, 0.096, 0.1, 0.102, 0.098, 0.101, 0.102, 0.107, 0.111, 0.111, 0.121]
          CompositeFactor SD4
            Specifications:
              [SlurpSowingRule].Script.SowingDate = 2011-01-13
              [Clock].StartDate = 2011-01-13
              [SlurpSowingRule].Script.RFV = 10
              [Soil]
              [SetCropVariables].Script.CoverFile = C:\Data\Master\03processed-data\CoverData\LAIAshleyDeneSD4.csv
            Soil: SoilType=Udic Haplustept (US), Pallic orthic brown soil (NZ); Site=Ashley Dene: Lincoln University Research Farm; NearestTown=Lincoln; Country=New Zealand; Latitude=999999; Longitude=999999
              Comments=Soil water characterised from NNM (2 years). Stone content and BD  from Di and Cameron 2002. Soil saturation from Cichota 2013.
              Chemical: same as NewZealand.Iversen12.Factors.SowingDate.SD2.Soil.Chemical
              Physical
                Thickness  BD    AirDry  LL15   DUL    SAT
                200        1.15  0.07    0.07   0.3    0.3
                100        1.15  0.083   0.083  0.243  0.243
                100        1.31  0.075   0.075  0.181  0.181
                100        1.31  0.07    0.07   0.151  0.151
                100        1.95  0.068   0.068  0.129  0.129
                100        1.95  0.067   0.067  0.12   0.12
                100        1.95  0.068   0.068  0.114  0.114
                100        1.95  0.068   0.068  0.114  0.114
                100        1.95  0.068   0.068  0.111  0.111
                100        1.95  0.071   0.071  0.11   0.11
                100        1.95  0.075   0.075  0.109  0.109
                100        1.95  0.08    0.08   0.116  0.116
                100        1.95  0.083   0.083  0.121  0.121
                100        1.95  0.086   0.086  0.117  0.117
                100        1.95  0.093   0.093  0.116  0.116
                100        1.95  0.101   0.101  0.12   0.12
                100        1.95  0.106   0.106  0.122  0.122
                100        1.95  0.11    0.11   0.123  0.123
                100        1.95  0.108   0.108  0.122  0.122
                100        1.95  0.105   0.105  0.117  0.117
                100        1.95  0.107   0.107  0.117  0.117
                100        1.95  0.106   0.106  0.118  0.118
                SoilCrop SlurpSoil
                  LL=[0.07, 0.083, 0.075, 0.07, 0.068, 0.067, 0.068, 0.068, 0.068, 0.071, 0.075, 0.08, 0.083, 0.086, 0.093, 0.101, 0.106, 0.11, 0.108, 0.105, 0.107, 0.106]
                  KL=[0.11, 0.11, 0.11, 0.11, 0.049, 0.04, 0.033, 0.027, 0.022, 0.018, 0.015, 0.012, 0.01, 0.008, 0.007, 0.005, 0.004, 0.004, 0.003, 0.002, 0.002, 0.002]
                  XF=[1, 1, 1, 1, 1, 1, 1, 1, 1, 1, 1, 1, 1, 1, 1, 1, 1, 1, 1, 1, 1, 1]
              WaterBalance SoilWater: same as NewZealand.Iversen12.Factors.SowingDate.SD1.Soil.SoilWater
              SoilNitrogen: same as NewZealand.Iversen12.Factors.SowingDate.SD1.Soil.SoilNitrogen
              Organic: same as NewZealand.Iversen12.Factors.SowingDate.SD1.Soil.Organic
              Sample Initial nitrogen: same as NewZealand.Iversen12.Factors.SowingDate.SD1.Soil.Initial nitrogen
              CERESSoilTemperature
              Sample InitialConditions: SWUnits=Volumetric; OCUnits=Total; PHUnits=Water
                Thickness=[200, 100, 100, 100, 100, 100, 100, 100, 100, 100, 100, 100, 100, 100, 100, 100, 100, 100, 100, 100, 100, 100]
                SW=[0.194, 0.18, 0.134, 0.111, 0.098, 0.091, 0.091, 0.094, 0.09, 0.091, 0.09, 0.1, 0.102, 0.105, 0.106, 0.109, 0.112, 0.118, 0.118, 0.113, 0.115, 0.116]
          CompositeFactor SD5
            Specifications:
              [SlurpSowingRule].Script.SowingDate = 2011-02-03
              [Clock].StartDate = 2011-02-03
              [SlurpSowingRule].Script.RFV = 35
              [Soil]
              [SetCropVariables].Script.CoverFile = C:\Data\Master\03processed-data\CoverData\LAIAshleyDeneSD5.csv
            Soil: SoilType=Udic Haplustept (US), Pallic orthic brown soil (NZ); Site=Ashley Dene: Lincoln University Research Farm; NearestTown=Lincoln; Country=New Zealand; Latitude=999999; Longitude=999999
              Comments=Soil water characterised from NNM (2 years). Stone content and BD  from Di and Cameron 2002. Soil saturation from Cichota 2013.
              Chemical: same as NewZealand.Iversen12.Factors.SowingDate.SD2.Soil.Chemical
              Physical
                Thickness  BD    AirDry  LL15   DUL    SAT
                200        1.15  0.066   0.066  0.283  0.283
                100        1.15  0.077   0.077  0.206  0.206
                100        1.31  0.077   0.077  0.162  0.162
                100        1.31  0.072   0.072  0.144  0.144
                100        1.95  0.07    0.07   0.126  0.126
                100        1.95  0.07    0.07   0.114  0.114
                100        1.95  0.065   0.065  0.11   0.11
                100        1.95  0.063   0.063  0.106  0.106
                100        1.95  0.064   0.064  0.108  0.108
                100        1.95  0.068   0.068  0.104  0.104
                100        1.95  0.07    0.07   0.111  0.111
                100        1.95  0.073   0.073  0.108  0.108
                100        1.95  0.077   0.077  0.11   0.11
                100        1.95  0.082   0.082  0.114  0.114
                100        1.95  0.085   0.085  0.119  0.119
                100        1.95  0.088   0.088  0.117  0.117
                100        1.95  0.089   0.089  0.116  0.116
                100        1.95  0.09    0.09   0.115  0.115
                100        1.95  0.087   0.087  0.109  0.109
                100        1.95  0.087   0.087  0.11   0.11
                100        1.95  0.089   0.089  0.107  0.107
                100        1.95  0.091   0.091  0.111  0.111
                SoilCrop SlurpSoil
                  LL=[0.066, 0.077, 0.077, 0.072, 0.07, 0.07, 0.065, 0.063, 0.064, 0.068, 0.07, 0.073, 0.077, 0.082, 0.085, 0.088, 0.089, 0.09, 0.087, 0.087, 0.089, 0.091]
                  KL=[0.1, 0.095, 0.09, 0.086, 0.082, 0.078, 0.074, 0.07, 0.067, 0.064, 0.061, 0.058, 0.055, 0.052, 0.05, 0.047, 0.045, 0.043, 0.041, 0.039, 0.037, 0.035]
                  XF=[1, 1, 1, 1, 1, 1, 1, 1, 1, 1, 1, 1, 1, 1, 1, 1, 1, 1, 1, 1, 1, 1]
              WaterBalance SoilWater: same as NewZealand.Iversen12.Factors.SowingDate.SD1.Soil.SoilWater
              SoilNitrogen: same as NewZealand.Iversen12.Factors.SowingDate.SD1.Soil.SoilNitrogen
              Organic: same as NewZealand.Iversen12.Factors.SowingDate.SD1.Soil.Organic
              Sample Initial nitrogen: same as NewZealand.Iversen12.Factors.SowingDate.SD1.Soil.Initial nitrogen
              CERESSoilTemperature
              Sample InitialConditions: SWUnits=Volumetric; OCUnits=Total; PHUnits=Water
                Thickness=[200, 100, 100, 100, 100, 100, 100, 100, 100, 100, 100, 100, 100, 100, 100, 100, 100, 100, 100, 100, 100, 100]
                SW=[0.167, 0.15, 0.118, 0.106, 0.099, 0.088, 0.087, 0.087, 0.087, 0.087, 0.091, 0.089, 0.093, 0.095, 0.1, 0.101, 0.101, 0.101, 0.102, 0.096, 0.099, 0.1]
          CompositeFactor SD6
            Specifications:
              [SlurpSowingRule].Script.SowingDate = 2011-10-10
              [Clock].StartDate = 2011-10-10
              [SlurpSowingRule].Script.RFV = 30
              [Soil]
              [SetCropVariables].Script.CoverFile = C:\Data\Master\03processed-data\CoverData\LAIAshleyDeneSD6.csv
            Soil: SoilType=Udic Haplustept (US), Pallic orthic brown soil (NZ); Site=Ashley Dene: Lincoln University Research Farm; NearestTown=Lincoln; Country=New Zealand; Latitude=999999; Longitude=999999
              Comments=Soil water characterised from NNM (2 years). Stone content and BD  from Di and Cameron 2002. Soil saturation from Cichota 2013.
              Chemical: same as NewZealand.Iversen12.Factors.SowingDate.SD2.Soil.Chemical
              Physical
                Thickness  BD    AirDry  LL15   DUL    SAT
                200        1.15  0.074   0.074  0.259  0.259
                100        1.15  0.086   0.086  0.172  0.172
                100        1.31  0.078   0.078  0.133  0.133
                100        1.31  0.073   0.073  0.108  0.108
                100        1.95  0.072   0.072  0.102  0.102
                100        1.95  0.073   0.073  0.103  0.103
                100        1.95  0.074   0.074  0.102  0.102
                100        1.95  0.077   0.077  0.099  0.099
                100        1.95  0.076   0.076  0.099  0.099
                100        1.95  0.074   0.074  0.094  0.094
                100        1.95  0.074   0.074  0.093  0.093
                100        1.95  0.073   0.073  0.09   0.09
                100        1.95  0.076   0.076  0.089  0.089
                100        1.95  0.079   0.079  0.09   0.09
                100        1.95  0.085   0.085  0.098  0.098
                100        1.95  0.091   0.091  0.099  0.099
                100        1.95  0.093   0.093  0.106  0.106
                100        1.95  0.095   0.095  0.104  0.104
                100        1.95  0.096   0.096  0.102  0.102
                100        1.95  0.097   0.097  0.102  0.102
                100        1.95  0.098   0.098  0.108  0.108
                100        1.95  0.106   0.106  0.114  0.114
                SoilCrop SlurpSoil
                  LL=[0.074, 0.086, 0.078, 0.073, 0.072, 0.073, 0.074, 0.077, 0.076, 0.074, 0.074, 0.073, 0.076, 0.079, 0.085, 0.091, 0.093, 0.095, 0.096, 0.097, 0.098, 0.106]
                  KL=[0.08, 0.076, 0.072, 0.069, 0.065, 0.062, 0.059, 0.056, 0.054, 0.051, 0.049, 0.046, 0.044, 0.042, 0.04, 0.038, 0.036, 0.034, 0.033, 0.031, 0.029, 0.028]
                  XF=[1, 1, 1, 1, 1, 1, 1, 1, 1, 1, 1, 1, 1, 1, 1, 1, 1, 1, 1, 1, 1, 1]
              WaterBalance SoilWater: same as NewZealand.Iversen12.Factors.SowingDate.SD1.Soil.SoilWater
              SoilNitrogen: same as NewZealand.Iversen12.Factors.SowingDate.SD1.Soil.SoilNitrogen
              Organic: same as NewZealand.Iversen12.Factors.SowingDate.SD1.Soil.Organic
              Sample Initial nitrogen: same as NewZealand.Iversen12.Factors.SowingDate.SD1.Soil.Initial nitrogen
              CERESSoilTemperature
              Sample InitialConditions: SWUnits=Volumetric; OCUnits=Total; PHUnits=Water
                Thickness=[200, 100, 100, 100, 100, 100, 100, 100, 100, 100, 100, 100, 100, 100, 100, 100, 100, 100, 100, 100, 100, 100]
                SW=[0.184, 0.16, 0.121, 0.102, 0.093, 0.089, 0.091, 0.093, 0.098, 0.094, 0.091, 0.089, 0.089, 0.089, 0.096, 0.098, 0.105, 0.102, 0.102, 0.099, 0.104, 0.109]
          CompositeFactor SD7
            Specifications:
              [SlurpSowingRule].Script.SowingDate = 2011-11-07
              [Clock].StartDate = 2011-11-07
              [SlurpSowingRule].Script.RFV = 30
              [Soil]
              [SetCropVariables].Script.CoverFile = C:\Data\Master\03processed-data\CoverData\LAIAshleyDeneSD7.csv
            Soil: SoilType=Udic Haplustept (US), Pallic orthic brown soil (NZ); Site=Ashley Dene: Lincoln University Research Farm; NearestTown=Lincoln; Country=New Zealand; Latitude=999999; Longitude=999999
              Comments=Soil water characterised from NNM (2 years). Stone content and BD  from Di and Cameron 2002. Soil saturation from Cichota 2013.
              Chemical: same as NewZealand.Iversen12.Factors.SowingDate.SD2.Soil.Chemical
              Physical
                Thickness  BD    AirDry  LL15   DUL    SAT
                200        1.15  0.091   0.091  0.276  0.276
                100        1.15  0.108   0.108  0.21   0.21
                100        1.31  0.091   0.091  0.159  0.159
                100        1.31  0.087   0.087  0.134  0.134
                100        1.95  0.083   0.083  0.121  0.121
                100        1.95  0.081   0.081  0.118  0.118
                100        1.95  0.079   0.079  0.108  0.108
                100        1.95  0.077   0.077  0.099  0.099
                100        1.95  0.076   0.076  0.1    0.1
                100        1.95  0.077   0.077  0.101  0.101
                100        1.95  0.077   0.077  0.102  0.102
                100        1.95  0.075   0.075  0.097  0.097
                100        1.95  0.079   0.079  0.094  0.094
                100        1.95  0.083   0.083  0.098  0.098
                100        1.95  0.087   0.087  0.102  0.102
                100        1.95  0.09    0.09   0.108  0.108
                100        1.95  0.095   0.095  0.106  0.106
                100        1.95  0.099   0.099  0.108  0.108
                100        1.95  0.1     0.1    0.111  0.111
                100        1.95  0.099   0.099  0.106  0.106
                100        1.95  0.104   0.104  0.114  0.114
                100        1.95  0.104   0.104  0.113  0.113
                SoilCrop SlurpSoil
                  LL=[0.091, 0.108, 0.091, 0.087, 0.083, 0.081, 0.079, 0.077, 0.076, 0.077, 0.077, 0.075, 0.079, 0.083, 0.087, 0.09, 0.095, 0.099, 0.1, 0.099, 0.104, 0.104]
                  KL=[0.075, 0.071, 0.068, 0.065, 0.061, 0.058, 0.056, 0.053, 0.05, 0.048, 0.045, 0.043, 0.041, 0.039, 0.037, 0.035, 0.034, 0.032, 0.03, 0.029, 0.028, 0.026]
                  XF=[1, 1, 1, 1, 1, 1, 1, 1, 1, 1, 1, 1, 1, 1, 1, 1, 1, 1, 1, 1, 1, 1]
              WaterBalance SoilWater: same as NewZealand.Iversen12.Factors.SowingDate.SD1.Soil.SoilWater
              SoilNitrogen: same as NewZealand.Iversen12.Factors.SowingDate.SD1.Soil.SoilNitrogen
              Organic: same as NewZealand.Iversen12.Factors.SowingDate.SD1.Soil.Organic
              Sample Initial nitrogen: same as NewZealand.Iversen12.Factors.SowingDate.SD1.Soil.Initial nitrogen
              CERESSoilTemperature
              Sample InitialConditions: SWUnits=Volumetric; OCUnits=Total; PHUnits=Water
                Thickness=[200, 100, 100, 100, 100, 100, 100, 100, 100, 100, 100, 100, 100, 100, 100, 100, 100, 100, 100, 100, 100, 100]
                SW=[0.193, 0.208, 0.148, 0.129, 0.115, 0.109, 0.101, 0.095, 0.096, 0.097, 0.095, 0.09, 0.087, 0.092, 0.098, 0.099, 0.102, 0.106, 0.107, 0.102, 0.109, 0.109]
          CompositeFactor SD8
            Specifications:
              [SlurpSowingRule].Script.SowingDate = 2011-12-09
              [Clock].StartDate = 2011-12-09
              [SlurpSowingRule].Script.RFV = 35
              [Soil]
              [SetCropVariables].Script.CoverFile = C:\Data\Master\03processed-data\CoverData\LAIAshleyDeneSD8.csv
            Soil: SoilType=Udic Haplustept (US), Pallic orthic brown soil (NZ); Site=Ashley Dene: Lincoln University Research Farm; NearestTown=Lincoln; Country=New Zealand; Latitude=999999; Longitude=999999
              Comments=Soil water characterised from NNM (2 years). Stone content and BD  from Di and Cameron 2002. Soil saturation from Cichota 2013.
              Chemical: same as NewZealand.Iversen12.Factors.SowingDate.SD2.Soil.Chemical
              Physical
                Thickness  BD    AirDry  LL15   DUL    SAT
                200        1.15  0.095   0.095  0.253  0.253
                100        1.15  0.091   0.091  0.168  0.168
                100        1.31  0.086   0.086  0.14   0.14
                100        1.31  0.08    0.08   0.118  0.118
                100        1.95  0.077   0.077  0.108  0.108
                100        1.95  0.076   0.076  0.105  0.105
                100        1.95  0.073   0.073  0.101  0.101
                100        1.95  0.074   0.074  0.097  0.097
                100        1.95  0.079   0.079  0.097  0.097
                100        1.95  0.08    0.08   0.096  0.096
                100        1.95  0.084   0.084  0.096  0.096
                100        1.95  0.085   0.085  0.096  0.096
                100        1.95  0.089   0.089  0.103  0.103
                100        1.95  0.093   0.093  0.11   0.11
                100        1.95  0.094   0.094  0.109  0.109
                100        1.95  0.098   0.098  0.109  0.109
                100        1.95  0.097   0.097  0.108  0.108
                100        1.95  0.098   0.098  0.108  0.108
                100        1.95  0.101   0.101  0.115  0.115
                100        1.95  0.11    0.11   0.123  0.123
                100        1.95  0.113   0.113  0.13   0.13
                100        1.95  0.115   0.115  0.125  0.125
                SoilCrop SlurpSoil
                  LL=[0.095, 0.091, 0.086, 0.08, 0.077, 0.076, 0.073, 0.074, 0.079, 0.08, 0.084, 0.085, 0.089, 0.093, 0.094, 0.098, 0.097, 0.098, 0.101, 0.11, 0.113, 0.115]
                  KL=[0.095, 0.086, 0.078, 0.07, 0.064, 0.058, 0.052, 0.047, 0.043, 0.039, 0.035, 0.032, 0.029, 0.026, 0.023, 0.021, 0.019, 0.017, 0.016, 0.014, 0.013, 0.012]
                  XF=[1, 1, 1, 1, 1, 1, 1, 1, 1, 1, 1, 1, 1, 1, 1, 1, 1, 1, 1, 1, 1, 1]
              WaterBalance SoilWater: same as NewZealand.Iversen12.Factors.SowingDate.SD1.Soil.SoilWater
              SoilNitrogen: same as NewZealand.Iversen12.Factors.SowingDate.SD1.Soil.SoilNitrogen
              Organic: same as NewZealand.Iversen12.Factors.SowingDate.SD1.Soil.Organic
              Sample Initial nitrogen: same as NewZealand.Iversen12.Factors.SowingDate.SD1.Soil.Initial nitrogen
              CERESSoilTemperature
              Sample InitialConditions: SWUnits=Volumetric; OCUnits=Total; PHUnits=Water
                Thickness=[200, 100, 100, 100, 100, 100, 100, 100, 100, 100, 100, 100, 100, 100, 100, 100, 100, 100, 100, 100, 100, 100]
                SW=[0.19, 0.109, 0.098, 0.094, 0.088, 0.09, 0.091, 0.089, 0.092, 0.094, 0.094, 0.095, 0.098, 0.102, 0.103, 0.105, 0.106, 0.104, 0.109, 0.119, 0.12, 0.121]
          CompositeFactor SD9
            Specifications:
              [SlurpSowingRule].Script.SowingDate = 2012-01-10
              [Clock].StartDate = 2012-01-10
              [SlurpSowingRule].Script.RFV = 10
              [Soil]
              [SetCropVariables].Script.CoverFile = C:\Data\Master\03processed-data\CoverData\LAIAshleyDeneSD9.csv
            Soil: SoilType=Udic Haplustept (US), Pallic orthic brown soil (NZ); Site=Ashley Dene: Lincoln University Research Farm; NearestTown=Lincoln; Country=New Zealand; Latitude=999999; Longitude=999999
              Comments=Soil water characterised from NNM (2 years). Stone content and BD  from Di and Cameron 2002. Soil saturation from Cichota 2013.
              Chemical: same as NewZealand.Iversen12.Factors.SowingDate.SD2.Soil.Chemical
              Physical
                Thickness  BD    AirDry  LL15   DUL    SAT
                200        1.15  0.11    0.11   0.27   0.27
                100        1.15  0.133   0.133  0.235  0.235
                100        1.31  0.102   0.102  0.169  0.169
                100        1.31  0.089   0.089  0.129  0.129
                100        1.95  0.084   0.084  0.116  0.116
                100        1.95  0.085   0.085  0.106  0.106
                100        1.95  0.088   0.088  0.101  0.101
                100        1.95  0.091   0.091  0.1    0.1
                100        1.95  0.092   0.092  0.098  0.098
                100        1.95  0.092   0.092  0.101  0.101
                100        1.95  0.093   0.093  0.101  0.101
                100        1.95  0.092   0.092  0.098  0.098
                100        1.95  0.094   0.094  0.104  0.104
                100        1.95  0.098   0.098  0.111  0.111
                100        1.95  0.104   0.104  0.117  0.117
                100        1.95  0.104   0.104  0.121  0.121
                100        1.95  0.102   0.102  0.113  0.113
                100        1.95  0.099   0.099  0.106  0.106
                100        1.95  0.096   0.096  0.104  0.104
                100        1.95  0.093   0.093  0.102  0.102
                100        1.95  0.099   0.099  0.11   0.11
                100        1.95  0.102   0.102  0.119  0.119
                SoilCrop SlurpSoil
                  LL=[0.11, 0.133, 0.102, 0.089, 0.084, 0.085, 0.088, 0.091, 0.092, 0.092, 0.093, 0.092, 0.094, 0.098, 0.104, 0.104, 0.102, 0.099, 0.096, 0.093, 0.099, 0.102]
                  KL=[0.035, 0.029, 0.023, 0.019, 0.016, 0.013, 0.011, 0.009, 0.007, 0.006, 0.005, 0.004, 0.003, 0.003, 0.002, 0.002, 0.001, 0.001, 0.001, 0.001, 0.001, 0.001]
                  XF=[1, 1, 1, 1, 1, 1, 1, 1, 1, 1, 1, 1, 1, 1, 1, 1, 1, 1, 1, 1, 1, 1]
              WaterBalance SoilWater: same as NewZealand.Iversen12.Factors.SowingDate.SD1.Soil.SoilWater
              SoilNitrogen: same as NewZealand.Iversen12.Factors.SowingDate.SD1.Soil.SoilNitrogen
              Organic: same as NewZealand.Iversen12.Factors.SowingDate.SD1.Soil.Organic
              Sample Initial nitrogen: same as NewZealand.Iversen12.Factors.SowingDate.SD1.Soil.Initial nitrogen
              CERESSoilTemperature
              Sample InitialConditions: SWUnits=Volumetric; OCUnits=Total; PHUnits=Water
                Thickness=[200, 100, 100, 100, 100, 100, 100, 100, 100, 100, 100, 100, 100, 100, 100, 100, 100, 100, 100, 100, 100, 100]
                SW=[0.167, 0.199, 0.144, 0.112, 0.097, 0.091, 0.091, 0.093, 0.095, 0.093, 0.095, 0.094, 0.094, 0.099, 0.105, 0.106, 0.105, 0.099, 0.096, 0.094, 0.099, 0.103]
          CompositeFactor SD10
            Specifications:
              [Clock].StartDate = 2012-02-17
              [SlurpSowingRule].Script.SowingDate = 2012-02-17
              [SlurpSowingRule].Script.RFV = 15
              [Soil]
              [SetCropVariables].Script.CoverFile = C:\Data\Master\03processed-data\CoverData\LAIAshleyDeneSD10.csv
            Soil: SoilType=Udic Haplustept (US), Pallic orthic brown soil (NZ); Site=Ashley Dene: Lincoln University Research Farm; NearestTown=Lincoln; Country=New Zealand; Latitude=999999; Longitude=999999
              Comments=Soil water characterised from NNM (2 years). Stone content and BD  from Di and Cameron 2002. Soil saturation from Cichota 2013.
              Chemical: same as NewZealand.Iversen12.Factors.SowingDate.SD2.Soil.Chemical
              Physical
                Thickness  BD    AirDry  LL15   DUL    SAT
                200        1.15  0.136   0.136  0.284  0.284
                100        1.15  0.167   0.167  0.239  0.239
                100        1.31  0.131   0.131  0.182  0.182
                100        1.31  0.103   0.103  0.134  0.134
                100        1.95  0.09    0.09   0.117  0.117
                100        1.95  0.082   0.082  0.111  0.111
                100        1.95  0.079   0.079  0.106  0.106
                100        1.95  0.075   0.075  0.107  0.107
                100        1.95  0.083   0.083  0.117  0.117
                100        1.95  0.101   0.101  0.118  0.118
                100        1.95  0.099   0.099  0.116  0.116
                100        1.95  0.088   0.088  0.112  0.112
                100        1.95  0.083   0.083  0.107  0.107
                100        1.95  0.085   0.085  0.103  0.103
                100        1.95  0.09    0.09   0.108  0.108
                100        1.95  0.093   0.093  0.113  0.113
                100        1.95  0.094   0.094  0.111  0.111
                100        1.95  0.098   0.098  0.11   0.11
                100        1.95  0.1     0.1    0.113  0.113
                100        1.95  0.103   0.103  0.115  0.115
                100        1.95  0.109   0.109  0.119  0.119
                100        1.95  0.113   0.113  0.123  0.123
                SoilCrop SlurpSoil
                  LL=[0.136, 0.167, 0.131, 0.103, 0.09, 0.082, 0.079, 0.075, 0.083, 0.101, 0.099, 0.088, 0.083, 0.085, 0.09, 0.093, 0.094, 0.098, 0.1, 0.103, 0.109, 0.113]
                  KL=[0.01, 0.008, 0.007, 0.005, 0.004, 0.004, 0.003, 0.002, 0.002, 0.002, 0.001, 0.001, 0.001, 0.001, 0.001, 0, 0, 0, 0, 0, 0, 0]
                  XF=[1, 1, 1, 1, 1, 1, 1, 1, 1, 1, 1, 1, 1, 1, 1, 1, 1, 1, 1, 1, 1, 1]
              WaterBalance SoilWater: same as NewZealand.Iversen12.Factors.SowingDate.SD1.Soil.SoilWater
              SoilNitrogen: same as NewZealand.Iversen12.Factors.SowingDate.SD1.Soil.SoilNitrogen
              Organic: same as NewZealand.Iversen12.Factors.SowingDate.SD1.Soil.Organic
              Sample Initial nitrogen: same as NewZealand.Iversen12.Factors.SowingDate.SD1.Soil.Initial nitrogen
              CERESSoilTemperature
              Sample InitialConditions: same as NewZealand.Iversen12.Iversen12.Field.Soil.InitialConditions
      Simulation AshleyDene
        Clock: Start=2010-10-03; End=2012-07-31
        Summary summaryfile
        Weather: FileName=C:\Data\Master\01raw-data\ClimateAndObserved\AshleyDene.met
        SoilArbitrator Soil Arbitrator
        Zone Field: Area=1; Slope=0; AspectAngle=0; Altitude=50
          Folder ManagerFolder
            Memo
              # ReportOnDates
              Disabled by [Clock].DoReport

              # SlurpSowingRule
              Critical manager to control the sowing rules and canopy paramters.

              # SetCropVariables
              Critical manager that controls the fractional light interception and extinction coeficient data input.
            Manager ReportOnDates: same as NewZealand.Iversen12.Iversen12.Field.ManagerFolder.ReportOnDates
            Manager SlurpSowingRule: same as NewZealand.Iversen12.Iversen12.Field.ManagerFolder.SlurpSowingRule
            Manager SetCropVariables
              CoverFile = C:/Data/Master/03processed-data/CoverData/CoverDataAshleyDeneSD10.csv
              Ext_coef = 0
              MaximumHeight = 390
              LAI = LAImod
              Extinctioncoefficient = 0.94
              Treatment =
              CoverRead = 0
              leaflai = 0
```csharp
using Models.Soils;
using System.Data;
using APSIM.Shared.Utilities;
using System.Xml.Serialization;
using Models;
using Models.PMF;
using System.Text;
using System.Collections.Generic;
using Models.Core;
using System;
namespace Models
{
    [Serializable] 
    //[System.Xml.Serialization.XmlInclude(typeof(Model))]
    public class Script : Model
    {
        [Link] Plant SCUM;
        [Link] Clock Clock;
        [Link] Zone zone;
        [Link] Simulation Simulation;
        [Link] Soil Soil;
        [Link] ISummary mysum;
        
        [Description("File of Light interception and Extinction coefficient")]
        public string CoverFile { get; set; }
        //[Description("Extinction coefficient (if constant).")]
        public double Ext_coef { get; set; }
        [Description("Maximum height of the crop at full cover")]
        public double MaximumHeight { get; set; }
        
        [XmlIgnore] private DataTable Covers { get; set; }
        [Description("Column name for the LEAF AREA INDEX")]
        public string LAI { get; set; }
        [Description("Column name for the USER provide Extinction coefficient")]
        public double Extinctioncoefficient { get; set; }
        //public string Irrigation { get; set; }
        public string Treatment { get; set; }
        
        public double CoverRead { get; set; }
        public double leaflai { get; private set; }
                
        [EventSubscribe("StartOfSimulation")]
        private void OnStartOfSimulation(object sender, EventArgs e)
        {
            
            Treatment = LAI;
            
            string fullFileName = PathUtilities.GetAbsolutePath(CoverFile, Simulation.FileName);
            
            ApsimTextFile textFile = new ApsimTextFile();
            textFile.Open(fullFileName);
            Covers = textFile.ToTable();
            textFile.Close();
        }
        
        [EventSubscribe("StartOfDay")]
        private void OnStartOfDay(object sender, EventArgs e)
        {
            foreach (DataRow row in Covers.Rows)
            {
                DateTime TodayDate = Convert.ToDateTime(row["Clock.Today"]);
                if (TodayDate.Date == Clock.Today.Date)
                {
                	mysum.WriteMessage(this, "Date" + Clock.Today.Date);
                    leaflai = Convert.ToDouble(row[Treatment]);
                    //Ext_coef = Convert.ToDouble(row[Extinctioncoefficient]);
                }
            }
        
            //if ((bool)zone.Get("Slurp.IsAlive") == true)
            //{
                //Only assign cover valuse if crop is emerged

                CoverRead = 1 - Math.Exp( - Extinctioncoefficient * leaflai);

                /*
                if (CoverRead == 1)
                    leaflai = Math.Log(0.01) / -Ext_coef;
                else
                {
                    if (CoverRead > 0)
                        leaflai = Math.Log(1 - CoverRead) / -Ext_coef;
                    else
                        leaflai = 0;
                }
                */

                //Summary.WriteMessage(this, "LAI " + leaflai);
                object LAIResetValue = leaflai;
                zone.Set("Slurp.Leaf.Area.FixedValue", LAIResetValue);  
                object kResetValue = Extinctioncoefficient;
                zone.Set("Slurp.Leaf.ExtinctionCoefficient.FixedValue", kResetValue);  
                object HeightResetValue = CoverRead * MaximumHeight;
                zone.Set("Slurp.Leaf.Tallness.FixedValue", HeightResetValue);  
            //}
            
            /*if ((Clock.Today.DayOfYear == 160) && (Clock.Today.Year == 2011))
                Soil.SoilWater.Reset();
                */
        }
        /*[EventSubscribe("StartOfDay")]
        private void OnEndOfDay(object sender, EventArgs e)
        {
            if ((Clock.Today.DayOfYear == 66) && (Clock.Today.Year == 2012) && (Irrigation == "Rain"))
            {
                if (Cover == "Lucerne")
                {
                    double[] ValuesToSet = { 0.18, 0.21, 0.20, 0.06, 0.05, 0.06, 0.07, 0.08, 0.10, 0.14, 0.14, 0.14, 0.14 };
                    Soil.SoilWater.SW = ValuesToSet;
                }
                if (Cover == "Ryegrass")
                {
                    double[] ValuesToSet = { 0.14, 0.20, 0.25, 0.11, 0.07, 0.08, 0.09, 0.09, 0.11, 0.14, 0.14, 0.14, 0.14 };
                    Soil.SoilWater.SW = ValuesToSet;
                }
            }
        }*/
    }
}
```
          Soil: same as NewZealand.Iversen12.Iversen12.Field.Soil
          Plant Slurp
          MicroClimate: a_interception=0; b_interception=1; c_interception=0; d_interception=0; soil_albedo=0.23; SoilHeatFluxFraction=0.4; MinimumHeightDiffForNewLayer=0; NightInterceptionFraction=0.5; ReferenceHeight=2
          Irrigation
          Fertiliser
          SurfaceOrganicMatter surface organic matter: InitialResidueName=wheat; InitialResidueType=wheat; InitialResidueMass=2000; InitialStandingFraction=0; InitialCPR=0; InitialCNR=80
          Report: EventNames=[Clock].DoReport
          Report SummaryNumbers: EventNames=[Clock].EndOfSimulation
    Experiment LnP (disabled)
      Factors
        Permutation
          Factor KLR
            Specification=[SlurpSowingRule].Script.KLReductionFactor = 0.0005,00.001,00.002,00.003,00.005,000.01
          Factor RFV: Specification=[SlurpSowingRule].Script.RFV = 10,15,20,25,30,35
      Simulation LandPBase
        Weather: FileName=C:/Data/Master/01raw-data/ClimateAndObserved/AshleyDene.met
        Clock: Start=2012-02-17; End=2012-07-31
        Summary
        SoilArbitrator Soil Arbitrator
        Zone Field: Area=1; Slope=0; AspectAngle=0; Altitude=50
          Folder ManagerFolder
            Memo
              # ReportOnDates
              Disabled by [Clock].DoReport

              # SlurpSowingRule
              Critical manager to control the sowing rules and canopy paramters.

              # SetCropVariables
              Critical manager that controls the fractional light interception and extinction coeficient data input.
            Manager ReportOnDates
              TodayString =
              script: same as in NewZealand.Iversen12.Iversen12.Field.ManagerFolder.ReportOnDates
            Manager SlurpSowingRule
              SowingDate = 02/17/2012 00:00:00
              RFV = 10
              CultivarName = Lucerne
              InitialRootDepth = 15
              RootDepth = 2300
              KLReductionFactor = -0.002
              KLReductionDepth = 150
              YKLModifiers =
              XDepth =
              MaxG = 0.006
              R50 = 100
```csharp
using Models.Soils;
using APSIM.Shared.Utilities;
using Models.PMF;
using Models.Core;
using System;
        
namespace Models
{
    [Serializable] 
    [System.Xml.Serialization.XmlInclude(typeof(Model))]
    public class Script : Model
    {
        [Link] Plant Slurp;
        [Link] Clock Clock;
        [Link] Soil Soil;
        [Link] Zone zone;
        
        [Description("Cultivar")]
        public string CultivarName { get; set; }
        [Description("Initial Root Depth")]
        public double InitialRootDepth { get; set; }
        [Description("Sowing Date")]
        public DateTime SowingDate { get; set; }
        [Description("Maximum Root Depth")]
        public double RootDepth { get; set; }
        [Description("Roof Front Velocity")]
        public double RFV { get; set; }
        [Description("Factor to change Kl modifier with Depth")]
        public double KLReductionFactor { get; set; }
        [Description("Depth that KL starts to decline")]
        public double KLReductionDepth { get; set; }
        
        public double[] YKLModifiers { get; set; }
        public double[] XDepth { get; set; }
        private double Depth { get; set; }
        
        [Description("Maximum Stomatal Conductance")]
        public double MaxG { get; set; }
        [Description("Stomatal Radn response")]
        public double R50 { get; set; }
        
        [EventSubscribe("DoManagement")]
        private void OnDoManagement(object sender, EventArgs e)
        {
            if (Clock.Today.Date == SowingDate)
            {
                Slurp.Sow(cultivar: CultivarName, population: 1, depth: InitialRootDepth, rowSpacing: 150);
                
                YKLModifiers = new double[Soil.Thickness.Length];
                XDepth = new double[Soil.Thickness.Length];
                Depth = 0;
                for (int layer = 0; layer < Soil.Thickness.Length; layer++)
                {
                    Depth += Soil.Thickness[layer] / 2;  //Add half of the thickness of the current layer so depth is the mid depth of that layer
                    if (Depth <= KLReductionDepth)
                    {
                        YKLModifiers[layer] = 1;
                        XDepth[layer] = Depth;
                    }
                    else
                    {
                        double KLMod = 1 * Math.Exp(-KLReductionFactor * (Depth - KLReductionDepth));
                        YKLModifiers[layer] = KLMod;
                        XDepth[layer] = Depth;
                    }
                    Depth += Soil.Thickness[layer] / 2;  //Add the other half of the current layer so depth is the top of the next layer
                }
                object KLMods = YKLModifiers;
                zone.Set("Slurp.Root.KLModifier.XYPairs.Y", KLMods);
                object Depths = XDepth;
                zone.Set("Slurp.Root.KLModifier.XYPairs.X", Depths);
                object RD = RootDepth;
                zone.Set("Slurp.Root.MaximumRootDepth.FixedValue", RD);
                object RV = RFV;
                zone.Set("Slurp.Root.RootFrontVelocity.Potential.FixedValue", RV);
                object GMaxValue = MaxG;
                zone.Set("Slurp.Leaf.Gsmax350", GMaxValue); 
                object R50Value = R50; 
                zone.Set("Slurp.Leaf.R50", R50Value); 
                
            }
        }
    }
}
```
            Manager SetCropVariables
              CoverFile = %root%\Tests\Validation\Slurp\ShallowSoilTest\CoverInterpolated.csv
              Ext_coef = 0.8
              MaximumHeight = 600
              Cover = LightInterception
              Irrigation =
              Treatment =
              leaflai = 0
```csharp
using Models.Soils;
using System.Data;
using APSIM.Shared.Utilities;
using System.Xml.Serialization;
using Models;
using Models.PMF;
using System.Text;
using System.Collections.Generic;
using Models.Core;
using System;
namespace Models
{
    [Serializable] 
    //[System.Xml.Serialization.XmlInclude(typeof(Model))]
    public class Script : Model
    {
        [Link] Plant SCUM;
        [Link] Clock Clock;
        [Link] Zone zone;
        [Link] Simulation Simulation;
        [Link] Soil Soil;
        
        [Description("File of Yields")]
        public string CoverFile { get; set; }
        [Description("Extinction coefficient")]
        public  double Ext_coef { get; set; }
        [Description("Maximum height of the crop at full cover")]
        public double MaximumHeight { get; set; }
        
        [XmlIgnore] private DataTable Covers { get; set; }

        public string Cover { get; set; }
        public string Irrigation { get; set; }
        public string Treatment { get; set; }
        
        private double CoverRead { get; set; }
        public double leaflai { get; private set; }
                
        [EventSubscribe("StartOfSimulation")]
        private void OnStartOfSimulation(object sender, EventArgs e)
        {
            
            Treatment = Cover + "_" + Irrigation;
            
            string fullFileName = PathUtilities.GetAbsolutePath(CoverFile, Simulation.FileName);
            
            ApsimTextFile textFile = new ApsimTextFile();
            textFile.Open(fullFileName);
            Covers = textFile.ToTable();
            textFile.Close();
        }
        
        [EventSubscribe("StartOfDay")]
        private void OnStartOfDay(object sender, EventArgs e)
        {
            foreach (DataRow row in Covers.Rows)
            {
                DateTime TodayDate = Convert.ToDateTime(row["Date"]);
                if (TodayDate.Date == Clock.Today.Date)
                {
                    CoverRead = Convert.ToDouble(row[Treatment]);
                }
            }
        
            if ((bool)zone.Get("Slurp.IsAlive") == true)
            {
                //Only assign cover valuse if crop is emerged
                
                if (CoverRead == 1)
                    leaflai = Math.Log(0.01) / -Ext_coef;
                else
                {
                    if (CoverRead > 0)
                        leaflai = Math.Log(1 - CoverRead) / -Ext_coef;
                    else
                        leaflai = 0;
                }
                //Summary.WriteMessage(this, "LAI " + leaflai);
                object LAIResetValue = leaflai;
                zone.Set("Slurp.Leaf.Area.FixedValue", LAIResetValue);  
                object HeightResetValue = CoverRead * MaximumHeight;
                zone.Set("Slurp.Leaf.Tallness.FixedValue", HeightResetValue);  
            }
            
            if ((Clock.Today.DayOfYear == 160) && (Clock.Today.Year == 2011))
                Soil.SoilWater.Reset();
        }
        [EventSubscribe("StartOfDay")]
        private void OnEndOfDay(object sender, EventArgs e)
        {
            if ((Clock.Today.DayOfYear == 66) && (Clock.Today.Year == 2012) && (Irrigation == "Rain"))
            {
                if (Cover == "Lucerne")
                {
                    double[] ValuesToSet = { 0.18, 0.21, 0.20, 0.06, 0.05, 0.06, 0.07, 0.08, 0.10, 0.14, 0.14, 0.14, 0.14 };
                    Soil.SoilWater.SW = ValuesToSet;
                }
                if (Cover == "Ryegrass")
                {
                    double[] ValuesToSet = { 0.14, 0.20, 0.25, 0.11, 0.07, 0.08, 0.09, 0.09, 0.11, 0.14, 0.14, 0.14, 0.14 };
                    Soil.SoilWater.SW = ValuesToSet;
                }
            }
        }
    }
}
```
          Soil: Latitude=0; Longitude=0
            Chemical
              Thickness  NO3N     NH4N  PH
              100        14.1667  0     6.6
              200        12.5     0     6.2
              300        1.38889  0     5.7
              300        1.38889  0     5.5
              300        0        0     5.5
              300        0        0     5.5
            InitialWater Initial water: PercentMethod=1; FractionFull=1
            Physical
              Thickness  BD   AirDry  LL15  DUL   SAT
              100        1.2  0.08    0.13  0.33  0.5
              200        1.2  0.13    0.13  0.33  0.5
              300        1.2  0.1     0.1   0.31  0.44
              300        1.2  0.06    0.06  0.3   0.46
              300        1.2  0.04    0.04  0.3   0.44
              300        1.2  0.02    0.02  0.3   0.44
              SoilCrop SlurpSoil: LL=[0.13, 0.13, 0.1, 0.08, 0.11, 0.11]; KL=[0.06, 0.06, 0.06, 0.06, 0.06, 0.06]; XF=[1, 1, 1, 1, 1, 1]
              SoilCrop PotatoSoil: LL=[0.13, 0.13, 0.27, 0.27, 0.3, 0.3]; KL=[0.1, 0.06, 0.03, 0.01, 0, 0]; XF=[1, 1, 0.1, 0, 0, 0]
            WaterBalance SoilWater: SummerDate=1-Nov; SummerU=9; SummerCona=4.4; WinterDate=1-Apr; WinterU=9; WinterCona=4.4; DiffusConst=88; DiffusSlope=35.4; Salb=0.18; CN2Bare=68; CNRed=20; CNCov=0.8; Slope=0; DischargeWidth=0; CatchmentArea=0
              Thickness  SWCON  KLAT
              100        0.55   0
              200        0.55   0
              300        0.55   0
              300        0.55   0
              300        0.55   0
              300        0.55   0
            Organic: FOMCNRatio=30
              Thickness  Carbon  SoilCNRatio  FBiom  FInert  FOM
              100        1.82    11.5         0.025  0.3     1243.93
              200        1.47    11.5         0.025  0.4     833.832
              300        1.2     11.5         0.015  0.75    457.617
              300        1.03    11.5         0.01   0.9     251.145
              300        0.47    11.5         0.01   0.96    137.831
              300        0.47    11.5         0.01   0.96    75.6435
            Sample Initial nitrogen: Thickness=[100, 200, 300, 300, 300, 300]; SWUnits=Volumetric; OCUnits=Total; PHUnits=Water
            CERESSoilTemperature
            Nutrient
          Plant Slurp
          MicroClimate: a_interception=0; b_interception=1; c_interception=0; d_interception=0; soil_albedo=0.23; SoilHeatFluxFraction=0.4; MinimumHeightDiffForNewLayer=0; NightInterceptionFraction=0.5; ReferenceHeight=2
          Irrigation
          Fertiliser
          SurfaceOrganicMatter surface organic matter: InitialResidueName=wheat; InitialResidueType=wheat; InitialResidueMass=2000; InitialStandingFraction=0; InitialCPR=0; InitialCNR=80
          Report: EventNames=[Clock].DoReport
            VariableNames:
              [Clock].Today as Date
              [Soil].Physical.SlurpSoil.KL[1] as SKL
              [SetCropVariables].Script.Ext_coef as k
              [Slurp].Leaf.CoverTotal as cover
              [Slurp].Leaf.LAI as LAI
              [Slurp].Leaf.Height as Height
              [Slurp].Root.Depth as RootDepth
              [Soil].SoilWater.SW as SW
              sum([Soil].SoilWater.SWmm) as PSWC
          Report SummaryNumbers: EventNames=[Clock].EndOfSimulation
            VariableNames:
              [Clock].Today as Date
              [SlurpSowingRule].Script.CultivarName as CropNameCheck
              [SlurpSowingRule].Script.KLReductionFactor as KLRCheck
              [SlurpSowingRule].Script.RootDepth as RDpCheck
              [SlurpSowingRule].Script.RFV as RFVCheck
              [SlurpSowingRule].Script.YKLModifiers as KLmodCheck
              [SlurpSowingRule].Script.XDepth as KLdepCheck
              [SetCropVariables].Script.Cover as CoverCheck
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